# OpenSim document version 40500
Model subject_walk_scaled:
  gravity: 0 -9.80665 0
  length_units: meters
  force_units: N
  credits:
    Rajagopal et al. (2016), Lai et al. (2017), Uhlrich et al. (2022)
  publications:
    Rajagopal, A., Dembia, C.L., DeMers, M.S., Delp, D.D., Hicks, J.L., Delp, S.L. (2016) Full-body musculoskeletal model for muscle-driven simulation of human gait. IEEE Transactions on Biomedical Engineering.
  Ground
  BodySet:
    Body pelvis: mass=13.33838 mass_center=(-0.0707 0 0) inertia=(0.1164291 0.09864762 0.06557631 0 0 0)
        meshes=(r_pelvis.vtp l_pelvis.vtp sacrum.vtp)
      WrapCylinder Gmax1_at_pelvis_r: xyz_body_rotation=(-0.6 0.45 0) translation=(-0.08857502 -0.1119129 0.06597336)
          quadrant=-x radius=0.04511135 length=0.1661361
      WrapCylinder Gmax2_at_pelvis_r: xyz_body_rotation=(-0.75 0.39 0) translation=(-0.09202599 -0.09382595 0.07354408)
          quadrant=all radius=0.04503595 length=0.1111259
      WrapCylinder Gmax3_at_pelvis_r: xyz_body_rotation=(-0.1 0 0) translation=(-0.09547697 -0.09947812 0.07354408)
          quadrant=all radius=0.04560562 length=0.1082029
      WrapCylinder Gmax1_at_pelvis_l: xyz_body_rotation=(0.6 -0.45 0) translation=(-0.08857502 -0.1119129 -0.06597336)
          quadrant=-x radius=0.04511135 length=0.1661361
      WrapCylinder Gmax2_at_pelvis_l: xyz_body_rotation=(0.75 -0.39 0)
          translation=(-0.09202599 -0.09382595 -0.07354408) quadrant=all radius=0.04503595 length=0.1111259
      WrapCylinder Gmax3_at_pelvis_l: xyz_body_rotation=(0.1 0 0) translation=(-0.09547697 -0.09947812 -0.07354408)
          quadrant=all radius=0.04560562 length=0.1082029
      WrapCylinder PS_at_brim_r: xyz_body_rotation=(-0.25 -0.27 0.1) translation=(-0.08512404 -0.06782599 0.07094841)
          quadrant=-y radius=0.05683166 length=0.1089395
      WrapCylinder PS_at_brim_l: xyz_body_rotation=(0.25 0.27 0.1) translation=(-0.08512404 -0.06782599 -0.07094841)
          quadrant=-y radius=0.05683166 length=0.1089395
      WrapCylinder IL_at_brim_r: xyz_body_rotation=(-0.32 -0.24 0.9) translation=(-0.08167307 -0.07347816 0.08176371)
          quadrant=-y radius=0.06238281 length=0.1090176
      WrapCylinder IL_at_brim_l: xyz_body_rotation=(0.32 0.24 0.9) translation=(-0.08167307 -0.07347816 -0.08176371)
          quadrant=-y radius=0.06238281 length=0.1090176
    Body femur_r: mass=10.53457 mass_center=(0 -0.17 0) inertia=(0.1516523 0.03975352 0.1599201 0 0 0)
        meshes=r_femur.vtp
      WrapCylinder GasLat_at_condyles_r: translation=(0.005243464 -0.3992165 0) quadrant=all radius=0.02629109
          length=0.1052276
      WrapCylinder GasMed_at_condyles_r: translation=(0.005243464 -0.3992165 0) quadrant=all radius=0.0252799
          length=0.1052276
      WrapCylinder KnExt_at_fem_r: xyz_body_rotation=(-0.0623366 0.0507601 0)
          translation=(0.003763004 -0.3921396 0.002200426) quadrant=all radius=0.02528397 length=0.1051974
      WrapCylinder KnExtVL_at_fem_r: xyz_body_rotation=(-0.0623366 0.0507601 0)
          translation=(0.001980226 -0.3921396 0.002200426) quadrant=all radius=0.02528397 length=0.1051974
      WrapCylinder AB_at_femshaft_r: xyz_body_rotation=(1.66157 0.186644 0)
          translation=(0.01535643 -0.1096336 0.02458644) quadrant=all radius=0.01730748 length=0.06839164
      WrapCylinder AL_at_femshaft_r: xyz_body_rotation=(1.77711 0.136489 0)
          translation=(0.03222916 -0.2258095 0.01590379) quadrant=all radius=0.02106992 length=0.09784959
      WrapCylinder AMprox_at_femshaft_r: xyz_body_rotation=(1.61126 0.18656 0)
          translation=(0.005435365 -0.07097758 0.02673098) quadrant=all radius=0.02213769 length=0.06835523
      WrapCylinder AMmid_at_femshaft_r: xyz_body_rotation=(1.61139 0.13656 0)
          translation=(0.02413305 -0.1564841 0.02166027) quadrant=all radius=0.02246471 length=0.1170328
      WrapCylinder AMdist_at_femshaft_r: xyz_body_rotation=(1.71188 0.186636 0)
          translation=(0.03314551 -0.2538783 0.009854148) quadrant=all radius=0.02285764 length=0.1955864
      WrapCylinder AMisch_at_condyles_r: xyz_body_rotation=(1.71115 -0.463363 0)
          translation=(-0.02375405 -0.3669199 -0.003319269) quadrant=all radius=0.04170484 length=0.2376947
      WrapCylinder PECT_at_femshaft_r: xyz_body_rotation=(1.81295 0.276344 0)
          translation=(0.006382062 -0.08228037 0.03203182) quadrant=all radius=0.01568655 length=0.04918974
    Body tibia_r: mass=4.199036 mass_center=(0 -0.1867 0) inertia=(0.05708197 0.005776152 0.05787478 0 0 0)
        meshes=(r_tibia.vtp r_fibula.vtp)
      WrapCylinder GasLat_at_shank_r: xyz_body_rotation=(2.96723 -0.279725 -1.47812)
          translation=(-0.008609964 -0.08605724 -0.003746227) quadrant=-y radius=0.06389765 length=0.113818
      WrapCylinder GasMed_at_shank_r: xyz_body_rotation=(2.96723 0.0279725 -1.47812)
          translation=(-0.008609964 -0.08605724 -0.003746227) quadrant=-y radius=0.06860516 length=0.1136086
      WrapCylinder GR_at_condyles_r: xyz_body_rotation=(0 -0.4 0) translation=(-0.003490526 -0.02325871 0) quadrant=all
          radius=0.04179958 length=0.1139555
      WrapCylinder SM_at_condyles_r: xyz_body_rotation=(0 -0.1 0) translation=(-0.001163509 -0.02325871 0) quadrant=all
          radius=0.04012636 length=0.1135506
      WrapCylinder ST_at_condyles_r: xyz_body_rotation=(0 -0.2 0) translation=(-0.002327017 -0.02384018 0) quadrant=all
          radius=0.04941349 length=0.113635
      WrapCylinder BF_at_gastroc_r: translation=(-0.04537684 -0.06977614 0) quadrant=y radius=0.03373344
          length=0.1702831
    Body patella_r: mass=0.07000713 mass_center=(0.0018 0.0264 0) inertia=(2.330864e-6 1.064726e-5 1.064726e-5 0 0 0)
        meshes=r_patella.vtp
    Body talus_r: mass=0.1132579 mass_center=(0 0 0) inertia=(0.001132579 0.001132579 0.001132579 0 0 0)
        meshes=r_talus.vtp
    Body calcn_r: mass=1.415724 mass_center=(0.1 0.03 0) inertia=(0.00158561 0.004417057 0.004643573 0 0 0)
        meshes=r_foot.vtp
    Body toes_r: mass=0.2453166 mass_center=(0.0346 0.006 -0.0175)
        inertia=(0.0007140909 0.0008273488 0.001132579 0 0 0) meshes=r_bofoot.vtp
    Body femur_l: mass=10.53457 mass_center=(0 -0.17 0) inertia=(0.1516523 0.03975352 0.1599201 0 0 0)
        meshes=l_femur.vtp
      WrapCylinder GasLat_at_condyles_l: translation=(0.005243464 -0.3992165 0) quadrant=all radius=0.02629109
          length=0.1052276
      WrapCylinder GasMed_at_condyles_l: translation=(0.005243464 -0.3992165 0) quadrant=all radius=0.0252799
          length=0.1052276
      WrapCylinder KnExt_at_fem_l: xyz_body_rotation=(0.0623366 -0.0507601 0)
          translation=(0.003763004 -0.3921396 -0.002200426) quadrant=all radius=0.02528397 length=0.1051974
      WrapCylinder KnExtVL_at_fem_l: xyz_body_rotation=(0.0623366 -0.0507601 0)
          translation=(0.001980226 -0.3921396 -0.002200426) quadrant=all radius=0.02528397 length=0.1051974
      WrapCylinder AB_at_femshaft_l: xyz_body_rotation=(-1.66157 -0.186644 0)
          translation=(0.01535643 -0.1096336 -0.02458644) quadrant=all radius=0.01730748 length=0.06839164
      WrapCylinder AL_at_femshaft_l: xyz_body_rotation=(-1.77711 -0.136489 0)
          translation=(0.03222916 -0.2258095 -0.01590379) quadrant=all radius=0.02106992 length=0.09784959
      WrapCylinder AMprox_at_femshaft_l: xyz_body_rotation=(-1.61126 -0.18656 0)
          translation=(0.005435365 -0.07097758 -0.02673098) quadrant=all radius=0.02213769 length=0.06835523
      WrapCylinder AMmid_at_femshaft_l: xyz_body_rotation=(-1.61139 -0.13656 0)
          translation=(0.02413305 -0.1564841 -0.02166027) quadrant=all radius=0.02246471 length=0.1170328
      WrapCylinder AMdist_at_femshaft_l: xyz_body_rotation=(-1.71188 -0.186636 0)
          translation=(0.03314551 -0.2538783 -0.009854148) quadrant=all radius=0.02285764 length=0.1955864
      WrapCylinder AMisch_at_condyles_l: xyz_body_rotation=(-1.71115 0.463363 0)
          translation=(-0.02375405 -0.3669199 0.003319269) quadrant=all radius=0.04170484 length=0.2376947
      WrapCylinder PECT_at_femshaft_l: xyz_body_rotation=(-1.81295 -0.276344 0)
          translation=(0.006382062 -0.08228037 -0.03203182) quadrant=all radius=0.01568655 length=0.04918974
    Body tibia_l: mass=4.199036 mass_center=(0 -0.1867 0) inertia=(0.05708197 0.005776152 0.05787478 0 0 0)
        meshes=(l_tibia.vtp l_fibula.vtp)
      WrapCylinder GasLat_at_shank_l: xyz_body_rotation=(-2.96723 0.279725 -1.47812)
          translation=(-0.008609964 -0.08605724 0.003746227) quadrant=-y radius=0.06389765 length=0.113818
      WrapCylinder GasMed_at_shank_l: xyz_body_rotation=(-2.96723 -0.0279725 -1.47812)
          translation=(-0.008609964 -0.08605724 0.003746227) quadrant=-y radius=0.06860516 length=0.1136086
      WrapCylinder GR_at_condyles_l: xyz_body_rotation=(0 0.4 0) translation=(-0.003490526 -0.02325871 0) quadrant=all
          radius=0.04179958 length=0.1139555
      WrapCylinder SM_at_condyles_l: xyz_body_rotation=(0 0.1 0) translation=(-0.001163509 -0.02325871 0) quadrant=all
          radius=0.04012636 length=0.1135506
      WrapCylinder ST_at_condyles_l: xyz_body_rotation=(0 0.2 0) translation=(-0.002327017 -0.02384018 0) quadrant=all
          radius=0.04941349 length=0.113635
      WrapCylinder BF_at_gastroc_l: translation=(-0.04537684 -0.06977614 0) quadrant=all radius=0.03373344
          length=0.1702831
    Body patella_l: mass=0.07000713 mass_center=(0.0018 0.0264 0) inertia=(2.330864e-6 1.064726e-5 1.064726e-5 0 0 0)
        meshes=l_patella.vtp
    Body talus_l: mass=0.1132579 mass_center=(0 0 0) inertia=(0.001132579 0.001132579 0.001132579 0 0 0)
        meshes=l_talus.vtp
    Body calcn_l: mass=1.415724 mass_center=(0.1 0.03 0) inertia=(0.00158561 0.004417057 0.004643573 0 0 0)
        meshes=l_foot.vtp
    Body toes_l: mass=0.2453166 mass_center=(0.0346 0.006 -0.0175)
        inertia=(0.0007140909 0.0008273488 0.001132579 0 0 0) meshes=l_bofoot.vtp
    Body torso: mass=18.18836 mass_center=(-0.02584684 0.2475572 -0.00154862)
        inertia=(1.133746 0.7672917 1.110585 -0.03866646 -0.0002905504 0.005571152) meshes=hat_spine.vtp
      WrapCylinder arm26_TRIlongglen_r: xyz_body_rotation=(1.365775 -0.2715029 2.442169)
          translation=(-0.0250111 0.3876002 0.1742261) quadrant=x radius=0.003307108 length=0.03307108
      WrapCylinder arm26_TRIlongglen_l: xyz_body_rotation=(-1.365775 0.2715029 2.442169)
          translation=(-0.0250111 0.3876002 -0.1742261) quadrant=x radius=0.003307108 length=0.03307108
    Body humerus_r: mass=2.301966 mass_center=(0 -0.164502 0) inertia=(0.01352979 0.004667357 0.01518675 0 0 0)
        meshes=humerus_rv.vtp
      WrapEllipsoid arm26_TRIlonghh_r: xyz_body_rotation=(2.963723 -0.848463 2.538792)
          translation=(-0.008486225 -0.004740491 -0.001501739) quadrant=z dimensions=(0.03858292 0.02204738 0.02204738)
      WrapEllipsoid arm26_BIClonghh_r: xyz_body_rotation=(-2.033944 -1.022578 0.9538562)
          translation=(0.003444611 0.008134939 0.000243861) quadrant=-y dimensions=(0.02755923 0.02204738 0.02204738)
      WrapCylinder arm26_TRI_r: xyz_body_rotation=(-0.1512274 -0.01097653 0.1783856)
          translation=(0.01076222 -0.3216818 -0.003968744) quadrant=all radius=0.01763791 length=0.05511846
      WrapSphere hhead_r: xyz_body_rotation=(0.05610238 0.2854541 0.1784563)
          translation=(-0.004871944 0.004730943 -0.0006036029) quadrant=all radius=0.02705175
      WrapSphere hheadsupraTminor_r: xyz_body_rotation=(0.05610238 0.2854541 0.1784563)
          translation=(-0.001020075 0.004877903 0.003220296) quadrant=all radius=0.02587559
      WrapEllipsoid hheadInfra_r: xyz_body_rotation=(0.1825865 0.441124 0.4240814)
          translation=(-0.00157367 0.001386011 -0.004982771) quadrant=all dimensions=(0.03287825 0.02575775 0.03331953)
    Body ulna_r: mass=0.6880416 mass_center=(0 -0.120525 0) inertia=(0.003354698 0.0006999337 0.003638976 0 0 0)
        meshes=ulna_rv.vtp
    Body radius_r: mass=0.6880416 mass_center=(0 -0.120525 0) inertia=(0.003354698 0.0006999337 0.003638976 0 0 0)
        meshes=radius_rv.vtp
    Body hand_r: mass=0.5181548 mass_center=(0 -0.068095 0) inertia=(0.00101026 0.0006195206 0.001517656 0 0 0)
        meshes=(pisiform_rvs.vtp lunate_rvs.vtp scaphoid_rvs.vtp triquetrum_rvs.vtp hamate_rvs.vtp capitate_rvs.vtp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)
    Body humerus_l: mass=2.301966 mass_center=(0 -0.164502 0) inertia=(0.01352979 0.004667357 0.01518675 0 0 0)
        meshes=humerus_lv.vtp
      WrapEllipsoid arm26_TRIlonghh_l: xyz_body_rotation=(-2.963723 0.848463 2.538792)
          translation=(-0.008486225 -0.004740491 0.001501739) quadrant=-z dimensions=(0.03858292 0.02204738 0.02204738)
      WrapEllipsoid arm26_BIClonghh_l: xyz_body_rotation=(2.033944 1.022578 0.9538562)
          translation=(0.003444611 0.008134939 -0.000243861) quadrant=-y dimensions=(0.02755923 0.02204738 0.02204738)
      WrapCylinder arm26_TRI_l: xyz_body_rotation=(0.1512274 0.01097653 0.1783856)
          translation=(0.01076222 -0.3216818 0.003968744) quadrant=all radius=0.01763791 length=0.05511846
      WrapSphere hhead_l: xyz_body_rotation=(-0.05610238 -0.2854541 0.1784563)
          translation=(-0.004871944 0.004730943 0.0006036029) quadrant=all radius=0.02705175
      WrapSphere hheadsupraTminor_l: xyz_body_rotation=(-0.05610238 -0.2854541 0.1784563)
          translation=(-0.001020075 0.004877903 -0.003220296) quadrant=all radius=0.02587559
      WrapEllipsoid hheadInfra_l: xyz_body_rotation=(-0.1825865 -0.441124 0.4240814)
          translation=(-0.00157367 0.001386011 0.004982771) quadrant=all dimensions=(0.03287825 0.02575775 0.03331953)
    Body ulna_l: mass=0.6880416 mass_center=(0 -0.120525 0) inertia=(0.003354698 0.0006999337 0.003638976 0 0 0)
        meshes=ulna_lv.vtp
    Body radius_l: mass=0.6880416 mass_center=(0 -0.120525 0) inertia=(0.003354698 0.0006999337 0.003638976 0 0 0)
        meshes=radius_lv.vtp
    Body hand_l: mass=0.5181548 mass_center=(0 -0.068095 0) inertia=(0.00101026 0.0006195206 0.001517656 0 0 0)
        meshes=(pisiform_lvs.vtp lunate_lvs.vtp scaphoid_lvs.vtp triquetrum_lvs.vtp hamate_lvs.vtp capitate_lvs.vtp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)
    Body thorax: mass=2.524792 mass_center=(0.02386315 0.1255921 0.001093455)
        inertia=(0.03606563 0.0284059 0.02624225 0.0001495784 -4.81491e-5 5.629138e-5) meshes=hat_ribs_scap.vtp
      PhysicalOffsetFrame thorax_display_origin: socket_parent=.. translation=(0.02248833 -0.07777192 -0.001190342)
      WrapEllipsoid Thorax_r: xyz_body_rotation=(-0.17 -0.0383972 0.212232) translation=(0.0518414 0.135808 0.09088193)
          quadrant=all dimensions=(0.09742369 0.2235462 0.09271027)
      WrapEllipsoid Thorax_l: xyz_body_rotation=(0.17 0.0383972 0.212232) translation=(0.0518414 0.135808 -0.09326262)
          quadrant=all dimensions=(0.09742369 0.2235462 0.09271027)
    Body cervical: mass=3.756249 mass_center=(-0.01655152 0.06345975 0.0005045963)
        inertia=(0.008353203 0.006295504 0.007452712 -0.0005752663 -9.558793e-7 -5.206763e-6)
    Body head: mass=4.394662 mass_center=(-0.007622113 0.06865024 0.000297207)
        inertia=(0.01277838 0.01512266 0.01780336 0.001857908 4.15308e-5 -1.516728e-5)
        meshes=(hat_jaw.vtp hat_skull.vtp)
      PhysicalOffsetFrame head_display_origin: socket_parent=.. translation=(0.03505402 -0.4941265 -0.00261803)
    Body clavicle_r: mass=0.2084969 mass_center=(-0.01460121 0.008381089 0.07125284)
        inertia=(0.0003067588 0.0003261821 6.437254e-5 1.851485e-5 8.046765e-5 -6.821416e-5)
    Body scapula_r: mass=0.5510894 mass_center=(-0.07193608 -0.04607845 -0.05749997)
        inertia=(0.0009549586 0.0005511529 0.0008451213 -0.0002424676 -0.0001433225 -0.0001877844)
      WrapCylinder Subscapuralis_r: xyz_body_rotation=(1 -1 1) translation=(-0.03301649 -0.05129795 -0.03734259)
          quadrant=-y radius=0.0165154 length=0.1126936
      WrapCylinder Tmajscapula_r: xyz_body_rotation=(-1.4854 -0.3354 -0.8754)
          translation=(-0.11746 -0.1396962 -0.06587562) quadrant=-y radius=0.009986195 length=0.06615088
      WrapEllipsoid deltsca_r: xyz_body_rotation=(1.4823 0.1606 -0.4472)
          translation=(-0.04511617 -0.04393446 -0.05824932) quadrant=all dimensions=(0.05304631 0.1192327 0.03952084)
      WrapCylinder Infra_r: xyz_body_rotation=(1.87 -0.543 -2.355) translation=(-0.07644763 -0.06037703 -0.06002454)
          quadrant=-y radius=0.02595883 length=0.1330625
    Body clavicle_l: mass=0.2084969 mass_center=(-0.01460121 0.008381089 -0.07125284)
        inertia=(0.0003046457 0.0003247495 6.674912e-5 1.968044e-5 -8.259343e-5 6.956103e-5)
    Body scapula_l: mass=0.5510894 mass_center=(-0.07193608 -0.04607845 0.05749997)
        inertia=(0.0009564574 0.0005487259 0.0008459867 -0.0002427928 0.0001407248 0.0001870128)
      WrapCylinder Subscapuralis_l: xyz_body_rotation=(-1 1 1) translation=(-0.03301649 -0.05129795 0.03734259)
          quadrant=-y radius=0.0165154 length=0.1126936
      WrapCylinder Tmajscapula_l: xyz_body_rotation=(1.4854 0.3354 -0.8754)
          translation=(-0.11746 -0.1396962 0.06587562) quadrant=-y radius=0.009986195 length=0.06615088
      WrapEllipsoid deltsca_l: xyz_body_rotation=(-1.4823 -0.1606 -0.4472)
          translation=(-0.04511617 -0.04393446 0.05824932) quadrant=all dimensions=(0.05304631 0.1192327 0.03952084)
      WrapCylinder Infra_l: xyz_body_rotation=(-1.87 0.543 -2.355) translation=(-0.07644763 -0.06037703 0.06002454)
          quadrant=-y radius=0.02595883 length=0.1330625
  JointSet:
    CustomJoint ground_pelvis: socket_parent_frame=ground_offset socket_child_frame=pelvis_offset
      Coordinate pelvis_tilt: default_value=0 range=(-3.141593 3.141593) clamped=true
      Coordinate pelvis_list: default_value=0 range=(-3.141593 3.141593) clamped=true
      Coordinate pelvis_rotation: default_value=0 range=(-3.141593 3.141593) clamped=true
      Coordinate pelvis_tx: default_value=0 range=(-50 50) clamped=true
      Coordinate pelvis_ty: default_value=0.93 range=(-1 2) clamped=true
      Coordinate pelvis_tz: default_value=0 range=(-3 3) clamped=true
      PhysicalOffsetFrame ground_offset: socket_parent=/ground translation=(0 0 0)
      PhysicalOffsetFrame pelvis_offset: socket_parent=/bodyset/pelvis translation=(0 0 0)
      SpatialTransform:
        TransformAxis rotation1: coordinates=pelvis_tilt axis=(0 0 1) LinearFunction(coefficients=1 0)
        TransformAxis rotation2: coordinates=pelvis_list axis=(1 0 0) LinearFunction(coefficients=1 0)
        TransformAxis rotation3: coordinates=pelvis_rotation axis=(0 1 0) LinearFunction(coefficients=1 0)
        TransformAxis translation1: coordinates=pelvis_tx axis=(1 0 0) LinearFunction(coefficients=1 0)
        TransformAxis translation2: coordinates=pelvis_ty axis=(0 1 0) LinearFunction(coefficients=1 0)
        TransformAxis translation3: coordinates=pelvis_tz axis=(0 0 1) LinearFunction(coefficients=1 0)
    CustomJoint hip_r: socket_parent_frame=pelvis_offset socket_child_frame=femur_r_offset
      Coordinate hip_flexion_r: default_value=0 range=(-0.5235988 2.094395) clamped=true
      Coordinate hip_adduction_r: default_value=0 range=(-0.8726646 0.5235988) clamped=true
      Coordinate hip_rotation_r: default_value=0 range=(-0.6981317 0.6981317) clamped=true
      PhysicalOffsetFrame pelvis_offset: socket_parent=/bodyset/pelvis translation=(-0.06473568 -0.0887277 0.08355905)
      PhysicalOffsetFrame femur_r_offset: socket_parent=/bodyset/femur_r translation=(0 0 0)
      SpatialTransform: axes_held_at_zero=(translation1 translation2 translation3)
        TransformAxis rotation1: coordinates=hip_flexion_r axis=(0 0 1) LinearFunction(coefficients=1 0)
        TransformAxis rotation2: coordinates=hip_adduction_r axis=(1 0 0) LinearFunction(coefficients=1 0)
        TransformAxis rotation3: coordinates=hip_rotation_r axis=(0 1 0) LinearFunction(coefficients=1 0)
    CustomJoint walker_knee_r: socket_parent_frame=femur_r_offset socket_child_frame=tibia_r_offset
      Coordinate knee_angle_r: default_value=0 range=(0 2.443461) clamped=true
      PhysicalOffsetFrame femur_r_offset: socket_parent=/bodyset/femur_r
          translation=(-0.00473105 -0.398853 -0.001838678) orientation=(-1.64157 1.44618 1.5708)
      PhysicalOffsetFrame tibia_r_offset: socket_parent=/bodyset/tibia_r
          translation=(-0.009412249 -0.004110745 -0.001685507) orientation=(-1.64157 1.44618 1.5708)
      SpatialTransform:
        TransformAxis rotation1: coordinates=knee_angle_r axis=(1 0 0) LinearFunction(coefficients=1 0)
        TransformAxis rotation2: coordinates=knee_angle_r axis=(0 0 1)
          PolynomialFunction: coefficients=(0.01083209 -0.02521833 -0.03284781 0.07910001 -1.47e-8)
        TransformAxis rotation3: coordinates=knee_angle_r axis=(0 1 0)
          PolynomialFunction: coefficients=(0.02516576 -0.1694801 0.3694993 -4.43e-8)
        TransformAxis translation1: coordinates=knee_angle_r axis=(1 0 0)
          MultiplierFunction: scale=1.048693
            PolynomialFunction: coefficients=(0.0001590448 -0.00101515 0.001817511 2.64143e-5 0)
        TransformAxis translation2: coordinates=knee_angle_r axis=(0 1 0)
          MultiplierFunction: scale=0.9736987
            PolynomialFunction: coefficients=(-0.0005796878 0.005079766 -0.01144238 0.003936909 0)
        TransformAxis translation3: coordinates=knee_angle_r axis=(0 0 1)
          MultiplierFunction: scale=1.052276
            PolynomialFunction: coefficients=(0.001208087 -0.004453611 0.0006116494 0.00626543 0)
    CustomJoint patellofemoral_r: socket_parent_frame=femur_r_offset socket_child_frame=patella_r_offset
      Coordinate knee_angle_r_beta: default_value=0 range=(-10 10) clamped=false
      PhysicalOffsetFrame femur_r_offset: socket_parent=/bodyset/femur_r
          translation=(-0.008483926 -0.3972301 -0.00289376)
      PhysicalOffsetFrame patella_r_offset: socket_parent=/bodyset/patella_r translation=(0 0 0)
      SpatialTransform: axes_held_at_zero=(rotation2 rotation3)
        TransformAxis rotation1: coordinates=knee_angle_r_beta axis=(0 0 1)
          SimmSpline: x=(0 0.174533 0.349066 0.523599 0.698132 0.872665 1.0472 1.22173 1.39626 1.5708 1.74533 1.91986 2.0944)
              y=(0.00113686 -0.00629212 -0.105582 -0.253683 -0.414245 -0.579047 -0.747244 -0.91799 -1.09044 -1.26379 -1.43763 -1.61186 -1.78634)
        TransformAxis translation1: coordinates=knee_angle_r_beta axis=(1 0 0)
          MultiplierFunction: scale=1.048693
            SimmSpline: x=(0 0.174533 0.349066 0.523599 0.698132 0.872665 1.0472 1.22173 1.39626 1.5708 1.74533 1.91986 2.0944)
                y=(0.0524 0.0488 0.0437 0.0371 0.0296 0.0216 0.0136 0.0057 -0.0019 -0.0088 -0.0148 -0.0196 -0.0227)
        TransformAxis translation2: coordinates=knee_angle_r_beta axis=(0 1 0)
          MultiplierFunction: scale=0.9736987
            SimmSpline: x=(0 0.174533 0.349066 0.523599 0.698132 0.872665 1.0472 1.22173 1.39626 1.5708 1.74533 1.91986 2.0944)
                y=(-0.0108 -0.019 -0.0263 -0.0322 -0.0367 -0.0395 -0.0408 -0.0404 -0.0384 -0.0349 -0.0301 -0.0245 -0.0187)
        TransformAxis translation3: axis=(0 0 1) MultiplierFunction(scale=1.052276, Constant(value=0.00275))
    PinJoint ankle_r: socket_parent_frame=tibia_r_offset socket_child_frame=talus_r_offset
      Coordinate ankle_angle_r: default_value=0 range=(-0.8726646 0.8726646) clamped=true
      PhysicalOffsetFrame tibia_r_offset: socket_parent=/bodyset/tibia_r translation=(-0.01163509 -0.4651743 0)
          orientation=(0.175895 -0.105208 0.0186622)
      PhysicalOffsetFrame talus_r_offset: socket_parent=/bodyset/talus_r translation=(0 0 0)
          orientation=(0.175895 -0.105208 0.0186622)
    CustomJoint hip_l: socket_parent_frame=pelvis_offset socket_child_frame=femur_l_offset
      Coordinate hip_flexion_l: default_value=0 range=(-0.5235988 2.094395) clamped=true
      Coordinate hip_adduction_l: default_value=0 range=(-0.8726646 0.5235988) clamped=true
      Coordinate hip_rotation_l: default_value=0 range=(-0.6981317 0.6981317) clamped=true
      PhysicalOffsetFrame pelvis_offset: socket_parent=/bodyset/pelvis translation=(-0.06473568 -0.0887277 -0.08355905)
      PhysicalOffsetFrame femur_l_offset: socket_parent=/bodyset/femur_l translation=(0 0 0)
      SpatialTransform: axes_held_at_zero=(translation1 translation2 translation3)
        TransformAxis rotation1: coordinates=hip_flexion_l axis=(0 0 1) LinearFunction(coefficients=1 0)
        TransformAxis rotation2: coordinates=hip_adduction_l axis=(1 0 0) LinearFunction(coefficients=-1 0)
        TransformAxis rotation3: coordinates=hip_rotation_l axis=(0 1 0) LinearFunction(coefficients=-1 0)
    CustomJoint walker_knee_l: socket_parent_frame=femur_l_offset socket_child_frame=tibia_l_offset
      Coordinate knee_angle_l: default_value=0 range=(0 2.443461) clamped=true
      PhysicalOffsetFrame femur_l_offset: socket_parent=/bodyset/femur_l
          translation=(-0.00473105 -0.398853 0.001838678) orientation=(1.64157 -1.44618 1.5708)
      PhysicalOffsetFrame tibia_l_offset: socket_parent=/bodyset/tibia_l
          translation=(-0.009412249 -0.004110745 0.001685507) orientation=(1.64157 -1.44618 1.5708)
      SpatialTransform:
        TransformAxis rotation1: coordinates=knee_angle_l axis=(-1 0 0) LinearFunction(coefficients=1 0)
        TransformAxis rotation2: coordinates=knee_angle_l axis=(0 0 1)
          PolynomialFunction: coefficients=(0.01083209 -0.02521833 -0.03284781 0.07910001 -1.47e-8)
        TransformAxis rotation3: coordinates=knee_angle_l axis=(0 1 0)
          PolynomialFunction: coefficients=(-0.02516576 0.1694801 -0.3694993 4.43e-8)
        TransformAxis translation1: coordinates=knee_angle_l axis=(1 0 0)
          MultiplierFunction: scale=1.048693
            PolynomialFunction: coefficients=(0.0001590448 -0.00101515 0.001817511 2.64143e-5 0)
        TransformAxis translation2: coordinates=knee_angle_l axis=(0 1 0)
          MultiplierFunction: scale=0.9736987
            PolynomialFunction: coefficients=(-0.0005796878 0.005079766 -0.01144238 0.003936909 0)
        TransformAxis translation3: coordinates=knee_angle_l axis=(0 0 1)
          MultiplierFunction: scale=1.052276
            PolynomialFunction: coefficients=(-0.001208087 0.004453611 -0.0006116494 -0.00626543 0)
    CustomJoint patellofemoral_l: socket_parent_frame=femur_l_offset socket_child_frame=patella_l_offset
      Coordinate knee_angle_l_beta: default_value=0 range=(-10 10) clamped=false
      PhysicalOffsetFrame femur_l_offset: socket_parent=/bodyset/femur_l
          translation=(-0.008483926 -0.3972301 0.00289376)
      PhysicalOffsetFrame patella_l_offset: socket_parent=/bodyset/patella_l translation=(0 0 0)
      SpatialTransform: axes_held_at_zero=(rotation2 rotation3)
        TransformAxis rotation1: coordinates=knee_angle_l_beta axis=(0 0 1)
          SimmSpline: x=(0 0.174533 0.349066 0.523599 0.698132 0.872665 1.0472 1.22173 1.39626 1.5708 1.74533 1.91986 2.0944)
              y=(0.00113686 -0.00629212 -0.105582 -0.253683 -0.414245 -0.579047 -0.747244 -0.91799 -1.09044 -1.26379 -1.43763 -1.61186 -1.78634)
        TransformAxis translation1: coordinates=knee_angle_l_beta axis=(1 0 0)
          MultiplierFunction: scale=1.048693
            SimmSpline: x=(0 0.174533 0.349066 0.523599 0.698132 0.872665 1.0472 1.22173 1.39626 1.5708 1.74533 1.91986 2.0944)
                y=(0.0524 0.0488 0.0437 0.0371 0.0296 0.0216 0.0136 0.0057 -0.0019 -0.0088 -0.0148 -0.0196 -0.0227)
        TransformAxis translation2: coordinates=knee_angle_l_beta axis=(0 1 0)
          MultiplierFunction: scale=0.9736987
            SimmSpline: x=(0 0.174533 0.349066 0.523599 0.698132 0.872665 1.0472 1.22173 1.39626 1.5708 1.74533 1.91986 2.0944)
                y=(-0.0108 -0.019 -0.0263 -0.0322 -0.0367 -0.0395 -0.0408 -0.0404 -0.0384 -0.0349 -0.0301 -0.0245 -0.0187)
        TransformAxis translation3: axis=(0 0 1) MultiplierFunction(scale=1.052276, Constant(value=-0.00275))
    PinJoint ankle_l: socket_parent_frame=tibia_l_offset socket_child_frame=talus_l_offset
      Coordinate ankle_angle_l: default_value=0 range=(-0.8726646 0.8726646) clamped=true
      PhysicalOffsetFrame tibia_l_offset: socket_parent=/bodyset/tibia_l translation=(-0.01163509 -0.4651743 0)
          orientation=(-0.175895 0.105208 0.0186622)
      PhysicalOffsetFrame talus_l_offset: socket_parent=/bodyset/talus_l translation=(0 0 0)
          orientation=(-0.175895 0.105208 0.0186622)
    CustomJoint back: socket_parent_frame=pelvis_offset socket_child_frame=torso_offset
      Coordinate lumbar_extension: default_value=0 range=(-1.570796 1.570796) clamped=true
      Coordinate lumbar_bending: default_value=0 range=(-1.570796 1.570796) clamped=true
      Coordinate lumbar_rotation: default_value=0 range=(-1.570796 1.570796) clamped=true
      PhysicalOffsetFrame pelvis_offset: socket_parent=/bodyset/pelvis translation=(-0.1158377 0.0921303 0)
      PhysicalOffsetFrame torso_offset: socket_parent=/bodyset/torso translation=(0 0 0)
      SpatialTransform: axes_held_at_zero=(translation1 translation2 translation3)
        TransformAxis rotation1: coordinates=lumbar_extension axis=(0 0 1) LinearFunction(coefficients=1 0)
        TransformAxis rotation2: coordinates=lumbar_bending axis=(1 0 0) LinearFunction(coefficients=1 0)
        TransformAxis rotation3: coordinates=lumbar_rotation axis=(0 1 0) LinearFunction(coefficients=1 0)
    CustomJoint acromial_r: socket_parent_frame=scapula_r_gh_offset socket_child_frame=humerus_r_offset
      Coordinate arm_flex_r: default_value=0 range=(-10 10) clamped=true
      Coordinate arm_add_r: default_value=0 range=(-10 10) clamped=true
      Coordinate arm_rot_r: default_value=0 range=(-10 10) clamped=true
      PhysicalOffsetFrame humerus_r_offset: socket_parent=/bodyset/humerus_r translation=(0 0 0)
      PhysicalOffsetFrame scapula_r_gh_offset: socket_parent=/bodyset/scapula_r
          translation=(-0.01256151 -0.04472366 0.01183396) orientation=(-0.1092573 -0.2700003 -0.201375)
      SpatialTransform: axes_held_at_zero=(translation1 translation2 translation3)
        TransformAxis rotation1: coordinates=arm_flex_r axis=(0 0 1) LinearFunction(coefficients=1 0)
        TransformAxis rotation2: coordinates=arm_add_r axis=(1 0 0) LinearFunction(coefficients=1 0)
        TransformAxis rotation3: coordinates=arm_rot_r axis=(0 1 0) LinearFunction(coefficients=1 0)
    PinJoint elbow_r: socket_parent_frame=humerus_r_offset socket_child_frame=ulna_r_offset
      Coordinate elbow_flex_r: default_value=0 range=(0 2.618) clamped=true
      PhysicalOffsetFrame humerus_r_offset: socket_parent=/bodyset/humerus_r
          translation=(0.01436782 -0.3200092 -0.009935782) orientation=(-0.0228627 0.228018 0.0051689)
      PhysicalOffsetFrame ulna_r_offset: socket_parent=/bodyset/ulna_r translation=(0 0 0)
          orientation=(-0.0228627 0.228018 0.0051689)
    PinJoint radioulnar_r: socket_parent_frame=ulna_r_offset socket_child_frame=radius_r_offset
      Coordinate pro_sup_r: default_value=0 range=(0 2.09) clamped=true
      PhysicalOffsetFrame ulna_r_offset: socket_parent=/bodyset/ulna_r
          translation=(-0.007193475 -0.01302109 0.02847468) orientation=(-1.56884 0.056428 1.53614)
      PhysicalOffsetFrame radius_r_offset: socket_parent=/bodyset/radius_r translation=(0 0 0)
          orientation=(-1.56884 0.056428 1.53614)
    UniversalJoint radius_hand_r: socket_parent_frame=radius_r_offset socket_child_frame=hand_r_offset
      Coordinate wrist_flex_r: default_value=0 range=(-1.22173 1.22173) clamped=true
      Coordinate wrist_dev_r: default_value=0 range=(-0.4363323 0.6108652) clamped=true
      PhysicalOffsetFrame radius_r_offset: socket_parent=/bodyset/radius_r
          translation=(-0.009407016 -0.2360965 0.01485797) orientation=(-1.5708 0 -1.5708)
      PhysicalOffsetFrame hand_r_offset: socket_parent=/bodyset/hand_r translation=(0 0 0)
          orientation=(-1.5708 0 -1.5708)
    CustomJoint acromial_l: socket_parent_frame=scapula_l_gh_offset socket_child_frame=humerus_l_offset
      Coordinate arm_flex_l: default_value=0 range=(-10 10) clamped=true
      Coordinate arm_add_l: default_value=0 range=(-10 10) clamped=true
      Coordinate arm_rot_l: default_value=0 range=(-10 10) clamped=true
      PhysicalOffsetFrame humerus_l_offset: socket_parent=/bodyset/humerus_l translation=(0 0 0)
      PhysicalOffsetFrame scapula_l_gh_offset: socket_parent=/bodyset/scapula_l
          translation=(-0.01256151 -0.04472366 -0.01183396) orientation=(0.1092573 0.2700003 -0.201375)
      SpatialTransform: axes_held_at_zero=(translation1 translation2 translation3)
        TransformAxis rotation1: coordinates=arm_flex_l axis=(0 0 1) LinearFunction(coefficients=1 0)
        TransformAxis rotation2: coordinates=arm_add_l axis=(-1 0 0) LinearFunction(coefficients=1 0)
        TransformAxis rotation3: coordinates=arm_rot_l axis=(0 -1 0) LinearFunction(coefficients=1 0)
    PinJoint elbow_l: socket_parent_frame=humerus_l_offset socket_child_frame=ulna_l_offset
      Coordinate elbow_flex_l: default_value=0 range=(0 2.618) clamped=true
      PhysicalOffsetFrame humerus_l_offset: socket_parent=/bodyset/humerus_l
          translation=(0.01436782 -0.3200092 0.009935782) orientation=(0.0228627 -0.228018 0.0051689)
      PhysicalOffsetFrame ulna_l_offset: socket_parent=/bodyset/ulna_l translation=(0 0 0)
          orientation=(0.0228627 -0.228018 0.0051689)
    PinJoint radioulnar_l: socket_parent_frame=ulna_l_offset socket_child_frame=radius_l_offset
      Coordinate pro_sup_l: default_value=0 range=(0 2.09) clamped=true
      PhysicalOffsetFrame ulna_l_offset: socket_parent=/bodyset/ulna_l
          translation=(-0.007193475 -0.01302109 -0.02847468) orientation=(1.56884 -0.056428 1.53614)
      PhysicalOffsetFrame radius_l_offset: socket_parent=/bodyset/radius_l translation=(0 0 0)
          orientation=(1.56884 -0.056428 1.53614)
    UniversalJoint radius_hand_l: socket_parent_frame=radius_l_offset socket_child_frame=hand_l_offset
      Coordinate wrist_flex_l: default_value=0 range=(-1.22173 1.22173) clamped=true
      Coordinate wrist_dev_l: default_value=0 range=(-0.4363323 0.6108652) clamped=true
      PhysicalOffsetFrame radius_l_offset: socket_parent=/bodyset/radius_l
          translation=(-0.009407016 -0.2360965 -0.01485797) orientation=(1.5708 0 1.5708)
      PhysicalOffsetFrame hand_l_offset: socket_parent=/bodyset/hand_l translation=(0 0 0)
          orientation=(1.5708 0 1.5708)
    PinJoint subtalar_r: socket_parent_frame=talus_r_offset socket_child_frame=calcn_r_offset
      Coordinate subtalar_angle_r: default_value=0 range=(-0.6108652 0.6108652) clamped=true
      PhysicalOffsetFrame talus_r_offset: socket_parent=/bodyset/talus_r
          translation=(-0.05989745 -0.05629063 0.01019297) orientation=(-1.76819 0.906223 1.8196)
      PhysicalOffsetFrame calcn_r_offset: socket_parent=/bodyset/calcn_r translation=(0 0 0)
          orientation=(-1.76819 0.906223 1.8196)
    PinJoint mtp_r: socket_parent_frame=calcn_r_offset socket_child_frame=toes_r_offset
      Coordinate mtp_angle_r: default_value=0 range=(-0.5235988 0.5235988) clamped=true
      PhysicalOffsetFrame calcn_r_offset: socket_parent=/bodyset/calcn_r translation=(0.1788 -0.002 0.00108)
      PhysicalOffsetFrame toes_r_offset: socket_parent=/bodyset/toes_r translation=(0 0 0)
    PinJoint subtalar_l: socket_parent_frame=talus_l_offset socket_child_frame=calcn_l_offset
      Coordinate subtalar_angle_l: default_value=0 range=(-0.6108652 0.6108652) clamped=true
      PhysicalOffsetFrame talus_l_offset: socket_parent=/bodyset/talus_l
          translation=(-0.05989745 -0.05629063 -0.01019297) orientation=(1.76819 -0.906223 1.8196)
      PhysicalOffsetFrame calcn_l_offset: socket_parent=/bodyset/calcn_l translation=(0 0 0)
          orientation=(1.76819 -0.906223 1.8196)
    PinJoint mtp_l: socket_parent_frame=calcn_l_offset socket_child_frame=toes_l_offset
      Coordinate mtp_angle_l: default_value=0 range=(-0.5235988 0.5235988) clamped=true
      PhysicalOffsetFrame calcn_l_offset: socket_parent=/bodyset/calcn_l translation=(0.1788 -0.002 -0.00108)
      PhysicalOffsetFrame toes_l_offset: socket_parent=/bodyset/toes_l translation=(0 0 0)
    CustomJoint thoracic: socket_parent_frame=torso_offset socket_child_frame=thorax_offset
      Coordinate thoracic_extension: default_value=0 range=(-0.2617994 0.2617994) clamped=true
      Coordinate thoracic_bending: default_value=0 range=(-0.2617994 0.2617994) clamped=true
      Coordinate thoracic_rotation: default_value=0 range=(-0.3490659 0.3490659) clamped=true
      PhysicalOffsetFrame torso_offset: socket_parent=/bodyset/torso translation=(-0.02248833 0.07777192 0.001190342)
      PhysicalOffsetFrame thorax_offset: socket_parent=/bodyset/thorax translation=(0 0 0)
      SpatialTransform: axes_held_at_zero=(translation1 translation2 translation3)
        TransformAxis rotation1: coordinates=thoracic_extension axis=(0 0 1) LinearFunction(coefficients=1 0)
        TransformAxis rotation2: coordinates=thoracic_bending axis=(1 0 0) LinearFunction(coefficients=1 0)
        TransformAxis rotation3: coordinates=thoracic_rotation axis=(0 1 0) LinearFunction(coefficients=1 0)
    CustomJoint neck: socket_parent_frame=thorax_offset socket_child_frame=cervical_offset
      Coordinate neck_extension: default_value=0 range=(-0.5759587 0.837758) clamped=true
      Coordinate neck_bending: default_value=0 range=(-0.5759587 0.5759587) clamped=true
      Coordinate neck_rotation: default_value=0 range=(-0.4712389 0.4712389) clamped=true
      PhysicalOffsetFrame thorax_offset: socket_parent=/bodyset/thorax translation=(-0.01204763 0.296501 0.0008579466)
      PhysicalOffsetFrame cervical_offset: socket_parent=/bodyset/cervical translation=(0 0 0)
      SpatialTransform: axes_held_at_zero=(translation1 translation2 translation3)
        TransformAxis rotation1: coordinates=neck_extension axis=(0 0 1) LinearFunction(coefficients=1 0)
        TransformAxis rotation2: coordinates=neck_bending axis=(1 0 0) LinearFunction(coefficients=1 0)
        TransformAxis rotation3: coordinates=neck_rotation axis=(0 1 0) LinearFunction(coefficients=1 0)
    CustomJoint atlantooccipital: socket_parent_frame=cervical_offset socket_child_frame=head_offset
      Coordinate head_extension: default_value=0 range=(-0.2792527 0.418879) clamped=true
      Coordinate head_bending: default_value=0 range=(-0.1047198 0.1047198) clamped=true
      Coordinate head_rotation: default_value=0 range=(-0.6632251 0.6632251) clamped=true
      PhysicalOffsetFrame cervical_offset: socket_parent=/bodyset/cervical
          translation=(-0.0005180681 0.1198535 0.000569741)
      PhysicalOffsetFrame head_offset: socket_parent=/bodyset/head translation=(0 0 0)
      SpatialTransform: axes_held_at_zero=(translation1 translation2 translation3)
        TransformAxis rotation1: coordinates=head_extension axis=(0 0 1) LinearFunction(coefficients=1 0)
        TransformAxis rotation2: coordinates=head_bending axis=(1 0 0) LinearFunction(coefficients=1 0)
        TransformAxis rotation3: coordinates=head_rotation axis=(0 1 0) LinearFunction(coefficients=1 0)
    CustomJoint sternoclavicular_r: socket_parent_frame=torso_sc_r_offset socket_child_frame=clavicle_r_offset
      Coordinate clav_prot_r: default_value=-0.2998917 range=(-0.6489576 0.0491741) clamped=true
      Coordinate clav_elev_r: default_value=-0.06473725 range=(-0.4138031 0.2843286) clamped=true
      PhysicalOffsetFrame torso_sc_r_offset: socket_parent=/bodyset/torso translation=(0.06661015 0.4156582 0.03349461)
      PhysicalOffsetFrame clavicle_r_offset: socket_parent=/bodyset/clavicle_r translation=(0 0 0)
      SpatialTransform: axes_held_at_zero=(rotation3 translation1 translation2 translation3)
        TransformAxis rotation1: coordinates=clav_prot_r axis=(0.0153 0.9892987 -0.1451)
            LinearFunction(coefficients=1 0)
        TransformAxis rotation2: coordinates=clav_elev_r axis=(-0.9944725 0 -0.104997) LinearFunction(coefficients=1 0)
    ScapulothoracicJoint scapulothoracic_r: socket_parent_frame=torso_st_r_offset socket_child_frame=scapula_r_offset
        thoracic_ellipsoid_radii_x_y_z=(0.1091707 0.263058 0.1091753) scapula_winging_axis_origin=(0 0)
        scapula_winging_axis_direction=0
      Coordinate scapula_abduction_r: default_value=-0.3115611 range=(-0.660627 0.03750471) clamped=true
      Coordinate scapula_elevation_r: default_value=-0.05049787 range=(-0.3995637 0.298568) clamped=true
      Coordinate scapula_upward_rot_r: default_value=0.2082049 range=(-0.1408609 0.5572708) clamped=true
      Coordinate scapula_winging_r: default_value=0.2735852 range=(-0.07548066 0.622651) clamped=true
      PhysicalOffsetFrame torso_st_r_offset: socket_parent=/bodyset/torso translation=(0.01958924 0.3837871 0.09245005)
          orientation=(0 -0.87 0)
      PhysicalOffsetFrame scapula_r_offset: socket_parent=/bodyset/scapula_r
          translation=(-0.07868368 -0.05135333 -0.07363355) orientation=(-0.5181 -1.1416 -0.2854)
    CustomJoint sternoclavicular_l: socket_parent_frame=torso_sc_l_offset socket_child_frame=clavicle_l_offset
      Coordinate clav_prot_l: default_value=-0.2998917 range=(-0.6489576 0.0491741) clamped=true
      Coordinate clav_elev_l: default_value=-0.06473725 range=(-0.4138031 0.2843286) clamped=true
      PhysicalOffsetFrame torso_sc_l_offset: socket_parent=/bodyset/torso
          translation=(0.06661015 0.4156582 -0.03349461)
      PhysicalOffsetFrame clavicle_l_offset: socket_parent=/bodyset/clavicle_l translation=(0 0 0)
      SpatialTransform: axes_held_at_zero=(rotation3 translation1 translation2 translation3)
        TransformAxis rotation1: coordinates=clav_prot_l axis=(-0.0153 -0.9892987 -0.1451)
            LinearFunction(coefficients=1 0)
        TransformAxis rotation2: coordinates=clav_elev_l axis=(0.9944725 0 -0.104997) LinearFunction(coefficients=1 0)
    ScapulothoracicJoint scapulothoracic_l: socket_parent_frame=torso_st_l_offset socket_child_frame=scapula_l_offset
        thoracic_ellipsoid_radii_x_y_z=(0.1091707 0.263058 0.1091753) scapula_winging_axis_origin=(0 0)
        scapula_winging_axis_direction=0
      Coordinate scapula_abduction_l: default_value=-0.3115611 range=(-0.660627 0.03750471) clamped=true
      Coordinate scapula_elevation_l: default_value=0.05049787 range=(-0.298568 0.3995637) clamped=true
      Coordinate scapula_upward_rot_l: default_value=-0.2082049 range=(-0.5572708 0.1408609) clamped=true
      Coordinate scapula_winging_l: default_value=0.2735852 range=(-0.07548066 0.622651) clamped=true
      PhysicalOffsetFrame torso_st_l_offset: socket_parent=/bodyset/torso
          translation=(0.01958924 0.3837871 -0.09245005) orientation=(-3.141593 -0.87 0)
      PhysicalOffsetFrame scapula_l_offset: socket_parent=/bodyset/scapula_l
          translation=(-0.07868368 -0.05135333 0.07363355) orientation=(-2.623493 -1.1416 0.2854)
  ConstraintSet:
    CoordinateCouplerConstraint patellofemoral_knee_angle_r_con: independent_coordinate_names=knee_angle_r
        dependent_coordinate_name=knee_angle_r_beta scale_factor=1
        coupled_coordinates_function=LinearFunction(coefficients=1 0)
    CoordinateCouplerConstraint patellofemoral_knee_angle_l_con: independent_coordinate_names=knee_angle_l
        dependent_coordinate_name=knee_angle_l_beta scale_factor=1
        coupled_coordinates_function=LinearFunction(coefficients=1 0)
    PointConstraint acromioclavicular_r: socket_body_1=/bodyset/clavicle_r socket_body_2=/bodyset/scapula_r
        location_body_1=(-0.0384608 0.02662266 0.1579076) location_body_2=(-0.01784929 0.0001446884 -0.02003276)
    PointConstraint acromioclavicular_l: socket_body_1=/bodyset/clavicle_l socket_body_2=/bodyset/scapula_l
        location_body_1=(-0.0384608 0.02662266 -0.1579076) location_body_2=(-0.01784929 0.0001446884 0.02003276)
  ForceSet:
    Millard2012EquilibriumMuscle [values shared by the 140 below unless stated]:
      ForceVelocityCurve: concentric_slope_at_vmax=0 concentric_slope_near_vmax=0.25 isometric_slope=5
          eccentric_slope_at_vmax=0 eccentric_slope_near_vmax=0.15 max_eccentric_velocity_force_multiplier=1.4
      TendonForceLengthCurve
    Millard2012EquilibriumMuscle addbrev_r: max_isometric_force=625.8197 optimal_fiber_length=0.1047026
        tendon_slack_length=0.03600134 pennation_angle_at_optimal=0.1147809 fiber_damping=0.01
        default_activation=0.06188044 minimum_activation=0.01
      PathPoint P1: pelvis (-0.02197121 -0.1062607 0.01665557)
      PathPoint P2: femur_r (-0.002097386 -0.1148965 0.02620168)
      PathWrap: wrap_object=AB_at_femshaft_r method=hybrid
      ActiveForceLengthCurve: min_norm_active_fiber_length=0.25 transition_norm_fiber_length=0.77
          max_norm_active_fiber_length=1.9 shallow_ascending_slope=0.75 minimum_value=0
      FiberForceLengthCurve: strain_at_zero_force=0 strain_at_one_norm_force=0.7
    Millard2012EquilibriumMuscle addlong_r: max_isometric_force=916.8 optimal_fiber_length=0.1063869
        tendon_slack_length=0.1295908 pennation_angle_at_optimal=0.1377704 fiber_damping=0.01
        default_activation=0.1054896 minimum_activation=0.01
      PathPoint P1: pelvis (-0.008719463 -0.1004955 0.0204193)
      PathPoint P2: femur_r (0.01180828 -0.2330743 0.01665754)
      PathWrap: wrap_object=AL_at_femshaft_r method=hybrid
      ActiveForceLengthCurve: min_norm_active_fiber_length=0.25 transition_norm_fiber_length=0.77
          max_norm_active_fiber_length=1.9 shallow_ascending_slope=0.75 minimum_value=0
      FiberForceLengthCurve: strain_at_zero_force=0 strain_at_one_norm_force=0.7
    Millard2012EquilibriumMuscle addmagDist_r: max_isometric_force=597.2951 optimal_fiber_length=0.1682945
        tendon_slack_length=0.08298921 pennation_angle_at_optimal=0.194705 fiber_damping=0.01
        default_activation=0.01579596 minimum_activation=0.01
      PathPoint P1: pelvis (-0.08517006 -0.1443224 0.04306655)
      PathPoint P2: femur_r (0.0117978 -0.2555959 0.02030893)
      PathWrap: wrap_object=AMdist_at_femshaft_r method=hybrid
      ActiveForceLengthCurve: min_norm_active_fiber_length=0.25 transition_norm_fiber_length=0.77
          max_norm_active_fiber_length=1.9 shallow_ascending_slope=0.75 minimum_value=0
      FiberForceLengthCurve: strain_at_zero_force=0 strain_at_one_norm_force=0.7
    Millard2012EquilibriumMuscle addmagIsch_r: max_isometric_force=597.2951 optimal_fiber_length=0.1487795
        tendon_slack_length=0.2060653 pennation_angle_at_optimal=0.1680443 fiber_damping=0.01
        default_activation=0.01447754 minimum_activation=0.01
      PathPoint P1: pelvis (-0.1030921 -0.146685 0.04511064)
      PathPoint P2: femur_r (0.005044213 -0.3777659 -0.03444101)
      PathWrap: wrap_object=AMisch_at_condyles_r method=hybrid
      ActiveForceLengthCurve: min_norm_active_fiber_length=0.25 transition_norm_fiber_length=0.77
          max_norm_active_fiber_length=1.9 shallow_ascending_slope=0.75 minimum_value=0
      FiberForceLengthCurve: strain_at_zero_force=0 strain_at_one_norm_force=0.7
    Millard2012EquilibriumMuscle addmagMid_r: max_isometric_force=597.2951 optimal_fiber_length=0.1330413
        tendon_slack_length=0.04505018 pennation_angle_at_optimal=0.2073076 fiber_damping=0.01
        default_activation=0.02210496 minimum_activation=0.01
      PathPoint P1: pelvis (-0.06057611 -0.1364998 0.03086688)
      PathPoint P2: femur_r (0.002537837 -0.1581287 0.03074752)
      PathWrap: wrap_object=AMmid_at_femshaft_r method=hybrid
      ActiveForceLengthCurve: min_norm_active_fiber_length=0.25 transition_norm_fiber_length=0.77
          max_norm_active_fiber_length=1.9 shallow_ascending_slope=0.75 minimum_value=0
      FiberForceLengthCurve: strain_at_zero_force=0 strain_at_one_norm_force=0.7
    Millard2012EquilibriumMuscle addmagProx_r: max_isometric_force=597.2951 optimal_fiber_length=0.1103272
        tendon_slack_length=0.0421292 pennation_angle_at_optimal=0.3114833 fiber_damping=0.01
        default_activation=0.01564756 minimum_activation=0.01
      PathPoint P1: pelvis (-0.03563707 -0.1215781 0.01476289)
      PathPoint P2: femur_r (-0.01601354 -0.07678588 0.03369389)
      PathWrap: wrap_object=AMprox_at_femshaft_r method=hybrid
      ActiveForceLengthCurve: min_norm_active_fiber_length=0.25 transition_norm_fiber_length=0.77
          max_norm_active_fiber_length=1.9 shallow_ascending_slope=0.75 minimum_value=0
      FiberForceLengthCurve: strain_at_zero_force=0 strain_at_one_norm_force=0.7
    Millard2012EquilibriumMuscle bflh_r: max_isometric_force=1313.184 optimal_fiber_length=0.0959815
        tendon_slack_length=0.3269845 pennation_angle_at_optimal=0.1759182 fiber_damping=0.01
        default_activation=0.01034542 minimum_activation=0.01
      PathPoint P1: pelvis (-0.1196338 -0.1346346 0.06337769)
      PathPoint P2: tibia_r (-0.03997816 -0.04242389 0.04107228)
      PathPoint P3: tibia_r (-0.03146127 -0.05823982 0.03946026)
      ActiveForceLengthCurve: min_norm_active_fiber_length=0.25 transition_norm_fiber_length=0.77
          max_norm_active_fiber_length=1.9 shallow_ascending_slope=0.75 minimum_value=0
      FiberForceLengthCurve: strain_at_zero_force=0 strain_at_one_norm_force=0.7
    Millard2012EquilibriumMuscle bfsh_r: max_isometric_force=557.1148 optimal_fiber_length=0.110411
        tendon_slack_length=0.1059237 pennation_angle_at_optimal=0.2642232 fiber_damping=0.01
        default_activation=0.03555012 minimum_activation=0.01
      PathPoint P1: femur_r (0.005243464 -0.2055478 0.02462327)
      PathPoint P2: tibia_r (-0.03334616 -0.03819081 0.03637246)
      PathWrap: wrap_object=BF_at_gastroc_r method=hybrid
      ActiveForceLengthCurve: min_norm_active_fiber_length=0.25 transition_norm_fiber_length=0.77
          max_norm_active_fiber_length=1.9 shallow_ascending_slope=0.75 minimum_value=0
      FiberForceLengthCurve: strain_at_zero_force=0 strain_at_one_norm_force=0.7
    Millard2012EquilibriumMuscle edl_r: max_isometric_force=603.4982 optimal_fiber_length=0.08121529
        tendon_slack_length=0.4322988 pennation_angle_at_optimal=0.2182582 fiber_damping=0.01
        default_activation=0.01277898 minimum_activation=0.01
      PathPoint P1: tibia_r (-0.01861614 -0.1345517 0.02327202)
      PathPoint P2: tibia_r (0.01908154 -0.4372638 0.01271447)
      PathPoint P3: calcn_r (0.1062004 0.04021505 0.001044202)
      PathPoint P4: calcn_r (0.1867464 0.006143967 0.01696829)
      PathPoint P5: toes_r (0.0003385041 0.005302045 0.01726233)
      PathPoint P6: toes_r (0.04998577 -0.0004512379 0.02820641)
      ActiveForceLengthCurve: min_norm_active_fiber_length=0.25 transition_norm_fiber_length=0.77
          max_norm_active_fiber_length=1.9 shallow_ascending_slope=0.75 minimum_value=0
      FiberForceLengthCurve: strain_at_zero_force=0 strain_at_one_norm_force=0.7
    Millard2012EquilibriumMuscle ehl_r: max_isometric_force=285.8675 optimal_fiber_length=0.08793189
        tendon_slack_length=0.3841675 pennation_angle_at_optimal=0.1972681 fiber_damping=0.01
        default_activation=0.01148465 minimum_activation=0.01
      PathPoint P1: tibia_r (-0.01628912 -0.180255 0.02145567)
      PathPoint P2: tibia_r (0.008260911 -0.338298 0.01861762)
      PathPoint P3: tibia_r (0.02327017 -0.4294721 -0.003178617)
      PathPoint P4: calcn_r (0.112094 0.0434546 -0.02754083)
      PathPoint P5: calcn_r (0.1494202 0.03451792 -0.033545)
      PathPoint P6: calcn_r (0.2003825 0.01552748 -0.03654708)
      PathPoint P7: toes_r (0.03362474 0.004625189 -0.02764229)
      PathPoint P8: toes_r (0.06352593 0.003835522 -0.02098557)
      ActiveForceLengthCurve: min_norm_active_fiber_length=0.25 transition_norm_fiber_length=0.77
          max_norm_active_fiber_length=1.9 shallow_ascending_slope=0.75 minimum_value=0
      FiberForceLengthCurve: strain_at_zero_force=0 strain_at_one_norm_force=0.7
    Millard2012EquilibriumMuscle fdl_r: max_isometric_force=423.177 optimal_fiber_length=0.05268679
        tendon_slack_length=0.4474512 pennation_angle_at_optimal=0.2248391 fiber_damping=0.01
        default_activation=0.01037926 minimum_activation=0.01
      PathPoint P1: tibia_r (-0.00267607 -0.2130498 -0.002043397)
      PathPoint P2: tibia_r (-0.02047775 -0.42389 -0.01407673)
      PathPoint P3: calcn_r (0.05038454 0.03518817 -0.03654708)
      PathPoint P4: calcn_r (0.08181709 0.01966069 -0.03432815)
      PathPoint P5: calcn_r (0.1915999 -0.009048387 0.01514093)
      PathPoint P6: toes_r (-0.002143859 -0.008799139 0.01658537)
      PathPoint P7: toes_r (0.03215789 -0.008009473 0.02425752)
      PathPoint P8: toes_r (0.0497601 -0.006768569 0.02730381)
      ActiveForceLengthCurve: min_norm_active_fiber_length=0.25 transition_norm_fiber_length=0.77
          max_norm_active_fiber_length=1.9 shallow_ascending_slope=0.75 minimum_value=0
      FiberForceLengthCurve: strain_at_zero_force=0 strain_at_one_norm_force=0.7
    Millard2012EquilibriumMuscle fhl_r: max_isometric_force=907.8393 optimal_fiber_length=0.06211099
        tendon_slack_length=0.4176165 pennation_angle_at_optimal=0.2580255 fiber_damping=0.01
        default_activation=0.01073135 minimum_activation=0.01
      PathPoint P1: tibia_r (-0.03606877 -0.251543 0.02270441)
      PathPoint P2: tibia_r (-0.02815691 -0.4269137 -0.008627675)
      PathPoint P3: calcn_r (0.04321976 0.03083154 -0.03145659)
      PathPoint P4: calcn_r (0.1199522 0.007596177 -0.03341447)
      PathPoint P5: calcn_r (0.1994581 -0.00592055 -0.0351113)
      PathPoint P6: toes_r (0.01748938 -0.007219807 -0.0298988)
      PathPoint P7: toes_r (0.06341309 -0.01150657 -0.02042144)
      ActiveForceLengthCurve: min_norm_active_fiber_length=0.25 transition_norm_fiber_length=0.77
          max_norm_active_fiber_length=1.9 shallow_ascending_slope=0.75 minimum_value=0
      FiberForceLengthCurve: strain_at_zero_force=0 strain_at_one_norm_force=0.7
    Millard2012EquilibriumMuscle gaslat_r: max_isometric_force=1575.059 optimal_fiber_length=0.08102791
        tendon_slack_length=0.4391948 pennation_angle_at_optimal=0.2102268 fiber_damping=0.01
        default_activation=0.07792455 minimum_activation=0.01
      PathPoint P1: femur_r (0.002097386 -0.3709792 0.02166637)
      PathPoint P2: calcn_r (0.005084678 0.03462963 -0.00691784)
      PathWrap: wrap_object=GasLat_at_shank_r method=hybrid
      PathWrap pathwrap_0: wrap_object=GasLat_at_condyles_r method=hybrid
      ActiveForceLengthCurve: min_norm_active_fiber_length=0.25 transition_norm_fiber_length=0.77
          max_norm_active_fiber_length=1.9 shallow_ascending_slope=0.75 minimum_value=0
      FiberForceLengthCurve: strain_at_zero_force=0 strain_at_one_norm_force=0.7
    Millard2012EquilibriumMuscle gasmed_r: max_isometric_force=3115.515 optimal_fiber_length=0.07004822
        tendon_slack_length=0.4594688 pennation_angle_at_optimal=0.1656816 fiber_damping=0.01
        default_activation=0.06486411 minimum_activation=0.01
      PathPoint P1: femur_r (0.006292157 -0.374874 -0.02315008)
      PathPoint P2: calcn_r (0.005084678 0.03462963 -0.00691784)
      PathWrap: wrap_object=GasMed_at_shank_r method=hybrid
      PathWrap pathwrap_0: wrap_object=GasMed_at_condyles_r method=hybrid
      ActiveForceLengthCurve: min_norm_active_fiber_length=0.25 transition_norm_fiber_length=0.77
          max_norm_active_fiber_length=1.9 shallow_ascending_slope=0.75 minimum_value=0
      FiberForceLengthCurve: strain_at_zero_force=0 strain_at_one_norm_force=0.7
    Millard2012EquilibriumMuscle glmax1_r: max_isometric_force=983.7836 optimal_fiber_length=0.1598643
        tendon_slack_length=0.09493979 pennation_angle_at_optimal=0.3540118 fiber_damping=0.01
        default_activation=0.01008545 minimum_activation=0.01
      PathPoint P1: pelvis (-0.141605 0.03899994 0.06089017)
      PathPoint P2: pelvis (-0.1445958 -0.02735648 0.08425123)
      PathPoint P3: femur_r (-0.04656196 -0.03174258 0.03177875)
      PathPoint P4: femur_r (-0.02904879 -0.05511135 0.04945699)
      PathWrap: wrap_object=Gmax1_at_pelvis_r method=hybrid
      ActiveForceLengthCurve: min_norm_active_fiber_length=0.25 transition_norm_fiber_length=0.77
          max_norm_active_fiber_length=1.9 shallow_ascending_slope=0.75 minimum_value=0
      FiberForceLengthCurve: strain_at_zero_force=0 strain_at_one_norm_force=0.7
    Millard2012EquilibriumMuscle glmax2_r: max_isometric_force=1406.046 optimal_fiber_length=0.1674976
        tendon_slack_length=0.1162881 pennation_angle_at_optimal=0.3673821 fiber_damping=0.01
        default_activation=0.0100875 minimum_activation=0.01
      PathPoint P1: pelvis (-0.1514978 0.009834769 0.04996671)
      PathPoint P2: pelvis (-0.1546037 -0.06884338 0.08792844)
      PathPoint P3: femur_r (-0.04719118 -0.05686401 0.02651737)
      PathPoint P4: femur_r (-0.01635961 -0.09892779 0.04409038)
      PathWrap: wrap_object=Gmax2_at_pelvis_r method=hybrid
      ActiveForceLengthCurve: min_norm_active_fiber_length=0.25 transition_norm_fiber_length=0.77
          max_norm_active_fiber_length=1.9 shallow_ascending_slope=0.75 minimum_value=0
      FiberForceLengthCurve: strain_at_zero_force=0 strain_at_one_norm_force=0.7
    Millard2012EquilibriumMuscle glmax3_r: max_isometric_force=947.7541 optimal_fiber_length=0.1757498
        tendon_slack_length=0.1083966 pennation_angle_at_optimal=0.3824161 fiber_damping=0.01
        default_activation=0.01075918 minimum_activation=0.01
      PathPoint P1: pelvis (-0.1495422 -0.05934774 0.009733775)
      PathPoint P2: pelvis (-0.1464364 -0.1427737 0.04704658)
      PathPoint P3: femur_r (-0.02946827 -0.1095411 0.009891398)
      PathPoint P4: femur_r (-0.006292157 -0.1381679 0.04324856)
      PathWrap: wrap_object=Gmax3_at_pelvis_r method=hybrid
      ActiveForceLengthCurve: min_norm_active_fiber_length=0.25 transition_norm_fiber_length=0.77
          max_norm_active_fiber_length=1.9 shallow_ascending_slope=0.75 minimum_value=0
      FiberForceLengthCurve: strain_at_zero_force=0 strain_at_one_norm_force=0.7
    Millard2012EquilibriumMuscle glmed1_r: max_isometric_force=1093.467 optimal_fiber_length=0.08444272
        tendon_slack_length=0.06457384 pennation_angle_at_optimal=0.3165559 fiber_damping=0.01
        default_activation=0.02598524 minimum_activation=0.01
      PathPoint P1: pelvis (-0.05636592 0.02939126 0.124376)
      PathPoint P2_0: femur_r (-0.0146817 -0.01752658 0.06208431)
      ActiveForceLengthCurve: min_norm_active_fiber_length=0.25 transition_norm_fiber_length=0.77
          max_norm_active_fiber_length=1.9 shallow_ascending_slope=0.75 minimum_value=0
      FiberForceLengthCurve: strain_at_zero_force=0 strain_at_one_norm_force=0.7
    Millard2012EquilibriumMuscle glmed2_r: max_isometric_force=765.0917 optimal_fiber_length=0.09346317
        tendon_slack_length=0.08394995 pennation_angle_at_optimal=0.3165559 fiber_damping=0.01
        default_activation=0.01004559 minimum_activation=0.01
      PathPoint P1: pelvis (-0.09777762 0.06217382 0.08868551)
      PathPoint P2_0: femur_r (-0.02307124 -0.009736987 0.05892748)
      ActiveForceLengthCurve: min_norm_active_fiber_length=0.25 transition_norm_fiber_length=0.77
          max_norm_active_fiber_length=1.9 shallow_ascending_slope=0.75 minimum_value=0
      FiberForceLengthCurve: strain_at_zero_force=0 strain_at_one_norm_force=0.7
    Millard2012EquilibriumMuscle glmed3_r: max_isometric_force=871.1993 optimal_fiber_length=0.0865134
        tendon_slack_length=0.05361394 pennation_angle_at_optimal=0.3165559 fiber_damping=0.01
        default_activation=0.01007146 minimum_activation=0.01
      PathPoint P1: pelvis (-0.1150325 0.01808693 0.06921796)
      PathPoint P2_0: femur_r (-0.03240461 -0.004576384 0.05450792)
      ActiveForceLengthCurve: min_norm_active_fiber_length=0.25 transition_norm_fiber_length=0.77
          max_norm_active_fiber_length=1.9 shallow_ascending_slope=0.75 minimum_value=0
      FiberForceLengthCurve: strain_at_zero_force=0 strain_at_one_norm_force=0.7
    Millard2012EquilibriumMuscle glmin1_r: max_isometric_force=374.0459 optimal_fiber_length=0.08988951
        tendon_slack_length=0.02133908 pennation_angle_at_optimal=0.1745329 fiber_damping=0.01
        default_activation=0.03948574 minimum_activation=0.01
      PathPoint P1: pelvis (-0.03450975 0 0.1276206)
      PathPoint P2: femur_r (0.005243464 -0.01460548 0.05892748)
      ActiveForceLengthCurve: min_norm_active_fiber_length=0.25 transition_norm_fiber_length=0.77
          max_norm_active_fiber_length=1.9 shallow_ascending_slope=0.75 minimum_value=0
      FiberForceLengthCurve: strain_at_zero_force=0 strain_at_one_norm_force=0.7
    Millard2012EquilibriumMuscle glmin2_r: max_isometric_force=394.8197 optimal_fiber_length=0.07621243
        tendon_slack_length=0.03552143 pennation_angle_at_optimal=0 fiber_damping=0.01 default_activation=0.01005507
        minimum_activation=0.01
      PathPoint P1: pelvis (-0.07086001 0.01130433 0.1092346)
      PathPoint P2: femur_r (0.004194772 -0.008763289 0.05471837)
      ActiveForceLengthCurve: min_norm_active_fiber_length=0.25 transition_norm_fiber_length=0.77
          max_norm_active_fiber_length=1.9 shallow_ascending_slope=0.75 minimum_value=0
      FiberForceLengthCurve: strain_at_zero_force=0 strain_at_one_norm_force=0.7
    Millard2012EquilibriumMuscle glmin3_r: max_isometric_force=446.7738 optimal_fiber_length=0.03897948
        tendon_slack_length=0.05211987 pennation_angle_at_optimal=0.01745329 fiber_damping=0.01
        default_activation=0.01007559 minimum_activation=0.01
      PathPoint P1: pelvis (-0.09076063 -0.01752171 0.08630614)
      PathPoint P2: femur_r (-0.004194772 -0.0009736987 0.0536661)
      ActiveForceLengthCurve: min_norm_active_fiber_length=0.25 transition_norm_fiber_length=0.77
          max_norm_active_fiber_length=1.9 shallow_ascending_slope=0.75 minimum_value=0
      FiberForceLengthCurve: strain_at_zero_force=0 strain_at_one_norm_force=0.7
    Millard2012EquilibriumMuscle grac_r: max_isometric_force=281.3115 optimal_fiber_length=0.225734
        tendon_slack_length=0.1704538 pennation_angle_at_optimal=0.1720016 fiber_damping=0.01
        default_activation=0.02518463 minimum_activation=0.01
      PathPoint P1: pelvis (-0.05447939 -0.1461876 0.02656239)
      PathPoint P2: tibia_r (-0.02143183 -0.05529759 -0.03361388)
      PathPoint P3: tibia_r (0.002071045 -0.08096358 -0.01785702)
      PathWrap: wrap_object=GR_at_condyles_r method=hybrid
      ActiveForceLengthCurve: min_norm_active_fiber_length=0.25 transition_norm_fiber_length=0.77
          max_norm_active_fiber_length=1.9 shallow_ascending_slope=0.75 minimum_value=0
      FiberForceLengthCurve: strain_at_zero_force=0 strain_at_one_norm_force=0.7
    Millard2012EquilibriumMuscle iliacus_r: max_isometric_force=1021.141 optimal_fiber_length=0.1167111
        tendon_slack_length=0.1052378 pennation_angle_at_optimal=0.279914 fiber_damping=0.01
        default_activation=0.1100128 minimum_activation=0.01
      PathPoint P1: pelvis (-0.06959466 0.03493039 0.09117303)
      PathPoint P2: pelvis (-0.01552939 -0.06296513 0.08176371)
      PathPoint P3: femur_r (-0.002411994 -0.05501398 0.01462664)
      PathPoint P4: femur_r (-0.01279405 -0.06202461 0.02062462)
      PathWrap: wrap_object=IL_at_brim_r method=hybrid range=(2 3)
      ActiveForceLengthCurve: min_norm_active_fiber_length=0.25 transition_norm_fiber_length=0.77
          max_norm_active_fiber_length=1.9 shallow_ascending_slope=0.75 minimum_value=0
      FiberForceLengthCurve: strain_at_zero_force=0 strain_at_one_norm_force=0.7
    Millard2012EquilibriumMuscle perbrev_r: max_isometric_force=521.2016 optimal_fiber_length=0.05426064
        tendon_slack_length=0.1763202 pennation_angle_at_optimal=0.2052361 fiber_damping=0.01
        default_activation=0.01041966 minimum_activation=0.01
      PathPoint P1: tibia_r (-0.02827326 -0.2944553 0.02849403)
      PathPoint P2: tibia_r (-0.03944294 -0.4527308 0.02826699)
      PathPoint P3: tibia_r (-0.03316 -0.4656394 0.02894812)
      PathPoint P4: calcn_r (0.05442917 0.03016129 0.03041239)
      PathPoint P5: calcn_r (0.07823471 0.02446416 0.04477017)
      ActiveForceLengthCurve: min_norm_active_fiber_length=0.25 transition_norm_fiber_length=0.77
          max_norm_active_fiber_length=1.9 shallow_ascending_slope=0.75 minimum_value=0
      FiberForceLengthCurve: strain_at_zero_force=0 strain_at_one_norm_force=0.7
    Millard2012EquilibriumMuscle perlong_r: max_isometric_force=1115.371 optimal_fiber_length=0.06056614
        tendon_slack_length=0.3960892 pennation_angle_at_optimal=0.2479525 fiber_damping=0.01
        default_activation=0.0106332 minimum_activation=0.01
      PathPoint P1: tibia_r (-0.02327017 -0.1596711 0.03201322)
      PathPoint P2: tibia_r (-0.03688322 -0.4535449 0.02690472)
      PathPoint P3: tibia_r (-0.03164743 -0.4668024 0.02724529)
      PathPoint P4: calcn_r (0.05061566 0.02569295 0.02884609)
      PathPoint P5: calcn_r (0.07869695 0.0118411 0.03706918)
      PathPoint P6: calcn_r (0.09845786 0.007707885 0.01540198)
      PathPoint P7: calcn_r (0.1390197 0.009495221 -0.02401665)
      ActiveForceLengthCurve: min_norm_active_fiber_length=0.25 transition_norm_fiber_length=0.77
          max_norm_active_fiber_length=1.9 shallow_ascending_slope=0.75 minimum_value=0
      FiberForceLengthCurve: strain_at_zero_force=0 strain_at_one_norm_force=0.7
    Millard2012EquilibriumMuscle piri_r: max_isometric_force=1029.787 optimal_fiber_length=0.02854016
        tendon_slack_length=0.1261324 pennation_angle_at_optimal=0.1745329 fiber_damping=0.01
        default_activation=0.010089 minimum_activation=0.01
      PathPoint P1: pelvis (-0.1171146 -0.007381729 0.01461148)
      PathPoint P2: pelvis (-0.1173561 -0.03465908 0.06588684)
      PathPoint P3: femur_r (-0.01552065 -0.003505315 0.04598448)
      ActiveForceLengthCurve: min_norm_active_fiber_length=0.25 transition_norm_fiber_length=0.77
          max_norm_active_fiber_length=1.9 shallow_ascending_slope=0.75 minimum_value=0
      FiberForceLengthCurve: strain_at_zero_force=0 strain_at_one_norm_force=0.7
    Millard2012EquilibriumMuscle psoas_r: max_isometric_force=1426.79 optimal_fiber_length=0.1287538
        tendon_slack_length=0.109637 pennation_angle_at_optimal=0.2155251 fiber_damping=0.01
        default_activation=0.06526939 minimum_activation=0.01
      PathPoint P1: pelvis (-0.06970969 0.07008686 0.04217969)
      PathPoint P2: pelvis (-0.02358166 -0.07393033 0.07094841)
      PathPoint P3: femur_r (-0.01384275 -0.04547173 0.004840471)
      PathPoint P4: femur_r (-0.02464428 -0.05102181 0.009260032)
      PathWrap: wrap_object=PS_at_brim_r method=hybrid range=(2 3)
      ActiveForceLengthCurve: min_norm_active_fiber_length=0.25 transition_norm_fiber_length=0.77
          max_norm_active_fiber_length=1.9 shallow_ascending_slope=0.75 minimum_value=0
      FiberForceLengthCurve: strain_at_zero_force=0 strain_at_one_norm_force=0.7
    Millard2012EquilibriumMuscle recfem_r: max_isometric_force=2191.741 optimal_fiber_length=0.07635157
        tendon_slack_length=0.4530828 pennation_angle_at_optimal=0.2170149 fiber_damping=0.01
        default_activation=0.01286722 minimum_activation=0.01
      PathPoint P1: pelvis (-0.0276078 -0.04386081 0.1009068)
      PathPoint P2: patella_r (0.01 0.049 0.0007)
      PathPoint P3: patella_r (0.0121 0.0437 -0.001)
      PathPoint P4: patella_r (0.005 0.00247 3e-5)
      PathPoint P5: tibia_r (0.03793038 -0.0734045 -0.0005335536)
      PathWrap: wrap_object=KnExt_at_fem_r method=hybrid
      ActiveForceLengthCurve: min_norm_active_fiber_length=0.25 transition_norm_fiber_length=0.77
          max_norm_active_fiber_length=1.9 shallow_ascending_slope=0.75 minimum_value=0
      FiberForceLengthCurve: strain_at_zero_force=0 strain_at_one_norm_force=0.7
    Millard2012EquilibriumMuscle sart_r: max_isometric_force=249.4131 optimal_fiber_length=0.4137605
        tendon_slack_length=0.1273107 pennation_angle_at_optimal=0.02613542 fiber_damping=0.01
        default_activation=0.01943186 minimum_activation=0.01
      PathPoint P1: pelvis (-0.02243134 -0.01763476 0.1142096)
      PathPoint P2: femur_r (-0.003146079 -0.3474157 -0.04430084)
      PathPoint P3: tibia_r (-0.02920407 -0.04663372 -0.04143555)
      PathPoint P4: tibia_r (-0.01849979 -0.06965985 -0.02996982)
      PathPoint P5: tibia_r (0.01582372 -0.09419779 -0.002951573)
      ActiveForceLengthCurve: min_norm_active_fiber_length=0.25 transition_norm_fiber_length=0.77
          max_norm_active_fiber_length=1.9 shallow_ascending_slope=0.75 minimum_value=0
      FiberForceLengthCurve: strain_at_zero_force=0 strain_at_one_norm_force=0.7
    Millard2012EquilibriumMuscle semimem_r: max_isometric_force=2200.987 optimal_fiber_length=0.08413311
        tendon_slack_length=0.3277278 pennation_angle_at_optimal=0.2545615 fiber_damping=0.01
        default_activation=0.07879195 minimum_activation=0.01
      PathPoint P1: pelvis (-0.1135371 -0.1288694 0.06640598)
      PathPoint P2: tibia_r (-0.03141473 -0.04768036 -0.02225032)
      PathWrap: wrap_object=SM_at_condyles_r method=hybrid
      ActiveForceLengthCurve: min_norm_active_fiber_length=0.25 transition_norm_fiber_length=0.77
          max_norm_active_fiber_length=1.9 shallow_ascending_slope=0.75 minimum_value=0
      FiberForceLengthCurve: strain_at_zero_force=0 strain_at_one_norm_force=0.7
    Millard2012EquilibriumMuscle semiten_r: max_isometric_force=591.2951 optimal_fiber_length=0.1922696
        tendon_slack_length=0.2462634 pennation_angle_at_optimal=0.241295 fiber_damping=0.01
        default_activation=0.03529201 minimum_activation=0.01
      PathPoint P1: pelvis (-0.1194037 -0.1416433 0.05569882)
      PathPoint P2: tibia_r (-0.03630147 -0.05907713 -0.02599655)
      PathPoint P3: tibia_r (0.002210666 -0.08989493 -0.01328208)
      PathWrap: wrap_object=ST_at_condyles_r method=hybrid
      ActiveForceLengthCurve: min_norm_active_fiber_length=0.25 transition_norm_fiber_length=0.77
          max_norm_active_fiber_length=1.9 shallow_ascending_slope=0.75 minimum_value=0
      FiberForceLengthCurve: strain_at_zero_force=0 strain_at_one_norm_force=0.7
    Millard2012EquilibriumMuscle soleus_r: max_isometric_force=6194.843 optimal_fiber_length=0.05243537
        tendon_slack_length=0.3352884 pennation_angle_at_optimal=0.3814289 fiber_damping=0.01
        default_activation=0.01775393 minimum_activation=0.01
      PathPoint P1: tibia_r (-0.008842665 -0.1065249 0.01112516)
      PathPoint P2: calcn_r (0.005084678 0.03462963 -0.00691784)
      ActiveForceLengthCurve: min_norm_active_fiber_length=0.25 transition_norm_fiber_length=0.77
          max_norm_active_fiber_length=1.9 shallow_ascending_slope=0.75 minimum_value=0
      FiberForceLengthCurve: strain_at_zero_force=0 strain_at_one_norm_force=0.7
    Millard2012EquilibriumMuscle tfl_r: max_isometric_force=411.2066 optimal_fiber_length=0.09449846
        tendon_slack_length=0.4471304 pennation_angle_at_optimal=0.05235988 fiber_damping=0.01
        default_activation=0.01479635 minimum_activation=0.01
      PathPoint P1: pelvis (-0.0230065 0.01243476 0.1395174)
      PathPoint P2: femur_r (0.03083157 -0.09688303 0.0628209)
      PathPoint P3: femur_r (0.01122101 -0.394348 0.03409376)
      PathPoint P4: tibia_r (0.01256589 -0.04768036 0.03927863)
      ActiveForceLengthCurve: min_norm_active_fiber_length=0.25 transition_norm_fiber_length=0.77
          max_norm_active_fiber_length=1.9 shallow_ascending_slope=0.75 minimum_value=0
      FiberForceLengthCurve: strain_at_zero_force=0 strain_at_one_norm_force=0.7
    Millard2012EquilibriumMuscle tibant_r: max_isometric_force=1227.452 optimal_fiber_length=0.08073432
        tendon_slack_length=0.284238 pennation_angle_at_optimal=0.1951828 fiber_damping=0.01
        default_activation=0.01678077 minimum_activation=0.01
      PathPoint P1: tibia_r (0.01791803 -0.1525772 0.01839057)
      PathPoint P2: tibia_r (0.02920407 -0.2216555 0.01453082)
      PathPoint P3: tibia_r (0.02710975 -0.4255182 -0.01498491)
      PathPoint P4: calcn_r (0.134744 0.01988411 -0.03981021)
      ActiveForceLengthCurve: min_norm_active_fiber_length=0.25 transition_norm_fiber_length=0.77
          max_norm_active_fiber_length=1.9 shallow_ascending_slope=0.75 minimum_value=0
      FiberForceLengthCurve: strain_at_zero_force=0 strain_at_one_norm_force=0.7
    Millard2012EquilibriumMuscle tibpost_r: max_isometric_force=1730.154 optimal_fiber_length=0.04500149
        tendon_slack_length=0.3342725 pennation_angle_at_optimal=0.2264891 fiber_damping=0.01
        default_activation=0.01078936 minimum_activation=0.01
      PathPoint P1: tibia_r (-0.004770385 -0.1516468 0.01169277)
      PathPoint P2: tibia_r (-0.01908154 -0.425053 -0.01986636)
      PathPoint P3: calcn_r (0.04818888 0.03731063 -0.03733023)
      PathPoint P4: calcn_r (0.08921299 0.01776165 -0.0366776)
      ActiveForceLengthCurve: min_norm_active_fiber_length=0.25 transition_norm_fiber_length=0.77
          max_norm_active_fiber_length=1.9 shallow_ascending_slope=0.75 minimum_value=0
      FiberForceLengthCurve: strain_at_zero_force=0 strain_at_one_norm_force=0.7
    Millard2012EquilibriumMuscle vasint_r: max_isometric_force=1697.361 optimal_fiber_length=0.1184804
        tendon_slack_length=0.2075938 pennation_angle_at_optimal=0.06309973 fiber_damping=0.01
        default_activation=0.01447226 minimum_activation=0.01
      PathPoint P1: femur_r (0.03041209 -0.1873396 0.03262057)
      PathPoint P2: femur_r (0.03513121 -0.2029188 0.02998988)
      PathPoint P3: patella_r (0.0058 0.048 -0.0006)
      PathPoint P4: patella_r (0.005 0.00247 -0.00039)
      PathPoint P5: tibia_r (0.03789548 -0.07349753 0.0004881448)
      PathWrap: wrap_object=KnExt_at_fem_r method=hybrid
      ActiveForceLengthCurve: min_norm_active_fiber_length=0.25 transition_norm_fiber_length=0.77
          max_norm_active_fiber_length=1.9 shallow_ascending_slope=0.75 minimum_value=0
      FiberForceLengthCurve: strain_at_zero_force=0 strain_at_one_norm_force=0.7
    Millard2012EquilibriumMuscle vaslat_r: max_isometric_force=5148.767 optimal_fiber_length=0.1186529
        tendon_slack_length=0.2241221 pennation_angle_at_optimal=0.2528673 fiber_damping=0.01
        default_activation=0.0217619 minimum_activation=0.01
      PathPoint P1: femur_r (0.005033726 -0.1805237 0.03672445)
      PathPoint P2: femur_r (0.02820984 -0.2522853 0.04303811)
      PathPoint P3: patella_r (0.0103 0.0423 0.0141)
      PathPoint P4: patella_r (0.005 0.00247 0.00733)
      PathPoint P5: tibia_r (0.03786057 -0.07370686 0.005800976)
      PathWrap: wrap_object=KnExtVL_at_fem_r method=hybrid
      ActiveForceLengthCurve: min_norm_active_fiber_length=0.25 transition_norm_fiber_length=0.77
          max_norm_active_fiber_length=1.9 shallow_ascending_slope=0.75 minimum_value=0
      FiberForceLengthCurve: strain_at_zero_force=0 strain_at_one_norm_force=0.7
    Millard2012EquilibriumMuscle vasmed_r: max_isometric_force=2747.823 optimal_fiber_length=0.1117763
        tendon_slack_length=0.2113587 pennation_angle_at_optimal=0.4222225 fiber_damping=0.01
        default_activation=0.01617513 minimum_activation=0.01
      PathPoint P1: femur_r (0.0146817 -0.2043794 0.0197828)
      PathPoint P2: femur_r (0.03733347 -0.2696172 0.0009470488)
      PathPoint P3: patella_r (0.0063 0.0445 -0.017)
      PathPoint P4: patella_r (0.005 0.00247 -0.0085)
      PathPoint P5: tibia_r (0.03711592 -0.07392782 -0.007696795)
      PathWrap: wrap_object=KnExt_at_fem_r method=hybrid
      ActiveForceLengthCurve: min_norm_active_fiber_length=0.25 transition_norm_fiber_length=0.77
          max_norm_active_fiber_length=1.9 shallow_ascending_slope=0.75 minimum_value=0
      FiberForceLengthCurve: strain_at_zero_force=0 strain_at_one_norm_force=0.7
    Millard2012EquilibriumMuscle addbrev_l: max_isometric_force=625.8197 optimal_fiber_length=0.1047026
        tendon_slack_length=0.03600134 pennation_angle_at_optimal=0.1147809 fiber_damping=0.01
        default_activation=0.05726699 minimum_activation=0.01
      PathPoint P1: pelvis (-0.02197121 -0.1062607 -0.01665557)
      PathPoint P2: femur_l (-0.002097386 -0.1148965 -0.02620168)
      PathWrap: wrap_object=AB_at_femshaft_l method=hybrid
      ActiveForceLengthCurve: min_norm_active_fiber_length=0.25 transition_norm_fiber_length=0.77
          max_norm_active_fiber_length=1.9 shallow_ascending_slope=0.75 minimum_value=0
      FiberForceLengthCurve: strain_at_zero_force=0 strain_at_one_norm_force=0.7
    Millard2012EquilibriumMuscle addlong_l: max_isometric_force=916.8 optimal_fiber_length=0.1063869
        tendon_slack_length=0.1295908 pennation_angle_at_optimal=0.1377704 fiber_damping=0.01
        default_activation=0.101638 minimum_activation=0.01
      PathPoint P1: pelvis (-0.008719463 -0.1004955 -0.0204193)
      PathPoint P2: femur_l (0.01180828 -0.2330743 -0.01665754)
      PathWrap: wrap_object=AL_at_femshaft_l method=hybrid
      ActiveForceLengthCurve: min_norm_active_fiber_length=0.25 transition_norm_fiber_length=0.77
          max_norm_active_fiber_length=1.9 shallow_ascending_slope=0.75 minimum_value=0
      FiberForceLengthCurve: strain_at_zero_force=0 strain_at_one_norm_force=0.7
    Millard2012EquilibriumMuscle addmagDist_l: max_isometric_force=597.2951 optimal_fiber_length=0.1682945
        tendon_slack_length=0.08298921 pennation_angle_at_optimal=0.194705 fiber_damping=0.01
        default_activation=0.01563364 minimum_activation=0.01
      PathPoint P1: pelvis (-0.08517006 -0.1443224 -0.04306655)
      PathPoint P2: femur_l (0.0117978 -0.2555959 -0.02030893)
      PathWrap: wrap_object=AMdist_at_femshaft_l method=hybrid
      ActiveForceLengthCurve: min_norm_active_fiber_length=0.25 transition_norm_fiber_length=0.77
          max_norm_active_fiber_length=1.9 shallow_ascending_slope=0.75 minimum_value=0
      FiberForceLengthCurve: strain_at_zero_force=0 strain_at_one_norm_force=0.7
    Millard2012EquilibriumMuscle addmagIsch_l: max_isometric_force=597.2951 optimal_fiber_length=0.1487795
        tendon_slack_length=0.2060653 pennation_angle_at_optimal=0.1680443 fiber_damping=0.01
        default_activation=0.01432479 minimum_activation=0.01
      PathPoint P1: pelvis (-0.1030921 -0.146685 -0.04511064)
      PathPoint P2: femur_l (0.005044213 -0.3777659 0.03444101)
      PathWrap: wrap_object=AMisch_at_condyles_l method=hybrid
      ActiveForceLengthCurve: min_norm_active_fiber_length=0.25 transition_norm_fiber_length=0.77
          max_norm_active_fiber_length=1.9 shallow_ascending_slope=0.75 minimum_value=0
      FiberForceLengthCurve: strain_at_zero_force=0 strain_at_one_norm_force=0.7
    Millard2012EquilibriumMuscle addmagMid_l: max_isometric_force=597.2951 optimal_fiber_length=0.1330413
        tendon_slack_length=0.04505018 pennation_angle_at_optimal=0.2073076 fiber_damping=0.01
        default_activation=0.01866231 minimum_activation=0.01
      PathPoint P1: pelvis (-0.06057611 -0.1364998 -0.03086688)
      PathPoint P2: femur_l (0.002537837 -0.1581287 -0.03074752)
      PathWrap: wrap_object=AMmid_at_femshaft_l method=hybrid
      ActiveForceLengthCurve: min_norm_active_fiber_length=0.25 transition_norm_fiber_length=0.77
          max_norm_active_fiber_length=1.9 shallow_ascending_slope=0.75 minimum_value=0
      FiberForceLengthCurve: strain_at_zero_force=0 strain_at_one_norm_force=0.7
    Millard2012EquilibriumMuscle addmagProx_l: max_isometric_force=597.2951 optimal_fiber_length=0.1103272
        tendon_slack_length=0.0421292 pennation_angle_at_optimal=0.3114833 fiber_damping=0.01
        default_activation=0.01891062 minimum_activation=0.01
      PathPoint P1: pelvis (-0.03563707 -0.1215781 -0.01476289)
      PathPoint P2: femur_l (-0.01601354 -0.07678588 -0.03369389)
      PathWrap: wrap_object=AMprox_at_femshaft_l method=hybrid
      ActiveForceLengthCurve: min_norm_active_fiber_length=0.25 transition_norm_fiber_length=0.77
          max_norm_active_fiber_length=1.9 shallow_ascending_slope=0.75 minimum_value=0
      FiberForceLengthCurve: strain_at_zero_force=0 strain_at_one_norm_force=0.7
    Millard2012EquilibriumMuscle bflh_l: max_isometric_force=1313.184 optimal_fiber_length=0.09598134
        tendon_slack_length=0.3269845 pennation_angle_at_optimal=0.1759182 fiber_damping=0.01
        default_activation=0.01026988 minimum_activation=0.01
      PathPoint P1: pelvis (-0.1196338 -0.1346346 -0.06337769)
      PathPoint P2: tibia_l (-0.03997816 -0.04242389 -0.04107228)
      PathPoint P3: tibia_l (-0.03146127 -0.05823982 -0.03946026)
      ActiveForceLengthCurve: min_norm_active_fiber_length=0.25 transition_norm_fiber_length=0.77
          max_norm_active_fiber_length=1.9 shallow_ascending_slope=0.75 minimum_value=0
      FiberForceLengthCurve: strain_at_zero_force=0 strain_at_one_norm_force=0.7
    Millard2012EquilibriumMuscle bfsh_l: max_isometric_force=557.1148 optimal_fiber_length=0.1104108
        tendon_slack_length=0.1059235 pennation_angle_at_optimal=0.2642232 fiber_damping=0.01
        default_activation=0.03698009 minimum_activation=0.01
      PathPoint P1: femur_l (0.005243464 -0.2055478 -0.02462327)
      PathPoint P2: tibia_l (-0.03334616 -0.03819081 -0.03637246)
      PathWrap: wrap_object=BF_at_gastroc_l method=hybrid
      ActiveForceLengthCurve: min_norm_active_fiber_length=0.25 transition_norm_fiber_length=0.77
          max_norm_active_fiber_length=1.9 shallow_ascending_slope=0.75 minimum_value=0
      FiberForceLengthCurve: strain_at_zero_force=0 strain_at_one_norm_force=0.7
    Millard2012EquilibriumMuscle edl_l: max_isometric_force=603.4982 optimal_fiber_length=0.08121529
        tendon_slack_length=0.4322988 pennation_angle_at_optimal=0.2182582 fiber_damping=0.01
        default_activation=0.01342855 minimum_activation=0.01
      PathPoint P1: tibia_l (-0.01861614 -0.1345517 -0.02327202)
      PathPoint P2: tibia_l (0.01908154 -0.4372638 -0.01271447)
      PathPoint P3: calcn_l (0.1062004 0.04021505 -0.001044202)
      PathPoint P4: calcn_l (0.1867464 0.006143967 -0.01696829)
      PathPoint P5: toes_l (0.0003385041 0.005302045 -0.01726233)
      PathPoint P6: toes_l (0.04998577 -0.0004512379 -0.02820641)
      ActiveForceLengthCurve: min_norm_active_fiber_length=0.25 transition_norm_fiber_length=0.77
          max_norm_active_fiber_length=1.9 shallow_ascending_slope=0.75 minimum_value=0
      FiberForceLengthCurve: strain_at_zero_force=0 strain_at_one_norm_force=0.7
    Millard2012EquilibriumMuscle ehl_l: max_isometric_force=285.8675 optimal_fiber_length=0.08793189
        tendon_slack_length=0.3841675 pennation_angle_at_optimal=0.1972681 fiber_damping=0.01
        default_activation=0.01189966 minimum_activation=0.01
      PathPoint P1: tibia_l (-0.01628912 -0.180255 -0.02145567)
      PathPoint P2: tibia_l (0.008260911 -0.338298 -0.01861762)
      PathPoint P3: tibia_l (0.02327017 -0.4294721 0.003178617)
      PathPoint P4: calcn_l (0.112094 0.0434546 0.02754083)
      PathPoint P5: calcn_l (0.1494202 0.03451792 0.033545)
      PathPoint P6: calcn_l (0.2003825 0.01552748 0.03654708)
      PathPoint P7: toes_l (0.03362474 0.004625189 0.02764229)
      PathPoint P8: toes_l (0.06352593 0.003835522 0.02098557)
      ActiveForceLengthCurve: min_norm_active_fiber_length=0.25 transition_norm_fiber_length=0.77
          max_norm_active_fiber_length=1.9 shallow_ascending_slope=0.75 minimum_value=0
      FiberForceLengthCurve: strain_at_zero_force=0 strain_at_one_norm_force=0.7
    Millard2012EquilibriumMuscle fdl_l: max_isometric_force=423.177 optimal_fiber_length=0.05268679
        tendon_slack_length=0.4474512 pennation_angle_at_optimal=0.2248391 fiber_damping=0.01
        default_activation=0.01032675 minimum_activation=0.01
      PathPoint P1: tibia_l (-0.00267607 -0.2130498 0.002043397)
      PathPoint P2: tibia_l (-0.02047775 -0.42389 0.01407673)
      PathPoint P3: calcn_l (0.05038454 0.03518817 0.03654708)
      PathPoint P4: calcn_l (0.08181709 0.01966069 0.03432815)
      PathPoint P5: calcn_l (0.1915999 -0.009048387 -0.01514093)
      PathPoint P6: toes_l (-0.002143859 -0.008799139 -0.01658537)
      PathPoint P7: toes_l (0.03215789 -0.008009473 -0.02425752)
      PathPoint P8: toes_l (0.0497601 -0.006768569 -0.02730381)
      ActiveForceLengthCurve: min_norm_active_fiber_length=0.25 transition_norm_fiber_length=0.77
          max_norm_active_fiber_length=1.9 shallow_ascending_slope=0.75 minimum_value=0
      FiberForceLengthCurve: strain_at_zero_force=0 strain_at_one_norm_force=0.7
    Millard2012EquilibriumMuscle fhl_l: max_isometric_force=907.8393 optimal_fiber_length=0.06211099
        tendon_slack_length=0.4176165 pennation_angle_at_optimal=0.2580255 fiber_damping=0.01
        default_activation=0.0106694 minimum_activation=0.01
      PathPoint P1: tibia_l (-0.03606877 -0.251543 -0.02270441)
      PathPoint P2: tibia_l (-0.02815691 -0.4269137 0.008627675)
      PathPoint P3: calcn_l (0.04321976 0.03083154 0.03145659)
      PathPoint P4: calcn_l (0.1199522 0.007596177 0.03341447)
      PathPoint P5: calcn_l (0.1994581 -0.00592055 0.0351113)
      PathPoint P6: toes_l (0.01748938 -0.007219807 0.0298988)
      PathPoint P7: toes_l (0.06341309 -0.01150657 0.02042144)
      ActiveForceLengthCurve: min_norm_active_fiber_length=0.25 transition_norm_fiber_length=0.77
          max_norm_active_fiber_length=1.9 shallow_ascending_slope=0.75 minimum_value=0
      FiberForceLengthCurve: strain_at_zero_force=0 strain_at_one_norm_force=0.7
    Millard2012EquilibriumMuscle gaslat_l: max_isometric_force=1575.059 optimal_fiber_length=0.08102791
        tendon_slack_length=0.4391948 pennation_angle_at_optimal=0.2102268 fiber_damping=0.01
        default_activation=0.07936685 minimum_activation=0.01
      PathPoint P1: femur_l (0.002097386 -0.3709792 -0.02166637)
      PathPoint P2: calcn_l (0.005084678 0.03462963 0.00691784)
      PathWrap: wrap_object=GasLat_at_shank_l method=hybrid
      PathWrap pathwrap_0: wrap_object=GasLat_at_condyles_l method=hybrid
      ActiveForceLengthCurve: min_norm_active_fiber_length=0.25 transition_norm_fiber_length=0.77
          max_norm_active_fiber_length=1.9 shallow_ascending_slope=0.75 minimum_value=0
      FiberForceLengthCurve: strain_at_zero_force=0 strain_at_one_norm_force=0.7
    Millard2012EquilibriumMuscle gasmed_l: max_isometric_force=3115.515 optimal_fiber_length=0.07004822
        tendon_slack_length=0.4594688 pennation_angle_at_optimal=0.1656816 fiber_damping=0.01
        default_activation=0.06458058 minimum_activation=0.01
      PathPoint P1: femur_l (0.006292157 -0.374874 0.02315008)
      PathPoint P2: calcn_l (0.005084678 0.03462963 0.00691784)
      PathWrap: wrap_object=GasMed_at_shank_l method=hybrid
      PathWrap pathwrap_0: wrap_object=GasMed_at_condyles_l method=hybrid
      ActiveForceLengthCurve: min_norm_active_fiber_length=0.25 transition_norm_fiber_length=0.77
          max_norm_active_fiber_length=1.9 shallow_ascending_slope=0.75 minimum_value=0
      FiberForceLengthCurve: strain_at_zero_force=0 strain_at_one_norm_force=0.7
    Millard2012EquilibriumMuscle glmax1_l: max_isometric_force=983.7836 optimal_fiber_length=0.1598643
        tendon_slack_length=0.09493979 pennation_angle_at_optimal=0.3540118 fiber_damping=0.01
        default_activation=0.01007698 minimum_activation=0.01
      PathPoint P1: pelvis (-0.141605 0.03899994 -0.06089017)
      PathPoint P2: pelvis (-0.1445958 -0.02735648 -0.08425123)
      PathPoint P3: femur_l (-0.04656196 -0.03174258 -0.03177875)
      PathPoint P4: femur_l (-0.02904879 -0.05511135 -0.04945699)
      PathWrap: wrap_object=Gmax1_at_pelvis_l method=hybrid
      ActiveForceLengthCurve: min_norm_active_fiber_length=0.25 transition_norm_fiber_length=0.77
          max_norm_active_fiber_length=1.9 shallow_ascending_slope=0.75 minimum_value=0
      FiberForceLengthCurve: strain_at_zero_force=0 strain_at_one_norm_force=0.7
    Millard2012EquilibriumMuscle glmax2_l: max_isometric_force=1406.046 optimal_fiber_length=0.1674976
        tendon_slack_length=0.1162881 pennation_angle_at_optimal=0.3673821 fiber_damping=0.01
        default_activation=0.01007779 minimum_activation=0.01
      PathPoint P1: pelvis (-0.1514978 0.009834769 -0.04996671)
      PathPoint P2: pelvis (-0.1546037 -0.06884338 -0.08792844)
      PathPoint P3: femur_l (-0.04719118 -0.05686401 -0.02651737)
      PathPoint P4: femur_l (-0.01635961 -0.09892779 -0.04409038)
      PathWrap: wrap_object=Gmax2_at_pelvis_l method=hybrid
      ActiveForceLengthCurve: min_norm_active_fiber_length=0.25 transition_norm_fiber_length=0.77
          max_norm_active_fiber_length=1.9 shallow_ascending_slope=0.75 minimum_value=0
      FiberForceLengthCurve: strain_at_zero_force=0 strain_at_one_norm_force=0.7
    Millard2012EquilibriumMuscle glmax3_l: max_isometric_force=947.7541 optimal_fiber_length=0.1757498
        tendon_slack_length=0.1083966 pennation_angle_at_optimal=0.3824161 fiber_damping=0.01
        default_activation=0.01052808 minimum_activation=0.01
      PathPoint P1: pelvis (-0.1495422 -0.05934774 -0.009733775)
      PathPoint P2: pelvis (-0.1464364 -0.1427737 -0.04704658)
      PathPoint P3: femur_l (-0.02946827 -0.1095411 -0.009891398)
      PathPoint P4: femur_l (-0.006292157 -0.1381679 -0.04324856)
      PathWrap: wrap_object=Gmax3_at_pelvis_l method=hybrid
      ActiveForceLengthCurve: min_norm_active_fiber_length=0.25 transition_norm_fiber_length=0.77
          max_norm_active_fiber_length=1.9 shallow_ascending_slope=0.75 minimum_value=0
      FiberForceLengthCurve: strain_at_zero_force=0 strain_at_one_norm_force=0.7
    Millard2012EquilibriumMuscle glmed1_l: max_isometric_force=1093.467 optimal_fiber_length=0.08444272
        tendon_slack_length=0.06457384 pennation_angle_at_optimal=0.3165559 fiber_damping=0.01
        default_activation=0.02055896 minimum_activation=0.01
      PathPoint P1: pelvis (-0.05636592 0.02939126 -0.124376)
      PathPoint P2: femur_l (-0.0146817 -0.01752658 -0.06208431)
      ActiveForceLengthCurve: min_norm_active_fiber_length=0.25 transition_norm_fiber_length=0.77
          max_norm_active_fiber_length=1.9 shallow_ascending_slope=0.75 minimum_value=0
      FiberForceLengthCurve: strain_at_zero_force=0 strain_at_one_norm_force=0.7
    Millard2012EquilibriumMuscle glmed2_l: max_isometric_force=765.0917 optimal_fiber_length=0.09346317
        tendon_slack_length=0.08394995 pennation_angle_at_optimal=0.3165559 fiber_damping=0.01
        default_activation=0.0100409 minimum_activation=0.01
      PathPoint P1: pelvis (-0.09777762 0.06217382 -0.08868551)
      PathPoint P2: femur_l (-0.02307124 -0.009736987 -0.05892748)
      ActiveForceLengthCurve: min_norm_active_fiber_length=0.25 transition_norm_fiber_length=0.77
          max_norm_active_fiber_length=1.9 shallow_ascending_slope=0.75 minimum_value=0
      FiberForceLengthCurve: strain_at_zero_force=0 strain_at_one_norm_force=0.7
    Millard2012EquilibriumMuscle glmed3_l: max_isometric_force=871.1993 optimal_fiber_length=0.0865134
        tendon_slack_length=0.05361394 pennation_angle_at_optimal=0.3165559 fiber_damping=0.01
        default_activation=0.01006329 minimum_activation=0.01
      PathPoint P1: pelvis (-0.1150325 0.01808693 -0.06921796)
      PathPoint P2: femur_l (-0.03240461 -0.004576384 -0.05450792)
      ActiveForceLengthCurve: min_norm_active_fiber_length=0.25 transition_norm_fiber_length=0.77
          max_norm_active_fiber_length=1.9 shallow_ascending_slope=0.75 minimum_value=0
      FiberForceLengthCurve: strain_at_zero_force=0 strain_at_one_norm_force=0.7
    Millard2012EquilibriumMuscle glmin1_l: max_isometric_force=374.0459 optimal_fiber_length=0.08988951
        tendon_slack_length=0.02133908 pennation_angle_at_optimal=0.1745329 fiber_damping=0.01
        default_activation=0.03422341 minimum_activation=0.01
      PathPoint P1: pelvis (-0.03450975 0 -0.1276206)
      PathPoint P2: femur_l (0.005243464 -0.01460548 -0.05892748)
      ActiveForceLengthCurve: min_norm_active_fiber_length=0.25 transition_norm_fiber_length=0.77
          max_norm_active_fiber_length=1.9 shallow_ascending_slope=0.75 minimum_value=0
      FiberForceLengthCurve: strain_at_zero_force=0 strain_at_one_norm_force=0.7
    Millard2012EquilibriumMuscle glmin2_l: max_isometric_force=394.8197 optimal_fiber_length=0.07621243
        tendon_slack_length=0.03552143 pennation_angle_at_optimal=0 fiber_damping=0.01 default_activation=0.0100531
        minimum_activation=0.01
      PathPoint P1: pelvis (-0.07086001 0.01130433 -0.1092346)
      PathPoint P2: femur_l (0.004194772 -0.008763289 -0.05471837)
      ActiveForceLengthCurve: min_norm_active_fiber_length=0.25 transition_norm_fiber_length=0.77
          max_norm_active_fiber_length=1.9 shallow_ascending_slope=0.75 minimum_value=0
      FiberForceLengthCurve: strain_at_zero_force=0 strain_at_one_norm_force=0.7
    Millard2012EquilibriumMuscle glmin3_l: max_isometric_force=446.7738 optimal_fiber_length=0.03897948
        tendon_slack_length=0.05211987 pennation_angle_at_optimal=0.01745329 fiber_damping=0.01
        default_activation=0.01007035 minimum_activation=0.01
      PathPoint P1: pelvis (-0.09076063 -0.01752171 -0.08630614)
      PathPoint P2: femur_l (-0.004194772 -0.0009736987 -0.0536661)
      ActiveForceLengthCurve: min_norm_active_fiber_length=0.25 transition_norm_fiber_length=0.77
          max_norm_active_fiber_length=1.9 shallow_ascending_slope=0.75 minimum_value=0
      FiberForceLengthCurve: strain_at_zero_force=0 strain_at_one_norm_force=0.7
    Millard2012EquilibriumMuscle grac_l: max_isometric_force=281.3115 optimal_fiber_length=0.2257337
        tendon_slack_length=0.1704536 pennation_angle_at_optimal=0.1720016 fiber_damping=0.01
        default_activation=0.02651642 minimum_activation=0.01
      PathPoint P1: pelvis (-0.05447939 -0.1461876 -0.02656239)
      PathPoint P2: tibia_l (-0.02143183 -0.05529759 0.03361388)
      PathPoint P3: tibia_l (0.002071045 -0.08096358 0.01785702)
      PathWrap: wrap_object=GR_at_condyles_l method=hybrid
      ActiveForceLengthCurve: min_norm_active_fiber_length=0.25 transition_norm_fiber_length=0.77
          max_norm_active_fiber_length=1.9 shallow_ascending_slope=0.75 minimum_value=0
      FiberForceLengthCurve: strain_at_zero_force=0 strain_at_one_norm_force=0.7
    Millard2012EquilibriumMuscle iliacus_l: max_isometric_force=1021.141 optimal_fiber_length=0.1167111
        tendon_slack_length=0.1052378 pennation_angle_at_optimal=0.279914 fiber_damping=0.01
        default_activation=0.1018116 minimum_activation=0.01
      PathPoint P1: pelvis (-0.06959466 0.03493039 -0.09117303)
      PathPoint P2: pelvis (-0.01552939 -0.06296513 -0.08176371)
      PathPoint P3: femur_l (-0.002411994 -0.05501398 -0.01462664)
      PathPoint P4: femur_l (-0.01279405 -0.06202461 -0.02062462)
      PathWrap: wrap_object=IL_at_brim_l method=hybrid range=(2 3)
      ActiveForceLengthCurve: min_norm_active_fiber_length=0.25 transition_norm_fiber_length=0.77
          max_norm_active_fiber_length=1.9 shallow_ascending_slope=0.75 minimum_value=0
      FiberForceLengthCurve: strain_at_zero_force=0 strain_at_one_norm_force=0.7
    Millard2012EquilibriumMuscle perbrev_l: max_isometric_force=521.2016 optimal_fiber_length=0.05426064
        tendon_slack_length=0.1763202 pennation_angle_at_optimal=0.2052361 fiber_damping=0.01
        default_activation=0.01035493 minimum_activation=0.01
      PathPoint P1: tibia_l (-0.02827326 -0.2944553 -0.02849403)
      PathPoint P2: tibia_l (-0.03944294 -0.4527308 -0.02826699)
      PathPoint P3: tibia_l (-0.03316 -0.4656394 -0.02894812)
      PathPoint P4: calcn_l (0.05442917 0.03016129 -0.03041239)
      PathPoint P5: calcn_l (0.07823471 0.02446416 -0.04477017)
      ActiveForceLengthCurve: min_norm_active_fiber_length=0.25 transition_norm_fiber_length=0.77
          max_norm_active_fiber_length=1.9 shallow_ascending_slope=0.75 minimum_value=0
      FiberForceLengthCurve: strain_at_zero_force=0 strain_at_one_norm_force=0.7
    Millard2012EquilibriumMuscle perlong_l: max_isometric_force=1115.371 optimal_fiber_length=0.06056614
        tendon_slack_length=0.3960892 pennation_angle_at_optimal=0.2479525 fiber_damping=0.01
        default_activation=0.01056445 minimum_activation=0.01
      PathPoint P1: tibia_l (-0.02327017 -0.1596711 -0.03201322)
      PathPoint P2: tibia_l (-0.03688322 -0.4535449 -0.02690472)
      PathPoint P3: tibia_l (-0.03164743 -0.4668024 -0.02724529)
      PathPoint P4: calcn_l (0.05061566 0.02569295 -0.02884609)
      PathPoint P5: calcn_l (0.07869695 0.0118411 -0.03706918)
      PathPoint P6: calcn_l (0.09845786 0.007707885 -0.01540198)
      PathPoint P7: calcn_l (0.1390197 0.009495221 0.02401665)
      ActiveForceLengthCurve: min_norm_active_fiber_length=0.25 transition_norm_fiber_length=0.77
          max_norm_active_fiber_length=1.9 shallow_ascending_slope=0.75 minimum_value=0
      FiberForceLengthCurve: strain_at_zero_force=0 strain_at_one_norm_force=0.7
    Millard2012EquilibriumMuscle piri_l: max_isometric_force=1029.787 optimal_fiber_length=0.02854016
        tendon_slack_length=0.1261324 pennation_angle_at_optimal=0.1745329 fiber_damping=0.01
        default_activation=0.0100814 minimum_activation=0.01
      PathPoint P1: pelvis (-0.1171146 -0.007381729 -0.01461148)
      PathPoint P2: pelvis (-0.1173561 -0.03465908 -0.06588684)
      PathPoint P3: femur_l (-0.01552065 -0.003505315 -0.04598448)
      ActiveForceLengthCurve: min_norm_active_fiber_length=0.25 transition_norm_fiber_length=0.77
          max_norm_active_fiber_length=1.9 shallow_ascending_slope=0.75 minimum_value=0
      FiberForceLengthCurve: strain_at_zero_force=0 strain_at_one_norm_force=0.7
    Millard2012EquilibriumMuscle psoas_l: max_isometric_force=1426.79 optimal_fiber_length=0.1287538
        tendon_slack_length=0.109637 pennation_angle_at_optimal=0.2155251 fiber_damping=0.01
        default_activation=0.06762976 minimum_activation=0.01
      PathPoint P1: pelvis (-0.06970969 0.07008686 -0.04217969)
      PathPoint P2: pelvis (-0.02358166 -0.07393033 -0.07094841)
      PathPoint P3: femur_l (-0.01384275 -0.04547173 -0.004840471)
      PathPoint P4: femur_l (-0.02464428 -0.05102181 -0.009260032)
      PathWrap: wrap_object=PS_at_brim_l method=hybrid range=(2 3)
      ActiveForceLengthCurve: min_norm_active_fiber_length=0.25 transition_norm_fiber_length=0.77
          max_norm_active_fiber_length=1.9 shallow_ascending_slope=0.75 minimum_value=0
      FiberForceLengthCurve: strain_at_zero_force=0 strain_at_one_norm_force=0.7
    Millard2012EquilibriumMuscle recfem_l: max_isometric_force=2191.741 optimal_fiber_length=0.07635174
        tendon_slack_length=0.4530828 pennation_angle_at_optimal=0.2170149 fiber_damping=0.01
        default_activation=0.01290107 minimum_activation=0.01
      PathPoint P1: pelvis (-0.0276078 -0.04386081 -0.1009068)
      PathPoint P2: patella_l (0.01 0.049 -0.0007)
      PathPoint P3: patella_l (0.0121 0.0437 0.001)
      PathPoint P4: patella_l (0.005 0.00247 -3e-5)
      PathPoint P5: tibia_l (0.03793038 -0.0734045 0.0005335536)
      PathWrap: wrap_object=KnExt_at_fem_l method=hybrid
      ActiveForceLengthCurve: min_norm_active_fiber_length=0.25 transition_norm_fiber_length=0.77
          max_norm_active_fiber_length=1.9 shallow_ascending_slope=0.75 minimum_value=0
      FiberForceLengthCurve: strain_at_zero_force=0 strain_at_one_norm_force=0.7
    Millard2012EquilibriumMuscle sart_l: max_isometric_force=249.4131 optimal_fiber_length=0.4137603
        tendon_slack_length=0.1273107 pennation_angle_at_optimal=0.02613542 fiber_damping=0.01
        default_activation=0.02339295 minimum_activation=0.01
      PathPoint P1: pelvis (-0.02243134 -0.01763476 -0.1142096)
      PathPoint P2: femur_l (-0.003146079 -0.3474157 0.04430084)
      PathPoint P3: tibia_l (-0.02920407 -0.04663372 0.04143555)
      PathPoint P4: tibia_l (-0.01849979 -0.06965985 0.02996982)
      PathPoint P5: tibia_l (0.01582372 -0.09419779 0.002951573)
      ActiveForceLengthCurve: min_norm_active_fiber_length=0.25 transition_norm_fiber_length=0.77
          max_norm_active_fiber_length=1.9 shallow_ascending_slope=0.75 minimum_value=0
      FiberForceLengthCurve: strain_at_zero_force=0 strain_at_one_norm_force=0.7
    Millard2012EquilibriumMuscle semimem_l: max_isometric_force=2200.987 optimal_fiber_length=0.08413311
        tendon_slack_length=0.3277278 pennation_angle_at_optimal=0.2545615 fiber_damping=0.01
        default_activation=0.07694787 minimum_activation=0.01
      PathPoint P1: pelvis (-0.1135371 -0.1288694 -0.06640598)
      PathPoint P2: tibia_l (-0.03141473 -0.04768036 0.02225032)
      PathWrap: wrap_object=SM_at_condyles_l method=hybrid
      ActiveForceLengthCurve: min_norm_active_fiber_length=0.25 transition_norm_fiber_length=0.77
          max_norm_active_fiber_length=1.9 shallow_ascending_slope=0.75 minimum_value=0
      FiberForceLengthCurve: strain_at_zero_force=0 strain_at_one_norm_force=0.7
    Millard2012EquilibriumMuscle semiten_l: max_isometric_force=591.2951 optimal_fiber_length=0.1922692
        tendon_slack_length=0.2462629 pennation_angle_at_optimal=0.241295 fiber_damping=0.01
        default_activation=0.03160219 minimum_activation=0.01
      PathPoint P1: pelvis (-0.1194037 -0.1416433 -0.05569882)
      PathPoint P2: tibia_l (-0.03630147 -0.05907713 0.02599655)
      PathPoint P3: tibia_l (0.002210666 -0.08989493 0.01328208)
      PathWrap: wrap_object=ST_at_condyles_l method=hybrid
      ActiveForceLengthCurve: min_norm_active_fiber_length=0.25 transition_norm_fiber_length=0.77
          max_norm_active_fiber_length=1.9 shallow_ascending_slope=0.75 minimum_value=0
      FiberForceLengthCurve: strain_at_zero_force=0 strain_at_one_norm_force=0.7
    Millard2012EquilibriumMuscle soleus_l: max_isometric_force=6194.843 optimal_fiber_length=0.05243537
        tendon_slack_length=0.3352884 pennation_angle_at_optimal=0.3814289 fiber_damping=0.01
        default_activation=0.01778098 minimum_activation=0.01
      PathPoint P1: tibia_l (-0.008842665 -0.1065249 -0.01112516)
      PathPoint P2: calcn_l (0.005084678 0.03462963 0.00691784)
      ActiveForceLengthCurve: min_norm_active_fiber_length=0.25 transition_norm_fiber_length=0.77
          max_norm_active_fiber_length=1.9 shallow_ascending_slope=0.75 minimum_value=0
      FiberForceLengthCurve: strain_at_zero_force=0 strain_at_one_norm_force=0.7
    Millard2012EquilibriumMuscle tfl_l: max_isometric_force=411.2066 optimal_fiber_length=0.09449846
        tendon_slack_length=0.4471304 pennation_angle_at_optimal=0.05235988 fiber_damping=0.01
        default_activation=0.01595201 minimum_activation=0.01
      PathPoint P1: pelvis (-0.0230065 0.01243476 -0.1395174)
      PathPoint P2: femur_l (0.03083157 -0.09688303 -0.0628209)
      PathPoint P3: femur_l (0.01122101 -0.394348 -0.03409376)
      PathPoint P4: tibia_l (0.01256589 -0.04768036 -0.03927863)
      ActiveForceLengthCurve: min_norm_active_fiber_length=0.25 transition_norm_fiber_length=0.77
          max_norm_active_fiber_length=1.9 shallow_ascending_slope=0.75 minimum_value=0
      FiberForceLengthCurve: strain_at_zero_force=0 strain_at_one_norm_force=0.7
    Millard2012EquilibriumMuscle tibant_l: max_isometric_force=1227.452 optimal_fiber_length=0.08073432
        tendon_slack_length=0.284238 pennation_angle_at_optimal=0.1951828 fiber_damping=0.01
        default_activation=0.01830668 minimum_activation=0.01
      PathPoint P1: tibia_l (0.01791803 -0.1525772 -0.01839057)
      PathPoint P2: tibia_l (0.02920407 -0.2216555 -0.01453082)
      PathPoint P3: tibia_l (0.02710975 -0.4255182 0.01498491)
      PathPoint P4: calcn_l (0.134744 0.01988411 0.03981021)
      ActiveForceLengthCurve: min_norm_active_fiber_length=0.25 transition_norm_fiber_length=0.77
          max_norm_active_fiber_length=1.9 shallow_ascending_slope=0.75 minimum_value=0
      FiberForceLengthCurve: strain_at_zero_force=0 strain_at_one_norm_force=0.7
    Millard2012EquilibriumMuscle tibpost_l: max_isometric_force=1730.154 optimal_fiber_length=0.04500149
        tendon_slack_length=0.3342725 pennation_angle_at_optimal=0.2264891 fiber_damping=0.01
        default_activation=0.01073082 minimum_activation=0.01
      PathPoint P1: tibia_l (-0.004770385 -0.1516468 -0.01169277)
      PathPoint P2: tibia_l (-0.01908154 -0.425053 0.01986636)
      PathPoint P3: calcn_l (0.04818888 0.03731063 0.03733023)
      PathPoint P4: calcn_l (0.08921299 0.01776165 0.0366776)
      ActiveForceLengthCurve: min_norm_active_fiber_length=0.25 transition_norm_fiber_length=0.77
          max_norm_active_fiber_length=1.9 shallow_ascending_slope=0.75 minimum_value=0
      FiberForceLengthCurve: strain_at_zero_force=0 strain_at_one_norm_force=0.7
    Millard2012EquilibriumMuscle vasint_l: max_isometric_force=1697.361 optimal_fiber_length=0.1184804
        tendon_slack_length=0.2075938 pennation_angle_at_optimal=0.06309973 fiber_damping=0.01
        default_activation=0.01418324 minimum_activation=0.01
      PathPoint P1: femur_l (0.03041209 -0.1873396 -0.03262057)
      PathPoint P2: femur_l (0.03513121 -0.2029188 -0.02998988)
      PathPoint P3: patella_l (0.0058 0.048 0.0006)
      PathPoint P4: patella_l (0.005 0.00247 0.00039)
      PathPoint P5: tibia_l (0.03789548 -0.07349753 -0.0004881448)
      PathWrap: wrap_object=KnExt_at_fem_l method=hybrid
      ActiveForceLengthCurve: min_norm_active_fiber_length=0.25 transition_norm_fiber_length=0.77
          max_norm_active_fiber_length=1.9 shallow_ascending_slope=0.75 minimum_value=0
      FiberForceLengthCurve: strain_at_zero_force=0 strain_at_one_norm_force=0.7
    Millard2012EquilibriumMuscle vaslat_l: max_isometric_force=5148.767 optimal_fiber_length=0.1186529
        tendon_slack_length=0.2241221 pennation_angle_at_optimal=0.2528673 fiber_damping=0.01
        default_activation=0.0210964 minimum_activation=0.01
      PathPoint P1: femur_l (0.005033726 -0.1805237 -0.03672445)
      PathPoint P2: femur_l (0.02820984 -0.2522853 -0.04303811)
      PathPoint P3: patella_l (0.0103 0.0423 -0.0141)
      PathPoint P4: patella_l (0.005 0.00247 -0.00733)
      PathPoint P5: tibia_l (0.03786057 -0.07370686 -0.005800976)
      PathWrap: wrap_object=KnExtVL_at_fem_l method=hybrid
      ActiveForceLengthCurve: min_norm_active_fiber_length=0.25 transition_norm_fiber_length=0.77
          max_norm_active_fiber_length=1.9 shallow_ascending_slope=0.75 minimum_value=0
      FiberForceLengthCurve: strain_at_zero_force=0 strain_at_one_norm_force=0.7
    Millard2012EquilibriumMuscle vasmed_l: max_isometric_force=2747.823 optimal_fiber_length=0.1117763
        tendon_slack_length=0.2113587 pennation_angle_at_optimal=0.4222225 fiber_damping=0.01
        default_activation=0.01576409 minimum_activation=0.01
      PathPoint P1: femur_l (0.0146817 -0.2043794 -0.0197828)
      PathPoint P2: femur_l (0.03733347 -0.2696172 -0.0009470488)
      PathPoint P3: patella_l (0.0063 0.0445 0.017)
      PathPoint P4: patella_l (0.005 0.00247 0.0085)
      PathPoint P5: tibia_l (0.03711592 -0.07392782 0.007696795)
      PathWrap: wrap_object=KnExt_at_fem_l method=hybrid
      ActiveForceLengthCurve: min_norm_active_fiber_length=0.25 transition_norm_fiber_length=0.77
          max_norm_active_fiber_length=1.9 shallow_ascending_slope=0.75 minimum_value=0
      FiberForceLengthCurve: strain_at_zero_force=0 strain_at_one_norm_force=0.7
    CoordinateActuator [values shared by the 13 below unless stated]: min_control=-1 max_control=1 optimal_force=50
    CoordinateActuator lumbar_ext: coordinate=lumbar_extension
    CoordinateActuator lumbar_bend: coordinate=lumbar_bending
    CoordinateActuator lumbar_rot: coordinate=lumbar_rotation
    CoordinateActuator shoulder_flex_r: coordinate=arm_flex_r
    CoordinateActuator shoulder_add_r: coordinate=arm_add_r
    CoordinateActuator shoulder_rot_r: coordinate=arm_rot_r
    CoordinateActuator elbow_flex_r: coordinate=elbow_flex_r
    CoordinateActuator pro_sup_r: coordinate=pro_sup_r
    CoordinateActuator shoulder_flex_l: coordinate=arm_flex_l
    CoordinateActuator shoulder_add_l: coordinate=arm_add_l
    CoordinateActuator shoulder_rot_l: coordinate=arm_rot_l
    CoordinateActuator elbow_flex_l: coordinate=elbow_flex_l
    CoordinateActuator pro_sup_l: coordinate=pro_sup_l
    Thelen2003Muscle [values shared by the 18 below unless stated]: optimal_force=1 max_contraction_velocity=10
        FmaxTendonStrain=0.033 FmaxMuscleStrain=0.6 KshapeActive=0.5 KshapePassive=4 Af=0.3 Flen=1.8
        activation_time_constant=0.01 deactivation_time_constant=0.04
    Thelen2003Muscle arm26_TRIlong_r: default_activation=0.01027571 max_isometric_force=798.52
        optimal_fiber_length=0.1477175 tendon_slack_length=0.1576388 pennation_angle_at_optimal=0.2094395
      PathPoint arm26_TRIlong_r_TRIlong-P1: torso (-0.0354916 0.3765045 0.1737082)
      PathPoint arm26_TRIlong_r_TRIlong-P2: humerus_r (-0.02689501 -0.1268738 -0.005928305)
      PathPoint arm26_TRIlong_r_TRIlong-P3: humerus_r (-0.02912592 -0.2504444 -0.01063605)
      PathPoint arm26_TRIlong_r_TRIlong-P4: humerus_r (-0.01216344 -0.2954664 -0.01000631)
      PathPoint arm26_TRIlong_r_TRIlong-P5: ulna_r (-0.02440853 0.01094161 -0.001016845)
      PathWrap TRIlong-wrap-cylinder1: wrap_object=arm26_TRI_r method=hybrid
      PathWrap TRIlong-wrap-ellipsoid: wrap_object=arm26_TRIlonghh_r method=hybrid
      PathWrap TRIlong-wrap-cylinder2: wrap_object=arm26_TRIlongglen_r method=hybrid
    Thelen2003Muscle arm26_TRIlat_r: default_activation=0.01029424 max_isometric_force=624.3
        optimal_fiber_length=0.1254496 tendon_slack_length=0.1080322 pennation_angle_at_optimal=0.1570796
      PathPoint arm26_TRIlat_r_TRIlat-P1: humerus_r (-0.003286697 -0.1394614 0.006284717)
      PathPoint arm26_TRIlat_r_TRIlat-P2: humerus_r (-0.02203091 -0.1605973 0.0120091)
      PathPoint arm26_TRIlat_r_TRIlat-P3: humerus_r (-0.02912592 -0.2504444 -0.01063605)
      PathPoint arm26_TRIlat_r_TRIlat-P4: humerus_r (-0.01216344 -0.2954664 -0.01000631)
      PathPoint arm26_TRIlat_r_TRIlat-P5: ulna_r (-0.02440853 0.01094161 -0.001016845)
      PathWrap: wrap_object=arm26_TRI_r method=hybrid
    Thelen2003Muscle arm26_TRImed_r: default_activation=0.01029287 max_isometric_force=624.3
        optimal_fiber_length=0.1254496 tendon_slack_length=0.1000951 pennation_angle_at_optimal=0.1570796
      PathPoint arm26_TRImed_r_TRImed-P1: humerus_r (-0.005624815 -0.1512497 -0.008292287)
      PathPoint arm26_TRImed_r_TRImed-P2: humerus_r (-0.02467217 -0.1676472 -0.01005214)
      PathPoint arm26_TRImed_r_TRImed-P3: humerus_r (-0.02912592 -0.2504444 -0.01063605)
      PathPoint arm26_TRImed_r_TRImed-P4: humerus_r (-0.01216344 -0.2954664 -0.01000631)
      PathPoint arm26_TRImed_r_TRImed-P5: ulna_r (-0.02440853 0.01094161 -0.001016845)
      PathWrap: wrap_object=arm26_TRI_r method=hybrid
    Thelen2003Muscle arm26_BIClong_r: default_activation=0.01024489 max_isometric_force=624.3
        optimal_fiber_length=0.1275441 tendon_slack_length=0.3001751 pennation_angle_at_optimal=0
      PathPoint arm26_BIClong_r_BIClong-P1: torso (-0.02005828 0.3958464 0.1743054)
      PathPoint arm26_BIClong_r_BIClong-P2: torso (-0.009005157 0.4077263 0.1834915)
      PathPoint arm26_BIClong_r_BIClong-P3: humerus_r (0.02299827 0.02044622 0.01113454)
      PathPoint arm26_BIClong_r_BIClong-P4: humerus_r (0.0263228 -0.004857151 0.01333136)
      PathPoint arm26_BIClong_r_BIClong-P5: humerus_r (0.01556301 -0.03078282 0.001867526)
      PathPoint arm26_BIClong_r_BIClong-P6: humerus_r (0.01380411 -0.08498948 -0.0008426954)
      PathPoint arm26_BIClong_r_BIClong-P7: humerus_r (0.02195194 -0.1331653 0.001794791)
      PathPoint arm26_BIClong_r_BIClong-P8: humerus_r (0.02974285 -0.1927674 -0.004733088)
      PathPoint arm26_BIClong_r_BIClong-P9: radius_r (0.01670758 -0.03983613 -0.00384402)
      PathWrap: wrap_object=arm26_BIClonghh_r method=hybrid range=(2 3)
    Thelen2003Muscle arm26_BICshort_r: default_activation=0.01024951 max_isometric_force=435.56
        optimal_fiber_length=0.145623 tendon_slack_length=0.2119856 pennation_angle_at_optimal=0
      PathPoint arm26_BICshort_r_BICshort-P1: torso (0.02876747 0.379447 0.1600053)
      PathPoint arm26_BICshort_r_BICshort-P2: torso (0.01653087 0.3487083 0.1717119)
      PathPoint arm26_BICshort_r_BICshort-P3: humerus_r (0.01431634 -0.08332963 -0.01117952)
      PathPoint arm26_BICshort_r_BICshort-P4: humerus_r (0.02196872 -0.1333023 -0.01036356)
      PathPoint arm26_BICshort_r_BICshort-P5: humerus_r (0.02974285 -0.1927674 -0.004733088)
      PathPoint arm26_BICshort_r_BICshort-P6: radius_r (0.01670758 -0.03983613 -0.00384402)
    Thelen2003Muscle arm26_BRA_r: default_activation=0.01023255 max_isometric_force=987.26
        optimal_fiber_length=0.09458328 tendon_slack_length=0.05897675 pennation_angle_at_optimal=0
      PathPoint arm26_BRA_r_BRA-P1: humerus_r (0.01206647 -0.1915014 -0.001795166)
      PathPoint arm26_BRA_r_BRA-P2: ulna_r (-0.002900278 -0.02641038 0.001285663)
      PathWrap: wrap_object=arm26_TRI_r method=hybrid
    Thelen2003Muscle arm26_TRIlong_l: default_activation=0.01027394 max_isometric_force=798.52
        optimal_fiber_length=0.1477175 tendon_slack_length=0.1576388 pennation_angle_at_optimal=0.2094395
      PathPoint arm26_TRIlong_l_TRIlong-P1: torso (-0.0354916 0.3765045 -0.1737082)
      PathPoint arm26_TRIlong_l_TRIlong-P2: humerus_l (-0.02689501 -0.1268738 0.005928305)
      PathPoint arm26_TRIlong_l_TRIlong-P3: humerus_l (-0.02912592 -0.2504444 0.01063605)
      PathPoint arm26_TRIlong_l_TRIlong-P4: humerus_l (-0.01216344 -0.2954664 0.01000631)
      PathPoint arm26_TRIlong_l_TRIlong-P5: ulna_l (-0.02440853 0.01094161 0.001016845)
      PathWrap TRIlong-wrap-cylinder1: wrap_object=arm26_TRI_l method=hybrid
      PathWrap TRIlong-wrap-ellipsoid: wrap_object=arm26_TRIlonghh_l method=hybrid
      PathWrap TRIlong-wrap-cylinder2: wrap_object=arm26_TRIlongglen_l method=hybrid
    Thelen2003Muscle arm26_TRIlat_l: default_activation=0.01029358 max_isometric_force=624.3
        optimal_fiber_length=0.1254496 tendon_slack_length=0.1080322 pennation_angle_at_optimal=0.1570796
      PathPoint arm26_TRIlat_l_TRIlat-P1: humerus_l (-0.003286697 -0.1394614 -0.006284717)
      PathPoint arm26_TRIlat_l_TRIlat-P2: humerus_l (-0.02203091 -0.1605973 -0.0120091)
      PathPoint arm26_TRIlat_l_TRIlat-P3: humerus_l (-0.02912592 -0.2504444 0.01063605)
      PathPoint arm26_TRIlat_l_TRIlat-P4: humerus_l (-0.01216344 -0.2954664 0.01000631)
      PathPoint arm26_TRIlat_l_TRIlat-P5: ulna_l (-0.02440853 0.01094161 0.001016845)
      PathWrap: wrap_object=arm26_TRI_l method=hybrid
    Thelen2003Muscle arm26_TRImed_l: default_activation=0.01029223 max_isometric_force=624.3
        optimal_fiber_length=0.1254496 tendon_slack_length=0.1000951 pennation_angle_at_optimal=0.1570796
      PathPoint arm26_TRImed_l_TRImed-P1: humerus_l (-0.005624815 -0.1512497 0.008292287)
      PathPoint arm26_TRImed_l_TRImed-P2: humerus_l (-0.02467217 -0.1676472 0.01005214)
      PathPoint arm26_TRImed_l_TRImed-P3: humerus_l (-0.02912592 -0.2504444 0.01063605)
      PathPoint arm26_TRImed_l_TRImed-P4: humerus_l (-0.01216344 -0.2954664 0.01000631)
      PathPoint arm26_TRImed_l_TRImed-P5: ulna_l (-0.02440853 0.01094161 0.001016845)
      PathWrap: wrap_object=arm26_TRI_l method=hybrid
    Thelen2003Muscle arm26_BIClong_l: default_activation=0.01024619 max_isometric_force=624.3
        optimal_fiber_length=0.1275441 tendon_slack_length=0.3001751 pennation_angle_at_optimal=0
      PathPoint arm26_BIClong_l_BIClong-P1: torso (-0.02005828 0.3958464 -0.1743054)
      PathPoint arm26_BIClong_l_BIClong-P2: torso (-0.009005157 0.4077263 -0.1834915)
      PathPoint arm26_BIClong_l_BIClong-P3: humerus_l (0.02299827 0.02044622 -0.01113454)
      PathPoint arm26_BIClong_l_BIClong-P4: humerus_l (0.0263228 -0.004857151 -0.01333136)
      PathPoint arm26_BIClong_l_BIClong-P5: humerus_l (0.01556301 -0.03078282 -0.001867526)
      PathPoint arm26_BIClong_l_BIClong-P6: humerus_l (0.01380411 -0.08498948 0.0008426954)
      PathPoint arm26_BIClong_l_BIClong-P7: humerus_l (0.02195194 -0.1331653 -0.001794791)
      PathPoint arm26_BIClong_l_BIClong-P8: humerus_l (0.02974285 -0.1927674 0.004733088)
      PathPoint arm26_BIClong_l_BIClong-P9: radius_l (0.01670758 -0.03983613 0.00384402)
      PathWrap: wrap_object=arm26_BIClonghh_l method=hybrid range=(2 3)
    Thelen2003Muscle arm26_BICshort_l: default_activation=0.01024898 max_isometric_force=435.56
        optimal_fiber_length=0.145623 tendon_slack_length=0.2119856 pennation_angle_at_optimal=0
      PathPoint arm26_BICshort_l_BICshort-P1: torso (0.02876747 0.379447 -0.1600053)
      PathPoint arm26_BICshort_l_BICshort-P2: torso (0.01653087 0.3487083 -0.1717119)
      PathPoint arm26_BICshort_l_BICshort-P3: humerus_l (0.01431634 -0.08332963 0.01117952)
      PathPoint arm26_BICshort_l_BICshort-P4: humerus_l (0.02196872 -0.1333023 0.01036356)
      PathPoint arm26_BICshort_l_BICshort-P5: humerus_l (0.02974285 -0.1927674 0.004733088)
      PathPoint arm26_BICshort_l_BICshort-P6: radius_l (0.01670758 -0.03983613 0.00384402)
    Thelen2003Muscle arm26_BRA_l: default_activation=0.01023346 max_isometric_force=987.26
        optimal_fiber_length=0.09458328 tendon_slack_length=0.05897675 pennation_angle_at_optimal=0
      PathPoint arm26_BRA_l_BRA-P1: humerus_l (0.01206647 -0.1915014 0.001795166)
      PathPoint arm26_BRA_l_BRA-P2: ulna_l (-0.002900278 -0.02641038 -0.001285663)
      PathWrap: wrap_object=arm26_TRI_l method=hybrid
    Thelen2003Muscle gait2392_ercspn_r: default_activation=0.06974508 max_isometric_force=2500
        optimal_fiber_length=0.12 tendon_slack_length=0.03 pennation_angle_at_optimal=0
      PathPoint ercspn_r-P1: pelvis (-0.1551377 0.0545303 0.0436)
      PathPoint ercspn_r-P2: torso (-0.055 0.11 0.0241)
    Thelen2003Muscle gait2392_intobl_r: default_activation=0.04122585 max_isometric_force=900 optimal_fiber_length=0.1
        tendon_slack_length=0.1 pennation_angle_at_optimal=0
      PathPoint intobl_r-P1: pelvis (-0.05513772 0.0806303 0.1157)
      PathPoint intobl_r-P2: torso (0.07 0.16 0.015)
    Thelen2003Muscle gait2392_extobl_r: default_activation=0.03996082 max_isometric_force=900 optimal_fiber_length=0.12
        tendon_slack_length=0.14 pennation_angle_at_optimal=0
      PathPoint extobl_r-P1: pelvis (-0.04513772 -0.0529697 0.01)
      PathPoint extobl_r-P2: torso (0.065 0.11 0.11)
    Thelen2003Muscle gait2392_ercspn_l: default_activation=0.06969896 max_isometric_force=2500
        optimal_fiber_length=0.12 tendon_slack_length=0.03 pennation_angle_at_optimal=0
      PathPoint ercspn_l-P1: pelvis (-0.1551377 0.0545303 -0.0436)
      PathPoint ercspn_l-P2: torso (-0.055 0.11 -0.0241)
    Thelen2003Muscle gait2392_intobl_l: default_activation=0.04119006 max_isometric_force=900 optimal_fiber_length=0.1
        tendon_slack_length=0.1 pennation_angle_at_optimal=0
      PathPoint intobl_l-P1: pelvis (-0.05513772 0.0806303 -0.1157)
      PathPoint intobl_l-P2: torso (0.07 0.16 -0.015)
    Thelen2003Muscle gait2392_extobl_l: default_activation=0.039934 max_isometric_force=900 optimal_fiber_length=0.12
        tendon_slack_length=0.14 pennation_angle_at_optimal=0
      PathPoint extobl_l-P1: pelvis (-0.04513772 -0.0529697 -0.01)
      PathPoint extobl_l-P2: torso (0.065 0.11 -0.11)
    CoordinateLimitForce [values shared by the 27 below unless stated]: upper_stiffness=0.5235988
        lower_stiffness=0.5235988 damping=1.5 transition=20.05352 compute_dissipation_energy=false
    CoordinateLimitForce articulated_stop_thoracic_extension: coordinate=thoracic_extension upper_limit=15
        lower_limit=-15
    ExpressionBasedCoordinateForce articulated_damping_thoracic_extension: coordinate=thoracic_extension
        expression=-1.0*qdot
    CoordinateLimitForce articulated_stop_thoracic_bending: coordinate=thoracic_bending upper_limit=15 lower_limit=-15
    ExpressionBasedCoordinateForce articulated_damping_thoracic_bending: coordinate=thoracic_bending
        expression=-1.0*qdot
    CoordinateLimitForce articulated_stop_thoracic_rotation: coordinate=thoracic_rotation upper_limit=20
        lower_limit=-20
    ExpressionBasedCoordinateForce articulated_damping_thoracic_rotation: coordinate=thoracic_rotation
        expression=-1.0*qdot
    CoordinateLimitForce articulated_stop_neck_extension: coordinate=neck_extension upper_limit=48 lower_limit=-33
    ExpressionBasedCoordinateForce articulated_damping_neck_extension: coordinate=neck_extension expression=-1.0*qdot
    CoordinateLimitForce articulated_stop_neck_bending: coordinate=neck_bending upper_limit=33 lower_limit=-33
    ExpressionBasedCoordinateForce articulated_damping_neck_bending: coordinate=neck_bending expression=-1.0*qdot
    CoordinateLimitForce articulated_stop_neck_rotation: coordinate=neck_rotation upper_limit=27 lower_limit=-27
    ExpressionBasedCoordinateForce articulated_damping_neck_rotation: coordinate=neck_rotation expression=-1.0*qdot
    CoordinateLimitForce articulated_stop_head_extension: coordinate=head_extension upper_limit=24 lower_limit=-16
    ExpressionBasedCoordinateForce articulated_damping_head_extension: coordinate=head_extension expression=-1.0*qdot
    CoordinateLimitForce articulated_stop_head_bending: coordinate=head_bending upper_limit=6 lower_limit=-6
    ExpressionBasedCoordinateForce articulated_damping_head_bending: coordinate=head_bending expression=-1.0*qdot
    CoordinateLimitForce articulated_stop_head_rotation: coordinate=head_rotation upper_limit=38 lower_limit=-38
    ExpressionBasedCoordinateForce articulated_damping_head_rotation: coordinate=head_rotation expression=-1.0*qdot
    CoordinateLimitForce articulated_stop_wrist_flex_r: coordinate=wrist_flex_r upper_limit=70 lower_limit=-70
    ExpressionBasedCoordinateForce articulated_damping_wrist_flex_r: coordinate=wrist_flex_r expression=-1.0*qdot
    CoordinateLimitForce articulated_stop_wrist_dev_r: coordinate=wrist_dev_r upper_limit=35 lower_limit=-25
    ExpressionBasedCoordinateForce articulated_damping_wrist_dev_r: coordinate=wrist_dev_r expression=-1.0*qdot
    CoordinateLimitForce articulated_stop_subtalar_angle_r: coordinate=subtalar_angle_r upper_limit=35 lower_limit=-35
    ExpressionBasedCoordinateForce articulated_damping_subtalar_angle_r: coordinate=subtalar_angle_r
        expression=-0.1*qdot
    CoordinateLimitForce articulated_stop_wrist_flex_l: coordinate=wrist_flex_l upper_limit=70 lower_limit=-70
    ExpressionBasedCoordinateForce articulated_damping_wrist_flex_l: coordinate=wrist_flex_l expression=-1.0*qdot
    CoordinateLimitForce articulated_stop_wrist_dev_l: coordinate=wrist_dev_l upper_limit=35 lower_limit=-25
    ExpressionBasedCoordinateForce articulated_damping_wrist_dev_l: coordinate=wrist_dev_l expression=-1.0*qdot
    CoordinateLimitForce articulated_stop_subtalar_angle_l: coordinate=subtalar_angle_l upper_limit=35 lower_limit=-35
    ExpressionBasedCoordinateForce articulated_damping_subtalar_angle_l: coordinate=subtalar_angle_l
        expression=-0.1*qdot
    CoordinateLimitForce girdle_stop_clav_prot_r: coordinate=clav_prot_r upper_limit=2.817469 lower_limit=-37.18253
    ExpressionBasedCoordinateForce girdle_damping_clav_prot_r: coordinate=clav_prot_r expression=-1.0*qdot
    CoordinateLimitForce girdle_stop_clav_elev_r: coordinate=clav_elev_r upper_limit=16.29083 lower_limit=-23.70917
    ExpressionBasedCoordinateForce girdle_damping_clav_elev_r: coordinate=clav_elev_r expression=-1.0*qdot
    CoordinateLimitForce girdle_stop_scapula_abduction_r: coordinate=scapula_abduction_r upper_limit=2.148862
        lower_limit=-37.85114
    ExpressionBasedCoordinateForce girdle_damping_scapula_abduction_r: coordinate=scapula_abduction_r
        expression=-1.0*qdot
    CoordinateLimitForce girdle_stop_scapula_elevation_r: coordinate=scapula_elevation_r upper_limit=17.10669
        lower_limit=-22.89331
    ExpressionBasedCoordinateForce girdle_damping_scapula_elevation_r: coordinate=scapula_elevation_r
        expression=-1.0*qdot
    CoordinateLimitForce girdle_stop_scapula_upward_rot_r: coordinate=scapula_upward_rot_r upper_limit=31.92926
        lower_limit=-8.070737
    ExpressionBasedCoordinateForce girdle_damping_scapula_upward_rot_r: coordinate=scapula_upward_rot_r
        expression=-1.0*qdot
    CoordinateLimitForce girdle_stop_scapula_winging_r: coordinate=scapula_winging_r upper_limit=35.67528
        lower_limit=-4.324723
    ExpressionBasedCoordinateForce girdle_damping_scapula_winging_r: coordinate=scapula_winging_r expression=-1.0*qdot
    CoordinateLimitForce girdle_stop_clav_prot_l: coordinate=clav_prot_l upper_limit=2.817469 lower_limit=-37.18253
    ExpressionBasedCoordinateForce girdle_damping_clav_prot_l: coordinate=clav_prot_l expression=-1.0*qdot
    CoordinateLimitForce girdle_stop_clav_elev_l: coordinate=clav_elev_l upper_limit=16.29083 lower_limit=-23.70917
    ExpressionBasedCoordinateForce girdle_damping_clav_elev_l: coordinate=clav_elev_l expression=-1.0*qdot
    CoordinateLimitForce girdle_stop_scapula_abduction_l: coordinate=scapula_abduction_l upper_limit=2.148862
        lower_limit=-37.85114
    ExpressionBasedCoordinateForce girdle_damping_scapula_abduction_l: coordinate=scapula_abduction_l
        expression=-1.0*qdot
    CoordinateLimitForce girdle_stop_scapula_elevation_l: coordinate=scapula_elevation_l upper_limit=22.89331
        lower_limit=-17.10669
    ExpressionBasedCoordinateForce girdle_damping_scapula_elevation_l: coordinate=scapula_elevation_l
        expression=-1.0*qdot
    CoordinateLimitForce girdle_stop_scapula_upward_rot_l: coordinate=scapula_upward_rot_l upper_limit=8.070737
        lower_limit=-31.92926
    ExpressionBasedCoordinateForce girdle_damping_scapula_upward_rot_l: coordinate=scapula_upward_rot_l
        expression=-1.0*qdot
    CoordinateLimitForce girdle_stop_scapula_winging_l: coordinate=scapula_winging_l upper_limit=35.67528
        lower_limit=-4.324723
    ExpressionBasedCoordinateForce girdle_damping_scapula_winging_l: coordinate=scapula_winging_l expression=-1.0*qdot
    Millard2012EquilibriumMuscle seth_TrapeziusScapula_M_r: optimal_force=1 max_isometric_force=470.4
        optimal_fiber_length=0.0832 tendon_slack_length=0.032 pennation_angle_at_optimal=0 max_contraction_velocity=10
        ignore_tendon_compliance=true activation_time_constant=0.01 deactivation_time_constant=0.04
        minimum_activation=0.01
      PathPoint P1: torso (-0.05284248 0.4060554 -0.00232369)
      PathPoint P2: scapula_r (-0.07661443 -0.002573737 -0.04777288)
      PathWrap seth_TrapeziusScapula_M_r_pathwrap: wrap_object=Thorax_r method=hybrid
      ActiveForceLengthCurve: minimum_value=0
      FiberForceLengthCurve
    Millard2012EquilibriumMuscle seth_TrapeziusScapula_S_r: optimal_force=1 max_isometric_force=1043
        optimal_fiber_length=0.1127 tendon_slack_length=0.027 pennation_angle_at_optimal=0 max_contraction_velocity=10
        ignore_tendon_compliance=true activation_time_constant=0.01 deactivation_time_constant=0.04
        minimum_activation=0.01
      PathPoint P1: torso (-0.0401631 0.4657917 -0.004769873)
      PathPoint P2: scapula_r (-0.06806894 0.009063125 -0.03214895)
      PathWrap seth_TrapeziusScapula_S_r_pathwrap: wrap_object=Thorax_r method=hybrid
      ActiveForceLengthCurve: minimum_value=0
      FiberForceLengthCurve
    Millard2012EquilibriumMuscle seth_TrapeziusScapula_I_r: optimal_force=1 max_isometric_force=414.4
        optimal_fiber_length=0.1264 tendon_slack_length=0.035 pennation_angle_at_optimal=0 max_contraction_velocity=10
        ignore_tendon_compliance=true activation_time_constant=0.01 deactivation_time_constant=0.04
        minimum_activation=0.01
      PathPoint P1: torso (-0.07537474 0.2295346 0.001512614)
      PathPoint P2: scapula_r (-0.09959758 -0.01243055 -0.09715675)
      PathWrap seth_TrapeziusScapula_I_r_pathwrap: wrap_object=Thorax_r method=hybrid
      ActiveForceLengthCurve: minimum_value=0
      FiberForceLengthCurve
    Millard2012EquilibriumMuscle seth_TrapeziusClavicle_S_r: optimal_force=1 max_isometric_force=201.6
        optimal_fiber_length=0.1127 tendon_slack_length=0.027 pennation_angle_at_optimal=0 max_contraction_velocity=10
        ignore_tendon_compliance=true activation_time_constant=0.01 deactivation_time_constant=0.04
        minimum_activation=0.01
      PathPoint P1: torso (-0.02360992 0.5647917 0.003217024)
      PathPoint P2: clavicle_r (-0.03960049 0.03275242 0.1196613)
      PathWrap seth_TrapeziusClavicle_S_r_pathwrap: wrap_object=Thorax_r method=hybrid
      ActiveForceLengthCurve: minimum_value=0
      FiberForceLengthCurve
    Millard2012EquilibriumMuscle seth_SerratusAnterior_I_r: optimal_force=1 max_isometric_force=430
        optimal_fiber_length=0.1587 tendon_slack_length=0 pennation_angle_at_optimal=0 max_contraction_velocity=10
        ignore_tendon_compliance=true activation_time_constant=0.01 deactivation_time_constant=0.04
        minimum_activation=0.01
      PathPoint P1: scapula_r (-0.1493576 -0.147592 -0.1124863)
      PathPoint P2: thorax (0.08007323 0.1045087 0.1938037)
      PathWrap seth_SerratusAnterior_I_r_pathwrap: wrap_object=Thorax_r method=midpoint
      ActiveForceLengthCurve: minimum_value=0
      FiberForceLengthCurve
    Millard2012EquilibriumMuscle seth_SerratusAnterior_M_r: optimal_force=1 max_isometric_force=508
        optimal_fiber_length=0.1538 tendon_slack_length=0.012 pennation_angle_at_optimal=0 max_contraction_velocity=10
        ignore_tendon_compliance=true activation_time_constant=0.01 deactivation_time_constant=0.04
        minimum_activation=0.01
      PathPoint P1: scapula_r (-0.1356367 -0.1092839 -0.129689)
      PathPoint P2: thorax (0.1027348 0.2284406 0.1497233)
      PathWrap seth_SerratusAnterior_M_r_pathwrap: wrap_object=Thorax_r method=hybrid
      ActiveForceLengthCurve: minimum_value=0
      FiberForceLengthCurve
    Millard2012EquilibriumMuscle seth_SerratusAnterior_S_r: optimal_force=1 max_isometric_force=387.8
        optimal_fiber_length=0.0945 tendon_slack_length=0 pennation_angle_at_optimal=0 max_contraction_velocity=10
        ignore_tendon_compliance=true activation_time_constant=0.01 deactivation_time_constant=0.04
        minimum_activation=0.01
      PathPoint P1: scapula_r (-0.06380719 0.01183862 -0.1113312)
      PathPoint P2: torso (0.0208541 0.3874329 0.1306762)
      PathWrap seth_SerratusAnterior_S_r_pathwrap: wrap_object=Thorax_r method=hybrid
      ActiveForceLengthCurve: minimum_value=0
      FiberForceLengthCurve
    Millard2012EquilibriumMuscle seth_Rhomboideus_S_r: optimal_force=1 max_isometric_force=200.2
        optimal_fiber_length=0.0986 tendon_slack_length=0.015 pennation_angle_at_optimal=0 max_contraction_velocity=10
        activation_time_constant=0.01 deactivation_time_constant=0.04 minimum_activation=0.01
      PathPoint P1: torso (-0.03812413 0.4593938 -0.002683239)
      PathPoint P2: scapula_r (-0.1087392 -0.03013584 -0.1338153)
      PathWrap seth_Rhomboideus_S_r_pathwrap: wrap_object=Thorax_r method=hybrid
      ActiveForceLengthCurve: minimum_value=0
      FiberForceLengthCurve
    Millard2012EquilibriumMuscle seth_Rhomboideus_I_r: optimal_force=1 max_isometric_force=407.4
        optimal_fiber_length=0.1152 tendon_slack_length=0.028 pennation_angle_at_optimal=0 max_contraction_velocity=10
        activation_time_constant=0.01 deactivation_time_constant=0.04 minimum_activation=0.01
      PathPoint P1: torso (-0.06095853 0.3943494 -0.0006708117)
      PathPoint P2: scapula_r (-0.1397636 -0.1403643 -0.121965)
      PathWrap seth_Rhomboideus_I_r_pathwrap: wrap_object=Thorax_r method=hybrid
      ActiveForceLengthCurve: minimum_value=0
      FiberForceLengthCurve
    Millard2012EquilibriumMuscle seth_LevatorScapulae_r: optimal_force=1 max_isometric_force=280
        optimal_fiber_length=0.1578 tendon_slack_length=0.019 pennation_angle_at_optimal=0 max_contraction_velocity=10
        ignore_tendon_compliance=true activation_time_constant=0.01 deactivation_time_constant=0.04
        minimum_activation=0.01
      PathPoint P1: torso (0.01250354 0.5657796 0.04088012)
      PathPoint P2: scapula_r (-0.1026098 -0.01062845 -0.1353275)
      PathWrap seth_LevatorScapulae_r_pathwrap: wrap_object=Thorax_r method=hybrid
      ActiveForceLengthCurve: minimum_value=0
      FiberForceLengthCurve
    Millard2012EquilibriumMuscle seth_Coracobrachialis_r: optimal_force=1 max_isometric_force=648.2
        optimal_fiber_length=0.0683 tendon_slack_length=0.104 pennation_angle_at_optimal=0 max_contraction_velocity=10
        ignore_tendon_compliance=true activation_time_constant=0.01 deactivation_time_constant=0.04
        minimum_activation=0.01
      PathPoint P1: scapula_r (0.01087559 -0.05581651 -0.03694997)
      PathPoint P2: humerus_r (0.02192493 -0.156547 -0.02597195)
      ActiveForceLengthCurve: minimum_value=0
      FiberForceLengthCurve
    Millard2012EquilibriumMuscle seth_DeltoideusClavicle_A_r: optimal_force=1 max_isometric_force=707.7
        optimal_fiber_length=0.094 tendon_slack_length=0.088 pennation_angle_at_optimal=0.08726646
        max_contraction_velocity=10 activation_time_constant=0.01 deactivation_time_constant=0.04
        minimum_activation=0.01
      PathPoint P1: clavicle_r (-0.02994062 0.02563782 0.1106116)
      PathPoint P2: scapula_r (0.02573115 -0.008664316 0.01367659)
      PathPoint P3: humerus_r (0.0278893 -0.1172526 -0.01346231)
      PathWrap seth_DeltoideusClavicle_A_r_pathwrap: wrap_object=deltsca_r method=hybrid
      ActiveForceLengthCurve: minimum_value=0
      FiberForceLengthCurve
    Millard2012EquilibriumMuscle seth_DeltoideusScapula_P_r: optimal_force=1 max_isometric_force=1324.4
        optimal_fiber_length=0.0949 tendon_slack_length=0.076 pennation_angle_at_optimal=0.08726646
        max_contraction_velocity=10 activation_time_constant=0.01 deactivation_time_constant=0.04
        minimum_activation=0.01
      PathPoint P1: scapula_r (-0.07594502 -0.009091154 -0.03581628)
      PathPoint P2: scapula_r (-0.0723478 -0.04257243 0.009671364)
      PathPoint P3: humerus_r (0.01315374 -0.09444363 -0.00199129)
      PathWrap seth_DeltoideusScapula_P_r_pathwrap: wrap_object=deltsca_r method=hybrid
      ActiveForceLengthCurve: minimum_value=0
      FiberForceLengthCurve
    Millard2012EquilibriumMuscle seth_DeltoideusScapula_M_r: optimal_force=1 max_isometric_force=2597.8
        optimal_fiber_length=0.0748 tendon_slack_length=0.064 pennation_angle_at_optimal=0.08726646
        max_contraction_velocity=10 activation_time_constant=0.01 deactivation_time_constant=0.04
        minimum_activation=0.01
      PathPoint P1: scapula_r (-0.02107215 0.002675464 0.01025693)
      PathPoint P2: scapula_r (-0.00675804 -0.008867061 0.04081388)
      PathPoint P3: humerus_r (0.01556602 -0.109642 -0.006308054)
      PathWrap seth_DeltoideusScapula_M_r_pathwrap: wrap_object=deltsca_r method=hybrid
      ActiveForceLengthCurve: minimum_value=0
      FiberForceLengthCurve
    Millard2012EquilibriumMuscle seth_LatissimusDorsi_S_r: optimal_force=1 max_isometric_force=201.6
        optimal_fiber_length=0.2109 tendon_slack_length=0.081 pennation_angle_at_optimal=0 max_contraction_velocity=10
        ignore_tendon_compliance=true activation_time_constant=0.01 deactivation_time_constant=0.04
        minimum_activation=0.01
      PathPoint P1: torso (-0.07440135 0.2531319 0.002249192)
      PathPoint P2: torso (-0.09363226 0.2534476 0.03788112)
      PathPoint P3: torso (-0.1029233 0.2768288 0.1328681)
      PathPoint P4: torso (-0.0637602 0.2969866 0.1786333)
      PathPoint P5: humerus_r (0.008624921 -0.01911037 -0.007578175)
      PathWrap seth_LatissimusDorsi_S_r_pathwrap: wrap_object=Thorax_r method=hybrid
      ActiveForceLengthCurve: minimum_value=0
      FiberForceLengthCurve
    Millard2012EquilibriumMuscle seth_LatissimusDorsi_M_r: optimal_force=1 max_isometric_force=315
        optimal_fiber_length=0.2656 tendon_slack_length=0.0945 pennation_angle_at_optimal=0 max_contraction_velocity=10
        ignore_tendon_compliance=true activation_time_constant=0.01 deactivation_time_constant=0.04
        minimum_activation=0.01
      PathPoint P1: torso (-0.06116899 0.1205179 -0.002051898)
      PathPoint P2: torso (-0.08334596 0.1363148 0.03450081)
      PathPoint P3: torso (-0.07835921 0.2124157 0.1494819)
      PathPoint P4: torso (-0.04196758 0.2613917 0.1841761)
      PathPoint P5: humerus_r (0.01340465 -0.04299524 -0.007505376)
      PathWrap seth_LatissimusDorsi_M_r_pathwrap: wrap_object=Thorax_r method=hybrid
      ActiveForceLengthCurve: minimum_value=0
      FiberForceLengthCurve
    Millard2012EquilibriumMuscle seth_LatissimusDorsi_I_r: optimal_force=1 max_isometric_force=270.2
        optimal_fiber_length=0.3062 tendon_slack_length=0.0621 pennation_angle_at_optimal=0 max_contraction_velocity=10
        ignore_tendon_compliance=true activation_time_constant=0.01 deactivation_time_constant=0.04
        minimum_activation=0.01
      PathPoint P1: torso (-0.0242319 0.07138134 0.119186)
      PathPoint P2: torso (-0.03008804 0.1616718 0.1914979)
      PathPoint P3: torso (0.00533886 0.2531303 0.1923273)
      PathPoint P4: humerus_r (0.01372485 -0.0530939 -0.007223103)
      PathWrap seth_LatissimusDorsi_I_r_pathwrap: wrap_object=Thorax_r method=hybrid
      ActiveForceLengthCurve: minimum_value=0
      FiberForceLengthCurve
    Millard2012EquilibriumMuscle seth_PectoralisMajorClavicle_S_r: optimal_force=1 max_isometric_force=408.8
        optimal_fiber_length=0.1091 tendon_slack_length=0.014 pennation_angle_at_optimal=0 max_contraction_velocity=10
        ignore_tendon_compliance=true activation_time_constant=0.01 deactivation_time_constant=0.04
        minimum_activation=0.01
      PathPoint P1: clavicle_r (0.006049501 0.008968834 0.06233325)
      PathPoint P2: humerus_r (0.01759374 -0.04322385 -0.01059143)
      PathWrap seth_PectoralisMajorClavicle_S_r_pathwrap: wrap_object=Thorax_r method=hybrid
      ActiveForceLengthCurve: minimum_value=0
      FiberForceLengthCurve
    Millard2012EquilibriumMuscle seth_PectoralisMajorThorax_I_r: optimal_force=1 max_isometric_force=571.2
        optimal_fiber_length=0.183 tendon_slack_length=0.043 pennation_angle_at_optimal=0 max_contraction_velocity=10
        ignore_tendon_compliance=true activation_time_constant=0.01 deactivation_time_constant=0.04
        minimum_activation=0.01
      PathPoint P1: thorax (0.1507684 0.176636 0.03135068)
      PathPoint P2: humerus_r (0.01604244 -0.03027699 -0.006415769)
      PathWrap seth_PectoralisMajorThorax_I_r_pathwrap: wrap_object=Thorax_r method=hybrid
      ActiveForceLengthCurve: minimum_value=0
      FiberForceLengthCurve
    Millard2012EquilibriumMuscle seth_PectoralisMajorThorax_M_r: optimal_force=1 max_isometric_force=683.2
        optimal_fiber_length=0.15 tendon_slack_length=0.026 pennation_angle_at_optimal=0 max_contraction_velocity=10
        ignore_tendon_compliance=true activation_time_constant=0.01 deactivation_time_constant=0.04
        minimum_activation=0.01
      PathPoint P1: thorax (0.1064807 0.2787849 0.01590848)
      PathPoint P2: humerus_r (0.01454452 -0.02595067 -0.009357896)
      PathWrap seth_PectoralisMajorThorax_M_r_pathwrap: wrap_object=Thorax_r method=hybrid
      ActiveForceLengthCurve: minimum_value=0
      FiberForceLengthCurve
    Millard2012EquilibriumMuscle seth_TeresMajor_r: optimal_force=1 max_isometric_force=851.2
        optimal_fiber_length=0.141 tendon_slack_length=0.006 pennation_angle_at_optimal=0 max_contraction_velocity=10
        ignore_tendon_compliance=true activation_time_constant=0.01 deactivation_time_constant=0.04
        minimum_activation=0.01
      PathPoint P1: scapula_r (-0.1373341 -0.1544423 -0.09482941)
      PathPoint P2: humerus_r (0.01129203 -0.04110377 -0.007583648)
      PathWrap seth_TeresMajor_r_pathwrap: wrap_object=Thorax_r method=hybrid
      PathWrap seth_TeresMajor_r_pathwrap_0: wrap_object=Tmajscapula_r method=hybrid
      ActiveForceLengthCurve: minimum_value=0
      FiberForceLengthCurve
    Millard2012EquilibriumMuscle seth_Infraspinatus_I_r: optimal_force=1 max_isometric_force=1037.4
        optimal_fiber_length=0.0677 tendon_slack_length=0.084 pennation_angle_at_optimal=0 max_contraction_velocity=10
        activation_time_constant=0.01 deactivation_time_constant=0.04 minimum_activation=0.01
      PathPoint P1: scapula_r (-0.1303109 -0.1063503 -0.1068869)
      PathPoint P2: humerus_r (-0.009088479 -0.01130708 0.03058107)
      PathWrap seth_Infraspinatus_I_r_pathwrap: wrap_object=Infra_r method=hybrid
      PathWrap seth_Infraspinatus_I_r_pathwrap_0: wrap_object=hheadInfra_r method=hybrid
      ActiveForceLengthCurve: minimum_value=0
      FiberForceLengthCurve
    Millard2012EquilibriumMuscle seth_Infraspinatus_S_r: optimal_force=1 max_isometric_force=967.4
        optimal_fiber_length=0.0698 tendon_slack_length=0.05 pennation_angle_at_optimal=0 max_contraction_velocity=10
        activation_time_constant=0.01 deactivation_time_constant=0.04 minimum_activation=0.01
      PathPoint P1: scapula_r (-0.1097389 -0.042448 -0.1142766)
      PathPoint P2: humerus_r (-0.008538713 -0.001426113 0.02797903)
      PathWrap seth_Infraspinatus_S_r_pathwrap: wrap_object=Infra_r method=hybrid
      PathWrap seth_Infraspinatus_S_r_pathwrap_0: wrap_object=hheadInfra_r method=hybrid
      ActiveForceLengthCurve: minimum_value=0
      FiberForceLengthCurve
    Millard2012EquilibriumMuscle seth_PectoralisMinor_r: optimal_force=1 max_isometric_force=429.8
        optimal_fiber_length=0.1183 tendon_slack_length=0.032 pennation_angle_at_optimal=0 max_contraction_velocity=10
        ignore_tendon_compliance=true activation_time_constant=0.01 deactivation_time_constant=0.04
        minimum_activation=0.01
      PathPoint P1: thorax (0.1435598 0.1919619 0.1187406)
      PathPoint P2: scapula_r (0.0143039 -0.0460916 -0.03017518)
      PathWrap seth_PectoralisMinor_r_pathwrap: wrap_object=Thorax_r method=hybrid
      ActiveForceLengthCurve: minimum_value=0
      FiberForceLengthCurve
    Millard2012EquilibriumMuscle seth_TeresMinor_r: optimal_force=1 max_isometric_force=695.8
        optimal_fiber_length=0.055 tendon_slack_length=0.051 pennation_angle_at_optimal=0 max_contraction_velocity=10
        activation_time_constant=0.01 deactivation_time_constant=0.04 minimum_activation=0.01
      PathPoint P1: scapula_r (-0.1109752 -0.08688229 -0.05561956)
      PathPoint P2: humerus_r (-0.01139454 -0.01412538 0.01504049)
      PathWrap seth_TeresMinor_r_pathwrap: wrap_object=hheadsupraTminor_r method=hybrid
      ActiveForceLengthCurve: minimum_value=0
      FiberForceLengthCurve
    Millard2012EquilibriumMuscle seth_Subscapularis_S_r: optimal_force=1 max_isometric_force=540.4
        optimal_fiber_length=0.0676 tendon_slack_length=0.059 pennation_angle_at_optimal=0.08726646
        max_contraction_velocity=10 activation_time_constant=0.01 deactivation_time_constant=0.04
        minimum_activation=0.01
      PathPoint P1: scapula_r (-0.1036357 -0.04113254 -0.1187341)
      PathPoint P2: humerus_r (0.01505554 0.004288393 -0.0179923)
      PathWrap seth_Subscapularis_S_r_pathwrap: wrap_object=Subscapuralis_r method=hybrid
      PathWrap seth_Subscapularis_S_r_pathwrap_0: wrap_object=hhead_r method=hybrid
      ActiveForceLengthCurve: minimum_value=0
      FiberForceLengthCurve
    Millard2012EquilibriumMuscle seth_Subscapularis_M_r: optimal_force=1 max_isometric_force=609
        optimal_fiber_length=0.0744 tendon_slack_length=0.055 pennation_angle_at_optimal=0.08726646
        max_contraction_velocity=10 activation_time_constant=0.01 deactivation_time_constant=0.04
        minimum_activation=0.01
      PathPoint P1: scapula_r (-0.1099231 -0.0722287 -0.09831385)
      PathPoint P2: humerus_r (0.0108496 0.005670375 -0.02523384)
      PathWrap seth_Subscapularis_M_r_pathwrap: wrap_object=Subscapuralis_r method=hybrid
      PathWrap seth_Subscapularis_M_r_pathwrap_0: wrap_object=hhead_r method=hybrid
      ActiveForceLengthCurve: minimum_value=0
      FiberForceLengthCurve
    Millard2012EquilibriumMuscle seth_Subscapularis_I_r: optimal_force=1 max_isometric_force=854
        optimal_fiber_length=0.0721 tendon_slack_length=0.059 pennation_angle_at_optimal=0 max_contraction_velocity=10
        activation_time_constant=0.01 deactivation_time_constant=0.04 minimum_activation=0.01
      PathPoint P1: scapula_r (-0.1250495 -0.128449 -0.112291)
      PathPoint P2: humerus_r (0.006012323 -0.0001879337 -0.02424539)
      PathWrap seth_Subscapularis_I_r_pathwrap: wrap_object=Subscapuralis_r method=hybrid
      PathWrap seth_Subscapularis_I_r_pathwrap_0: wrap_object=hhead_r method=hybrid
      ActiveForceLengthCurve: minimum_value=0
      FiberForceLengthCurve
    Millard2012EquilibriumMuscle seth_Supraspinatus_P_r: optimal_force=1 max_isometric_force=326.2
        optimal_fiber_length=0.0591 tendon_slack_length=0.025 pennation_angle_at_optimal=0 max_contraction_velocity=10
        activation_time_constant=0.01 deactivation_time_constant=0.04 minimum_activation=0.01
      PathPoint P1: scapula_r (-0.07961761 -0.00181525 -0.06504738)
      PathPoint P2: humerus_r (0.01501381 0.01130565 0.01929317)
      PathWrap seth_Supraspinatus_P_r_pathwrap: wrap_object=hheadsupraTminor_r method=hybrid
      ActiveForceLengthCurve: minimum_value=0
      FiberForceLengthCurve
    Millard2012EquilibriumMuscle seth_Supraspinatus_A_r: optimal_force=1 max_isometric_force=543.2
        optimal_fiber_length=0.0554 tendon_slack_length=0.031 pennation_angle_at_optimal=0 max_contraction_velocity=10
        activation_time_constant=0.01 deactivation_time_constant=0.04 minimum_activation=0.01
      PathPoint P1: scapula_r (-0.06444305 0.001783222 -0.09108437)
      PathPoint P2: humerus_r (0.0181916 0.02225832 0.007006833)
      PathWrap seth_Supraspinatus_A_r_pathwrap: wrap_object=Thorax_r method=hybrid
      PathWrap seth_Supraspinatus_A_r_pathwrap_0: wrap_object=hheadsupraTminor_r method=hybrid
      ActiveForceLengthCurve: minimum_value=0
      FiberForceLengthCurve
    Millard2012EquilibriumMuscle seth_TrapeziusScapula_M_l: optimal_force=1 max_isometric_force=470.4
        optimal_fiber_length=0.0832 tendon_slack_length=0.032 pennation_angle_at_optimal=0 max_contraction_velocity=10
        ignore_tendon_compliance=true activation_time_constant=0.01 deactivation_time_constant=0.04
        minimum_activation=0.01
      PathPoint P1: torso (-0.05284248 0.4060554 0.00232369)
      PathPoint P2: scapula_l (-0.07661443 -0.002573737 0.04777288)
      PathWrap seth_TrapeziusScapula_M_l_pathwrap: wrap_object=Thorax_l method=hybrid
      ActiveForceLengthCurve: minimum_value=0
      FiberForceLengthCurve
    Millard2012EquilibriumMuscle seth_TrapeziusScapula_S_l: optimal_force=1 max_isometric_force=1043
        optimal_fiber_length=0.1127 tendon_slack_length=0.027 pennation_angle_at_optimal=0 max_contraction_velocity=10
        ignore_tendon_compliance=true activation_time_constant=0.01 deactivation_time_constant=0.04
        minimum_activation=0.01
      PathPoint P1: torso (-0.0401631 0.4657917 0.004769873)
      PathPoint P2: scapula_l (-0.06806894 0.009063125 0.03214895)
      PathWrap seth_TrapeziusScapula_S_l_pathwrap: wrap_object=Thorax_l method=hybrid
      ActiveForceLengthCurve: minimum_value=0
      FiberForceLengthCurve
    Millard2012EquilibriumMuscle seth_TrapeziusScapula_I_l: optimal_force=1 max_isometric_force=414.4
        optimal_fiber_length=0.1264 tendon_slack_length=0.035 pennation_angle_at_optimal=0 max_contraction_velocity=10
        ignore_tendon_compliance=true activation_time_constant=0.01 deactivation_time_constant=0.04
        minimum_activation=0.01
      PathPoint P1: torso (-0.07537474 0.2295346 -0.001512614)
      PathPoint P2: scapula_l (-0.09959758 -0.01243055 0.09715675)
      PathWrap seth_TrapeziusScapula_I_l_pathwrap: wrap_object=Thorax_l method=hybrid
      ActiveForceLengthCurve: minimum_value=0
      FiberForceLengthCurve
    Millard2012EquilibriumMuscle seth_TrapeziusClavicle_S_l: optimal_force=1 max_isometric_force=201.6
        optimal_fiber_length=0.1127 tendon_slack_length=0.027 pennation_angle_at_optimal=0 max_contraction_velocity=10
        ignore_tendon_compliance=true activation_time_constant=0.01 deactivation_time_constant=0.04
        minimum_activation=0.01
      PathPoint P1: torso (-0.02360992 0.5647917 -0.003217024)
      PathPoint P2: clavicle_l (-0.03960049 0.03275242 -0.1196613)
      PathWrap seth_TrapeziusClavicle_S_l_pathwrap: wrap_object=Thorax_l method=hybrid
      ActiveForceLengthCurve: minimum_value=0
      FiberForceLengthCurve
    Millard2012EquilibriumMuscle seth_SerratusAnterior_I_l: optimal_force=1 max_isometric_force=430
        optimal_fiber_length=0.1587 tendon_slack_length=0 pennation_angle_at_optimal=0 max_contraction_velocity=10
        ignore_tendon_compliance=true activation_time_constant=0.01 deactivation_time_constant=0.04
        minimum_activation=0.01
      PathPoint P1: scapula_l (-0.1493576 -0.147592 0.1124863)
      PathPoint P2: thorax (0.08007323 0.1045087 -0.1961844)
      PathWrap seth_SerratusAnterior_I_l_pathwrap: wrap_object=Thorax_l method=midpoint
      ActiveForceLengthCurve: minimum_value=0
      FiberForceLengthCurve
    Millard2012EquilibriumMuscle seth_SerratusAnterior_M_l: optimal_force=1 max_isometric_force=508
        optimal_fiber_length=0.1538 tendon_slack_length=0.012 pennation_angle_at_optimal=0 max_contraction_velocity=10
        ignore_tendon_compliance=true activation_time_constant=0.01 deactivation_time_constant=0.04
        minimum_activation=0.01
      PathPoint P1: scapula_l (-0.1356367 -0.1092839 0.129689)
      PathPoint P2: thorax (0.1027348 0.2284406 -0.152104)
      PathWrap seth_SerratusAnterior_M_l_pathwrap: wrap_object=Thorax_l method=hybrid
      ActiveForceLengthCurve: minimum_value=0
      FiberForceLengthCurve
    Millard2012EquilibriumMuscle seth_SerratusAnterior_S_l: optimal_force=1 max_isometric_force=387.8
        optimal_fiber_length=0.0945 tendon_slack_length=0 pennation_angle_at_optimal=0 max_contraction_velocity=10
        ignore_tendon_compliance=true activation_time_constant=0.01 deactivation_time_constant=0.04
        minimum_activation=0.01
      PathPoint P1: scapula_l (-0.06380719 0.01183862 0.1113312)
      PathPoint P2: torso (0.0208541 0.3874329 -0.1306762)
      PathWrap seth_SerratusAnterior_S_l_pathwrap: wrap_object=Thorax_l method=hybrid
      ActiveForceLengthCurve: minimum_value=0
      FiberForceLengthCurve
    Millard2012EquilibriumMuscle seth_Rhomboideus_S_l: optimal_force=1 max_isometric_force=200.2
        optimal_fiber_length=0.0986 tendon_slack_length=0.015 pennation_angle_at_optimal=0 max_contraction_velocity=10
        activation_time_constant=0.01 deactivation_time_constant=0.04 minimum_activation=0.01
      PathPoint P1: torso (-0.03812413 0.4593938 0.002683239)
      PathPoint P2: scapula_l (-0.1087392 -0.03013584 0.1338153)
      PathWrap seth_Rhomboideus_S_l_pathwrap: wrap_object=Thorax_l method=hybrid
      ActiveForceLengthCurve: minimum_value=0
      FiberForceLengthCurve
    Millard2012EquilibriumMuscle seth_Rhomboideus_I_l: optimal_force=1 max_isometric_force=407.4
        optimal_fiber_length=0.1152 tendon_slack_length=0.028 pennation_angle_at_optimal=0 max_contraction_velocity=10
        activation_time_constant=0.01 deactivation_time_constant=0.04 minimum_activation=0.01
      PathPoint P1: torso (-0.06095853 0.3943494 0.0006708117)
      PathPoint P2: scapula_l (-0.1397636 -0.1403643 0.121965)
      PathWrap seth_Rhomboideus_I_l_pathwrap: wrap_object=Thorax_l method=hybrid
      ActiveForceLengthCurve: minimum_value=0
      FiberForceLengthCurve
    Millard2012EquilibriumMuscle seth_LevatorScapulae_l: optimal_force=1 max_isometric_force=280
        optimal_fiber_length=0.1578 tendon_slack_length=0.019 pennation_angle_at_optimal=0 max_contraction_velocity=10
        ignore_tendon_compliance=true activation_time_constant=0.01 deactivation_time_constant=0.04
        minimum_activation=0.01
      PathPoint P1: torso (0.01250354 0.5657796 -0.04088012)
      PathPoint P2: scapula_l (-0.1026098 -0.01062845 0.1353275)
      PathWrap seth_LevatorScapulae_l_pathwrap: wrap_object=Thorax_l method=hybrid
      ActiveForceLengthCurve: minimum_value=0
      FiberForceLengthCurve
    Millard2012EquilibriumMuscle seth_Coracobrachialis_l: optimal_force=1 max_isometric_force=648.2
        optimal_fiber_length=0.0683 tendon_slack_length=0.104 pennation_angle_at_optimal=0 max_contraction_velocity=10
        ignore_tendon_compliance=true activation_time_constant=0.01 deactivation_time_constant=0.04
        minimum_activation=0.01
      PathPoint P1: scapula_l (0.01087559 -0.05581651 0.03694997)
      PathPoint P2: humerus_l (0.02192493 -0.156547 0.02597195)
      ActiveForceLengthCurve: minimum_value=0
      FiberForceLengthCurve
    Millard2012EquilibriumMuscle seth_DeltoideusClavicle_A_l: optimal_force=1 max_isometric_force=707.7
        optimal_fiber_length=0.094 tendon_slack_length=0.088 pennation_angle_at_optimal=0.08726646
        max_contraction_velocity=10 activation_time_constant=0.01 deactivation_time_constant=0.04
        minimum_activation=0.01
      PathPoint P1: clavicle_l (-0.02994062 0.02563782 -0.1106116)
      PathPoint P2: scapula_l (0.02573115 -0.008664316 -0.01367659)
      PathPoint P3: humerus_l (0.0278893 -0.1172526 0.01346231)
      PathWrap seth_DeltoideusClavicle_A_l_pathwrap: wrap_object=deltsca_l method=hybrid
      ActiveForceLengthCurve: minimum_value=0
      FiberForceLengthCurve
    Millard2012EquilibriumMuscle seth_DeltoideusScapula_P_l: optimal_force=1 max_isometric_force=1324.4
        optimal_fiber_length=0.0949 tendon_slack_length=0.076 pennation_angle_at_optimal=0.08726646
        max_contraction_velocity=10 activation_time_constant=0.01 deactivation_time_constant=0.04
        minimum_activation=0.01
      PathPoint P1: scapula_l (-0.07594502 -0.009091154 0.03581628)
      PathPoint P2: scapula_l (-0.0723478 -0.04257243 -0.009671364)
      PathPoint P3: humerus_l (0.01315374 -0.09444363 0.00199129)
      PathWrap seth_DeltoideusScapula_P_l_pathwrap: wrap_object=deltsca_l method=hybrid
      ActiveForceLengthCurve: minimum_value=0
      FiberForceLengthCurve
    Millard2012EquilibriumMuscle seth_DeltoideusScapula_M_l: optimal_force=1 max_isometric_force=2597.8
        optimal_fiber_length=0.0748 tendon_slack_length=0.064 pennation_angle_at_optimal=0.08726646
        max_contraction_velocity=10 activation_time_constant=0.01 deactivation_time_constant=0.04
        minimum_activation=0.01
      PathPoint P1: scapula_l (-0.02107215 0.002675464 -0.01025693)
      PathPoint P2: scapula_l (-0.00675804 -0.008867061 -0.04081388)
      PathPoint P3: humerus_l (0.01556602 -0.109642 0.006308054)
      PathWrap seth_DeltoideusScapula_M_l_pathwrap: wrap_object=deltsca_l method=hybrid
      ActiveForceLengthCurve: minimum_value=0
      FiberForceLengthCurve
    Millard2012EquilibriumMuscle seth_LatissimusDorsi_S_l: optimal_force=1 max_isometric_force=201.6
        optimal_fiber_length=0.2109 tendon_slack_length=0.081 pennation_angle_at_optimal=0 max_contraction_velocity=10
        ignore_tendon_compliance=true activation_time_constant=0.01 deactivation_time_constant=0.04
        minimum_activation=0.01
      PathPoint P1: torso (-0.07440135 0.2531319 -0.002249192)
      PathPoint P2: torso (-0.09363226 0.2534476 -0.03788112)
      PathPoint P3: torso (-0.1029233 0.2768288 -0.1328681)
      PathPoint P4: torso (-0.0637602 0.2969866 -0.1786333)
      PathPoint P5: humerus_l (0.008624921 -0.01911037 0.007578175)
      PathWrap seth_LatissimusDorsi_S_l_pathwrap: wrap_object=Thorax_l method=hybrid
      ActiveForceLengthCurve: minimum_value=0
      FiberForceLengthCurve
    Millard2012EquilibriumMuscle seth_LatissimusDorsi_M_l: optimal_force=1 max_isometric_force=315
        optimal_fiber_length=0.2656 tendon_slack_length=0.0945 pennation_angle_at_optimal=0 max_contraction_velocity=10
        ignore_tendon_compliance=true activation_time_constant=0.01 deactivation_time_constant=0.04
        minimum_activation=0.01
      PathPoint P1: torso (-0.06116899 0.1205179 0.002051898)
      PathPoint P2: torso (-0.08334596 0.1363148 -0.03450081)
      PathPoint P3: torso (-0.07835921 0.2124157 -0.1494819)
      PathPoint P4: torso (-0.04196758 0.2613917 -0.1841761)
      PathPoint P5: humerus_l (0.01340465 -0.04299524 0.007505376)
      PathWrap seth_LatissimusDorsi_M_l_pathwrap: wrap_object=Thorax_l method=hybrid
      ActiveForceLengthCurve: minimum_value=0
      FiberForceLengthCurve
    Millard2012EquilibriumMuscle seth_LatissimusDorsi_I_l: optimal_force=1 max_isometric_force=270.2
        optimal_fiber_length=0.3062 tendon_slack_length=0.0621 pennation_angle_at_optimal=0 max_contraction_velocity=10
        ignore_tendon_compliance=true activation_time_constant=0.01 deactivation_time_constant=0.04
        minimum_activation=0.01
      PathPoint P1: torso (-0.0242319 0.07138134 -0.119186)
      PathPoint P2: torso (-0.03008804 0.1616718 -0.1914979)
      PathPoint P3: torso (0.00533886 0.2531303 -0.1923273)
      PathPoint P4: humerus_l (0.01372485 -0.0530939 0.007223103)
      PathWrap seth_LatissimusDorsi_I_l_pathwrap: wrap_object=Thorax_l method=hybrid
      ActiveForceLengthCurve: minimum_value=0
      FiberForceLengthCurve
    Millard2012EquilibriumMuscle seth_PectoralisMajorClavicle_S_l: optimal_force=1 max_isometric_force=408.8
        optimal_fiber_length=0.1091 tendon_slack_length=0.014 pennation_angle_at_optimal=0 max_contraction_velocity=10
        ignore_tendon_compliance=true activation_time_constant=0.01 deactivation_time_constant=0.04
        minimum_activation=0.01
      PathPoint P1: clavicle_l (0.006049501 0.008968834 -0.06233325)
      PathPoint P2: humerus_l (0.01759374 -0.04322385 0.01059143)
      PathWrap seth_PectoralisMajorClavicle_S_l_pathwrap: wrap_object=Thorax_l method=hybrid
      ActiveForceLengthCurve: minimum_value=0
      FiberForceLengthCurve
    Millard2012EquilibriumMuscle seth_PectoralisMajorThorax_I_l: optimal_force=1 max_isometric_force=571.2
        optimal_fiber_length=0.183 tendon_slack_length=0.043 pennation_angle_at_optimal=0 max_contraction_velocity=10
        ignore_tendon_compliance=true activation_time_constant=0.01 deactivation_time_constant=0.04
        minimum_activation=0.01
      PathPoint P1: thorax (0.1507684 0.176636 -0.03373137)
      PathPoint P2: humerus_l (0.01604244 -0.03027699 0.006415769)
      PathWrap seth_PectoralisMajorThorax_I_l_pathwrap: wrap_object=Thorax_l method=hybrid
      ActiveForceLengthCurve: minimum_value=0
      FiberForceLengthCurve
    Millard2012EquilibriumMuscle seth_PectoralisMajorThorax_M_l: optimal_force=1 max_isometric_force=683.2
        optimal_fiber_length=0.15 tendon_slack_length=0.026 pennation_angle_at_optimal=0 max_contraction_velocity=10
        ignore_tendon_compliance=true activation_time_constant=0.01 deactivation_time_constant=0.04
        minimum_activation=0.01
      PathPoint P1: thorax (0.1064807 0.2787849 -0.01828916)
      PathPoint P2: humerus_l (0.01454452 -0.02595067 0.009357896)
      PathWrap seth_PectoralisMajorThorax_M_l_pathwrap: wrap_object=Thorax_l method=hybrid
      ActiveForceLengthCurve: minimum_value=0
      FiberForceLengthCurve
    Millard2012EquilibriumMuscle seth_TeresMajor_l: optimal_force=1 max_isometric_force=851.2
        optimal_fiber_length=0.141 tendon_slack_length=0.006 pennation_angle_at_optimal=0 max_contraction_velocity=10
        ignore_tendon_compliance=true activation_time_constant=0.01 deactivation_time_constant=0.04
        minimum_activation=0.01
      PathPoint P1: scapula_l (-0.1373341 -0.1544423 0.09482941)
      PathPoint P2: humerus_l (0.01129203 -0.04110377 0.007583648)
      PathWrap seth_TeresMajor_l_pathwrap: wrap_object=Thorax_l method=hybrid
      PathWrap seth_TeresMajor_l_pathwrap_0: wrap_object=Tmajscapula_l method=hybrid
      ActiveForceLengthCurve: minimum_value=0
      FiberForceLengthCurve
    Millard2012EquilibriumMuscle seth_Infraspinatus_I_l: optimal_force=1 max_isometric_force=1037.4
        optimal_fiber_length=0.0677 tendon_slack_length=0.084 pennation_angle_at_optimal=0 max_contraction_velocity=10
        activation_time_constant=0.01 deactivation_time_constant=0.04 minimum_activation=0.01
      PathPoint P1: scapula_l (-0.1303109 -0.1063503 0.1068869)
      PathPoint P2: humerus_l (-0.009088479 -0.01130708 -0.03058107)
      PathWrap seth_Infraspinatus_I_l_pathwrap: wrap_object=Infra_l method=hybrid
      PathWrap seth_Infraspinatus_I_l_pathwrap_0: wrap_object=hheadInfra_l method=hybrid
      ActiveForceLengthCurve: minimum_value=0
      FiberForceLengthCurve
    Millard2012EquilibriumMuscle seth_Infraspinatus_S_l: optimal_force=1 max_isometric_force=967.4
        optimal_fiber_length=0.0698 tendon_slack_length=0.05 pennation_angle_at_optimal=0 max_contraction_velocity=10
        activation_time_constant=0.01 deactivation_time_constant=0.04 minimum_activation=0.01
      PathPoint P1: scapula_l (-0.1097389 -0.042448 0.1142766)
      PathPoint P2: humerus_l (-0.008538713 -0.001426113 -0.02797903)
      PathWrap seth_Infraspinatus_S_l_pathwrap: wrap_object=Infra_l method=hybrid
      PathWrap seth_Infraspinatus_S_l_pathwrap_0: wrap_object=hheadInfra_l method=hybrid
      ActiveForceLengthCurve: minimum_value=0
      FiberForceLengthCurve
    Millard2012EquilibriumMuscle seth_PectoralisMinor_l: optimal_force=1 max_isometric_force=429.8
        optimal_fiber_length=0.1183 tendon_slack_length=0.032 pennation_angle_at_optimal=0 max_contraction_velocity=10
        ignore_tendon_compliance=true activation_time_constant=0.01 deactivation_time_constant=0.04
        minimum_activation=0.01
      PathPoint P1: thorax (0.1435598 0.1919619 -0.1211213)
      PathPoint P2: scapula_l (0.0143039 -0.0460916 0.03017518)
      PathWrap seth_PectoralisMinor_l_pathwrap: wrap_object=Thorax_l method=hybrid
      ActiveForceLengthCurve: minimum_value=0
      FiberForceLengthCurve
    Millard2012EquilibriumMuscle seth_TeresMinor_l: optimal_force=1 max_isometric_force=695.8
        optimal_fiber_length=0.055 tendon_slack_length=0.051 pennation_angle_at_optimal=0 max_contraction_velocity=10
        activation_time_constant=0.01 deactivation_time_constant=0.04 minimum_activation=0.01
      PathPoint P1: scapula_l (-0.1109752 -0.08688229 0.05561956)
      PathPoint P2: humerus_l (-0.01139454 -0.01412538 -0.01504049)
      PathWrap seth_TeresMinor_l_pathwrap: wrap_object=hheadsupraTminor_l method=hybrid
      ActiveForceLengthCurve: minimum_value=0
      FiberForceLengthCurve
    Millard2012EquilibriumMuscle seth_Subscapularis_S_l: optimal_force=1 max_isometric_force=540.4
        optimal_fiber_length=0.0676 tendon_slack_length=0.059 pennation_angle_at_optimal=0.08726646
        max_contraction_velocity=10 activation_time_constant=0.01 deactivation_time_constant=0.04
        minimum_activation=0.01
      PathPoint P1: scapula_l (-0.1036357 -0.04113254 0.1187341)
      PathPoint P2: humerus_l (0.01505554 0.004288393 0.0179923)
      PathWrap seth_Subscapularis_S_l_pathwrap: wrap_object=Subscapuralis_l method=hybrid
      PathWrap seth_Subscapularis_S_l_pathwrap_0: wrap_object=hhead_l method=hybrid
      ActiveForceLengthCurve: minimum_value=0
      FiberForceLengthCurve
    Millard2012EquilibriumMuscle seth_Subscapularis_M_l: optimal_force=1 max_isometric_force=609
        optimal_fiber_length=0.0744 tendon_slack_length=0.055 pennation_angle_at_optimal=0.08726646
        max_contraction_velocity=10 activation_time_constant=0.01 deactivation_time_constant=0.04
        minimum_activation=0.01
      PathPoint P1: scapula_l (-0.1099231 -0.0722287 0.09831385)
      PathPoint P2: humerus_l (0.0108496 0.005670375 0.02523384)
      PathWrap seth_Subscapularis_M_l_pathwrap: wrap_object=Subscapuralis_l method=hybrid
      PathWrap seth_Subscapularis_M_l_pathwrap_0: wrap_object=hhead_l method=hybrid
      ActiveForceLengthCurve: minimum_value=0
      FiberForceLengthCurve
    Millard2012EquilibriumMuscle seth_Subscapularis_I_l: optimal_force=1 max_isometric_force=854
        optimal_fiber_length=0.0721 tendon_slack_length=0.059 pennation_angle_at_optimal=0 max_contraction_velocity=10
        activation_time_constant=0.01 deactivation_time_constant=0.04 minimum_activation=0.01
      PathPoint P1: scapula_l (-0.1250495 -0.128449 0.112291)
      PathPoint P2: humerus_l (0.006012323 -0.0001879337 0.02424539)
      PathWrap seth_Subscapularis_I_l_pathwrap: wrap_object=Subscapuralis_l method=hybrid
      PathWrap seth_Subscapularis_I_l_pathwrap_0: wrap_object=hhead_l method=hybrid
      ActiveForceLengthCurve: minimum_value=0
      FiberForceLengthCurve
    Millard2012EquilibriumMuscle seth_Supraspinatus_P_l: optimal_force=1 max_isometric_force=326.2
        optimal_fiber_length=0.0591 tendon_slack_length=0.025 pennation_angle_at_optimal=0 max_contraction_velocity=10
        activation_time_constant=0.01 deactivation_time_constant=0.04 minimum_activation=0.01
      PathPoint P1: scapula_l (-0.07961761 -0.00181525 0.06504738)
      PathPoint P2: humerus_l (0.01501381 0.01130565 -0.01929317)
      PathWrap seth_Supraspinatus_P_l_pathwrap: wrap_object=hheadsupraTminor_l method=hybrid
      ActiveForceLengthCurve: minimum_value=0
      FiberForceLengthCurve
    Millard2012EquilibriumMuscle seth_Supraspinatus_A_l: optimal_force=1 max_isometric_force=543.2
        optimal_fiber_length=0.0554 tendon_slack_length=0.031 pennation_angle_at_optimal=0 max_contraction_velocity=10
        activation_time_constant=0.01 deactivation_time_constant=0.04 minimum_activation=0.01
      PathPoint P1: scapula_l (-0.06444305 0.001783222 0.09108437)
      PathPoint P2: humerus_l (0.0181916 0.02225832 -0.007006833)
      PathWrap seth_Supraspinatus_A_l_pathwrap: wrap_object=Thorax_l method=hybrid
      PathWrap seth_Supraspinatus_A_l_pathwrap_0: wrap_object=hheadsupraTminor_l method=hybrid
      ActiveForceLengthCurve: minimum_value=0
      FiberForceLengthCurve
    ObjectGroup right_leg: members=(addbrev_r addlong_r addmagDist_r addmagIsch_r addmagMid_r addmagProx_r bflh_r bfsh_r edl_r ehl_r fdl_r fhl_r gaslat_r gasmed_r glmax1_r glmax2_r glmax3_r glmed1_r glmed2_r glmed3_r glmin1_r glmin2_r glmin3_r grac_r iliacus_r perbrev_r perlong_r piri_r psoas_r recfem_r sart_r semimem_r semiten_r soleus_r tfl_r tibant_r tibpost_r vasint_r vaslat_r vasmed_r)
    ObjectGroup left_leg: members=(addbrev_l addlong_l addmagDist_l addmagIsch_l addmagMid_l addmagProx_l bflh_l bfsh_l edl_l ehl_l fdl_l fhl_l gaslat_l gasmed_l glmax1_l glmax2_l glmax3_l glmed1_l glmed2_l glmed3_l glmin1_l glmin2_l glmin3_l grac_l iliacus_l perbrev_l perlong_l piri_l psoas_l recfem_l sart_l semimem_l semiten_l soleus_l tfl_l tibant_l tibpost_l vasint_l vaslat_l vasmed_l)
    ObjectGroup hip_add_r: members=(addbrev_r addlong_r addmagDist_r addmagIsch_r addmagMid_r addmagProx_r bflh_r grac_r semimem_r semiten_r)
    ObjectGroup hip_abd_r: members=(glmax1_r glmed1_r glmed2_r glmed3_r glmin1_r glmin2_r glmin3_r piri_r sart_r tfl_r)
    ObjectGroup hip_flex_r: members=(addbrev_r addlong_r glmin1_r grac_r iliacus_r psoas_r recfem_r sart_r tfl_r)
    ObjectGroup hip_ext_r: members=(addlong_r addmagDist_r addmagIsch_r addmagMid_r addmagProx_r bflh_r glmax1_r glmax2_r glmax3_r glmed1_r glmed2_r glmed3_r glmin3_r semimem_r semiten_r)
    ObjectGroup hip_inrot_r: members=(glmed1_r glmed2_r glmed3_r glmin1_r iliacus_r psoas_r tfl_r)
    ObjectGroup hip_exrot_r: members=(glmin3_r piri_r)
    ObjectGroup knee_flex_r: members=(bflh_r bfsh_r gaslat_r gasmed_r grac_r sart_r semimem_r semiten_r)
    ObjectGroup knee_ext_r: members=(recfem_r vasint_r vaslat_r vasmed_r)
    ObjectGroup ankle_df_r: members=(edl_r ehl_r tibant_r)
    ObjectGroup ankle_pf_r: members=(fdl_r fhl_r gaslat_r gasmed_r perbrev_r perlong_r soleus_r tibpost_r)
    ObjectGroup everter_r: members=(edl_r perbrev_r perlong_r)
    ObjectGroup inverter_r: members=(ehl_r fdl_r fhl_r tibant_r tibpost_r)
    ObjectGroup hip_add_l: members=(addbrev_l addlong_l addmagDist_l addmagIsch_l addmagMid_l addmagProx_l bflh_l grac_l semimem_l semiten_l)
    ObjectGroup hip_abd_l: members=(glmax1_l glmed1_l glmed2_l glmed3_l glmin1_l glmin2_l glmin3_l piri_l sart_l tfl_l)
    ObjectGroup hip_flex_l: members=(addbrev_l addlong_l glmin1_l grac_l iliacus_l psoas_l recfem_l sart_l tfl_l)
    ObjectGroup hip_ext_l: members=(addlong_l addmagDist_l addmagIsch_l addmagMid_l addmagProx_l bflh_l glmax1_l glmax2_l glmax3_l glmed1_l glmed2_l glmed3_l glmin3_l semimem_l semiten_l)
    ObjectGroup hip_exrot_l: members=(glmin3_l piri_l)
    ObjectGroup hip_inrot_l: members=(glmed1_l glmed2_l glmed3_l glmin1_l iliacus_l psoas_l tfl_l)
    ObjectGroup knee_flex_l: members=(bflh_l bfsh_l gaslat_l gasmed_l grac_l sart_l semimem_l semiten_l)
    ObjectGroup knee_ext_l: members=(recfem_l vasint_l vaslat_l vasmed_l)
    ObjectGroup ankle_df_l: members=(edl_l ehl_l tibant_l)
    ObjectGroup ankle_pf_l: members=(fdl_l fhl_l gaslat_l gasmed_l perbrev_l perlong_l soleus_l tibpost_l)
    ObjectGroup everter_l: members=(edl_l perbrev_l perlong_l)
    ObjectGroup inverter_l: members=(ehl_l fdl_l fhl_l tibant_l tibpost_l)
  MarkerSet:
    Marker Head: torso (0 0.694622 0) fixed=true
    Marker R.Shoulder: torso (-0.001369502 0.4331764 0.1668551) fixed=true
    Marker L.Shoulder: torso (-0.0001479558 0.4340449 -0.1682384) fixed=true
    Marker R.Clavicle: torso (0.0598078 0.398805 0.02850312) fixed=true
    Marker L.Clavicle: torso (0.06001048 0.3988199 -0.02934716) fixed=true
    Marker R.Biceps: humerus_r (0.0494266 -0.2134142 0.009335888)
    Marker R.Elbow: humerus_r (0.01240887 -0.3138289 0.03492811) fixed=true
    Marker R.MElbow: humerus_r (0 -0.3141147 -0.0434917) fixed=true
    Marker R.Forearm: ulna_r (0.005902111 -0.1330065 0.04807742)
    Marker R.Wrist: radius_r (-0.03295266 -0.2401653 0.006878553) fixed=true
    Marker L.Biceps: humerus_l (0.03091412 -0.1774577 -0.02991671)
    Marker L.Elbow: humerus_l (0.01322742 -0.3134507 -0.03417211) fixed=true
    Marker L.MElbow: humerus_l (0 -0.3141147 0.0434917) fixed=true
    Marker L.Forearm: ulna_l (0.004072261 -0.1275586 -0.0533974)
    Marker L.Wrist: radius_l (-0.03221424 -0.2391484 -0.006393874) fixed=true
    Marker R.ASIS: pelvis (0.0140215 0.03461817 0.1355426) fixed=true
    Marker L.ASIS: pelvis (0.01211335 0.03297939 -0.1362051) fixed=true
    Marker S2: pelvis (-0.2076678 0.02163451 0.001689314) fixed=true
    Marker R.PSIS: pelvis (-0.2013958 0.01064373 0.05118224)
    Marker L.PSIS: pelvis (-0.2054527 0.006648139 -0.03299402)
    Marker R_HJC: femur_r (0 0 0) fixed=true
    Marker L_HJC: femur_l (0 0 0) fixed=true
    Marker R.TH1: femur_r (0.06609537 -0.1481522 0.09894977)
    Marker R.TH2: femur_r (-0.04256604 -0.1581046 0.1241814)
    Marker R.TH3: femur_r (-0.04752491 -0.2794275 0.08751113)
    Marker R.Knee: femur_r (-0.001578751 -0.3936643 0.04960325) fixed=true
    Marker R.MKnee: femur_r (0.005243464 -0.3904532 -0.05261382) fixed=true
    Marker R.SH1: tibia_r (0.00618929 -0.1006936 0.05709899)
    Marker R.SH2: tibia_r (0.009111262 -0.2113075 0.06512998)
    Marker R.SH3: tibia_r (-0.07577712 -0.1079866 0.06171218)
    Marker R.SH4: tibia_r (-0.0727502 -0.2261306 0.06421453)
    Marker R.Ankle: tibia_r (-0.006798863 -0.4377476 0.05842767) fixed=true
    Marker R.MAnkle: tibia_r (0.006981052 -0.44052 -0.04313838) fixed=true
    Marker R.Toe: toes_r (0.0882065 0.0436068 -0.0231762) fixed=true
    Marker R.MT5: toes_r (0.00470394 0.0235564 0.0661423) fixed=true
    Marker R.Heel: calcn_r (-0.02184655 0.0228202 -0.01241861) fixed=true
    Marker L.TH1: femur_l (0.1047622 -0.1328653 -0.06137889)
    Marker L.TH2: femur_l (0.09793556 -0.2587879 -0.03892303)
    Marker L.TH3: femur_l (0.01233661 -0.1276965 -0.1211917)
    Marker L.TH4: femur_l (-0.01353609 -0.2538284 -0.08732385)
    Marker L.Knee: femur_l (-0.00146749 -0.392773 -0.04900244) fixed=true
    Marker L.MKnee: femur_l (0.005243464 -0.3904532 0.05261382) fixed=true
    Marker L.SH1: tibia_l (0.02613386 -0.1072382 -0.04295203)
    Marker L.SH2: tibia_l (-0.06789269 -0.1008819 -0.06446122)
    Marker L.SH3: tibia_l (-0.07087587 -0.2153663 -0.06141118)
    Marker L.Ankle: tibia_l (-0.005851133 -0.4376387 -0.05853443) fixed=true
    Marker L.MAnkle: tibia_l (0.006981052 -0.44052 0.04313838) fixed=true
    Marker L.Toe: toes_l (0.0882065 0.0436068 0.0231762) fixed=true
    Marker L.Heel: calcn_l (-0.02180087 0.02267972 0.01190861) fixed=true
    Marker L.MT5: toes_l (0.00470394 0.0235564 -0.0661423) fixed=true
    Marker MidPSIS: pelvis (-0.17715 0.04295646 0) fixed=true
    Marker MidASIS: pelvis (0.01495422 0.033913 0) fixed=true
    Marker MidClavicle: torso (0.05958427 0.3991485 0) fixed=true
    Marker L.AnkleJoint: tibia_l (0.0005817543 -0.44052 -0.008514153) fixed=true
    Marker L.KneeJoint: femur_l (0.002621732 -0.3919137 0.001578415) fixed=true
    Marker L.HeelGround: calcn_l (-0.02311217 -0.005585424 0.01305253) fixed=true
    Marker L.MT5Ground: toes_l (0.00609739 -0.00358542 -0.0641826) fixed=true
    Marker L.ToeGround: toes_l (0.08699 -0.00358542 0.021964) fixed=true
    Marker L.AnkleJointGround: tibia_l (0.0005817543 -0.5197741 -0.008514153) fixed=true
    Marker R.AnkleJoint: tibia_r (0.0005817543 -0.44052 0.008514153) fixed=true
    Marker R.KneeJoint: femur_r (0.002621732 -0.3919137 -0.001578415) fixed=true
    Marker R.HeelGround: calcn_r (-0.02311217 -0.005585424 -0.01305253) fixed=true
    Marker R.MT5Ground: toes_r (0.00609739 -0.00358542 0.0641826) fixed=true
    Marker R.ToeGround: toes_r (0.08699 -0.00358542 -0.021964) fixed=true
    Marker R.AnkleJointGround: tibia_r (0.0005817543 -0.5197741 0.008514153) fixed=true
    ObjectGroup anatomical: members=(R.Shoulder R.Clavicle R.Elbow R.MElbow R.Wrist R.ASIS R.PSIS R_HJC R.Knee R.MKnee R.Ankle R.MAnkle R.Toe R.Heel R.MT5 L.Shoulder L.Clavicle L.Elbow L.MElbow L.Wrist L.ASIS L.PSIS R_HJC L.Knee L.MKnee L.Ankle L.MAnkle L.Toe L.Heel L.MT5 S2)
    ObjectGroup tracking: members=(R.Biceps R.Forearm R.TH1 R.TH2 R.TH3 R.TH4 R.SH1 R.SH2 R.SH3 R.SH4 L.Biceps L.Forearm L.TH1 L.TH2 L.TH3 L.TH4 L.SH1 L.SH2 L.SH3 L.SH4)
